AnyFolder DeltoidWrappingPosterior = {

  WrappingSegment.ScapulaRef={
    AnyRefNode gh_rotated1={
      sRel=.gh.sRel;
      ARel={{......Sign*1,0,0},{0,1,0},{0,0,......Sign*1}};
    };
  };

  WrappingSegment.HumerusRef={
    AnyRefNode gh_rotated1={
      sRel=.gh.sRel;
      ARel={{1,0,0},{0,......Sign*1,0},{0,0,......Sign*1}};
    };
  };

  AnySeg WrappingSegment ={
    //^ Segment on which the wrapping ellipsoids are placed.
    //^ The segment follows scapula and humerus kinematically (using an
    //^ Averaging measure), but is dynamically attached to both scapula
    //^ and humerus to ensure that forces on the wrapping ellipsoids are
    //^ distributed correctly between humerus and scapula

    Mass=1e-5;
    Jii={0.0,0.0,0.0};

    r0= ScapulaRef.r0 ;
//    Axes0= ScapulaRef.Axes0 ;

    AnySeg &ScapulaRef = ....Segments.Scapula;
    AnySeg &HumerusRef = ....Segments.Humerus;
    AnySeg &ClaviculaRef = ....Segments.Clavicula;

AnyRefNode AlignmentRefNode = {
  ARel = .ScapulaRef.Axes0;

  AnyRefNode Deltoid_Scapula_Cyl={

    AnyVec3 P1 = ..ScapulaRef.Scale(..ScapulaRef.Data.deltoid_cyl_P1_pos*..ScapulaRef.Mirror);
    AnyVec3 P2 = ..ScapulaRef.Scale(..ScapulaRef.Data.gh_pos*..ScapulaRef.Mirror);
    AnyVec3 P3 = ..ScapulaRef.GHReactionCenterNode.sRel;

    sRel= P1;
    ARel=RotMat(sRel,P2,P3)*RotMat(pi/2,y);

    AnySurfCylinder cyl = {
      Radius= vnorm(.P2-.P3)*1.3;
      Length= vnorm(.sRel-.P2)*2;
      CapRatio=1;
      //AnyDrawParamSurf drw={RGB={0,0,1};};
      CenterOrigin = On;
    };
  };

  AnyRefNode Represent_Infraspinatus_Cyl={

    AnyVec3 P1 = ..ScapulaRef.O_Infraspinatus1.sRel;
    AnyVec3 P2 = ..ScapulaRef.Scale(..ScapulaRef.Data.gh_pos*..ScapulaRef.Mirror);
    AnyVec3 P3 = ..ScapulaRef.GHReactionCenterNode.sRel;

    sRel= P1;
    ARel=RotMat(sRel,P2,P3)*RotMat(pi/2,y);

    AnySurfCylinder cyl = {
      Radius= vnorm(.P2-.P3)*1.3;
      Length= vnorm(.sRel-.P2)*2;
      CapRatio=1;
      //AnyDrawParamSurf drw={RGB={0,0,1};};
      CenterOrigin = On;
    };
  };

  AnyRefNode FillGap_ScapulaHumerusHead_Cyl={

    AnyVec3 P1 = ..ScapulaRef.O_Infraspinatus1.sRel;
    AnyVec3 P2 = ..ScapulaRef.Scale(..ScapulaRef.Data.gh_pos*..ScapulaRef.Mirror);
    AnyVec3 P3 = ..ScapulaRef.GHReactionCenterNode.sRel;

    sRel= P1;
    ARel=RotMat(sRel,P2,P3)*RotMat(pi/2,y);

    AnySurfCylinder cyl = {
      Radius= vnorm(.P2-.P3)*1.3;
      Length= vnorm(.sRel-.P2)*2;
      CapRatio=1;
      //AnyDrawParamSurf drw={RGB={0,0,1};};
      CenterOrigin = On;
    };
  };

  AnyRefNode DeltoidLateral_Posterior_Cyl={

    AnyVec3 P1 = ..ScapulaRef.gh.sRel;
    AnyVec3 P2 = ..ScapulaRef.O_DeltoideusLateral4.sRel;
    AnyVec3 P3 = ..ScapulaRef.O_DeltoideusLateral1.sRel;
    AnyVec3 P4 = ..ScapulaRef.GHReactionCenterNode.sRel;

    sRel= P1;
    ARel=RotMat(P2,P3,P1)*RotMat(pi/2,y);

    AnySurfCylinder cyl = {
      Radius= vnorm(.P1-.P4)*1.3;
      Length= Radius;
      CapRatio=3;
      CapRatio2=1;
      //AnyDrawParamSurf drw={RGB={0,0,1};};
//      CenterOrigin = On;
    };
  };

    AnyRefNode Deltoid_Scapula_Cyl_Extra={

    AnyVec3 P1 = ..ScapulaRef.Scale(..ScapulaRef.Data.deltoid_cyl_P1_pos*..ScapulaRef.Mirror);
    AnyVec3 P1_1 = ..ScapulaRef.Scale((..ScapulaRef.Data.deltoid_cyl_P1_pos+{-0.04,0.04,0})*..ScapulaRef.Mirror);
    AnyVec3 P2 = ..ScapulaRef.Scale(..ScapulaRef.Data.gh_pos*..ScapulaRef.Mirror);
    AnyVec3 P3 = ..ScapulaRef.GHReactionCenterNode.sRel;

    sRel= P1_1;
    ARel=RotMat(P1,P2,P3)*RotMat(pi/2,y);

    AnySurfCylinder cyl = {
      Radius= vnorm(.P2-.P3)*1.3;
      Length= vnorm(.sRel-.P2)*2;
      CapRatio=1;
      CenterOrigin = On;
    };

  };

};
    AnyRefNode LocalReferenceFrame_ConstraintNode = {sRel= {0,0,0}; ARel= .ScapulaRef.Axes0;};
    AnyRefNode O_DeltoideusPosterior1 = {sRel= .ScapulaRef.r0 -.r0 + (.ScapulaRef.Axes0 * .ScapulaRef.O_DeltoideusPosterior1.sRel')';};
    AnyRefNode O_DeltoideusPosterior3 = {sRel= .ScapulaRef.r0 -.r0 + (.ScapulaRef.Axes0 * .ScapulaRef.O_DeltoideusPosterior3.sRel')';};
    AnyRefNode O_DeltoideusPosterior4 = {sRel= .ScapulaRef.r0 -.r0 + (.ScapulaRef.Axes0 * .ScapulaRef.O_DeltoideusPosterior4.sRel')';};
    AnyRefNode gh_joint = {sRel= .ScapulaRef.r0 -.r0 + (.ScapulaRef.Axes0 * .ScapulaRef.gh_rotated1.sRel')';};
    AnyRefNode HumerusLateral = {sRel= .HumerusRef.r0 -.r0 + (.HumerusRef.Axes0 * .HumerusRef.TeresMinorhumurus_wrap.sRel')';};
    AnyRefNode HumerusAnterior = {sRel= .HumerusRef.r0 -.r0 + (.HumerusRef.Axes0 * .HumerusRef.I_Subscapularis3.sRel')';};
    AnyRefNode HumerusMedial = {sRel= .ScapulaRef.r0 -.r0 + (.ScapulaRef.Axes0 * .ScapulaRef.GHReactionCenterNodeRotated.sRel')'+
      (.ScapulaRef.Axes0 *.ScapulaRef.GHReactionCenterNodeRotated.ARel* .ScapulaRef.GHReactionCenterNodeRotated.CavityEdgeNode8.sRel')';};
    AnyRefNode I_DeltoideusPosterior3 = {sRel= .HumerusRef.r0 -.r0 + (.HumerusRef.Axes0 * .HumerusRef.I_DeltoideusPosterior3.sRel')';};
    AnyRefNode deltoid_cyl_P1 = {sRel= .ScapulaRef.r0 -.r0 + (.ScapulaRef.Axes0 * .ScapulaRef.deltoid_cyl_P1.sRel')';};
  };

  AnyKinLinear m_O_DeltoideusPosterior1 = {
    AnyRefNode &ref1 = .WrappingSegment.O_DeltoideusPosterior1;
    AnyRefNode &ref2 = ....Segments.Scapula.O_DeltoideusPosterior1;
    Ref=0;
  };
  AnyKinLinear m_O_DeltoideusPosterior4 = {
    AnyRefNode &ref1 = .WrappingSegment.O_DeltoideusPosterior4;
    AnyRefNode &ref2 = ....Segments.Scapula.O_DeltoideusPosterior4;
    Ref=0;
  };
  AnyKinLinear m_gh_joint = {
    AnyRefNode &ref1 = .WrappingSegment.gh_joint;
    AnyRefNode &ref2= ....Segments.Humerus.gh;
    Ref=0;
  };
  AnyKinLinear m_deltoid_cyl_P1 = {
    AnyRefNode &ref1 = .WrappingSegment.deltoid_cyl_P1;
    AnyRefNode &ref2= ....Segments.Scapula.deltoid_cyl_P1;
    Ref=0;
  };


  AnyKinEq Constraint = {
    RigidBodyAverageMeasure CombinationMeasure(ROTATIONAL=On, LINEAR=On,POWER =1) = {

      LocalReferenceFrame = &..WrappingSegment.LocalReferenceFrame_ConstraintNode;
      InputMeasures = {
        &..m_O_DeltoideusPosterior1,
        &..m_O_DeltoideusPosterior4,
        &..m_gh_joint,
        &..m_deltoid_cyl_P1,
//        &..HumerusAnterior,
//        &..HumerusMedial,
//        &..m_I_DeltoideusPosterior3
      };
//      WeightCoefficients = {4,6,20,1,1,1,0.5};
      WeightCoefficients = {0.5,0.5,20,20};
    };
    Reaction.Type ??= repmat(nDim, Off);
  };

  AnyReacForce ForceToGHJoint = {
    AnyKinLinear lin ={
      AnyRefNode &ref1=.....Segments.Humerus.gh ;
      AnyRefNode &ref2=..WrappingSegment.gh_joint;
      Ref = 0;
    };
  };

  AnyReacForce MomentsToScapula1 = {
    AnyKinRotational rot ={
      AnyRefFrame &ref1=..WrappingSegment;
      AnyRefFrame &ref2=.....Segments.Scapula;
      Type=RotVector;
      AngVelOnOff=On;
    };
  };

};


AnyFolder DeltoidWrappingLateral = {

//  AnySeg WrappingSegment ={
//    //^ Segment on which the wrapping ellipsoids are placed.
//    //^ The segment follows scapula and humerus kinematically (using an
//    //^ Averaging measure), but is dynamically attached to both scapula
//    //^ and humerus to ensure that forces on the wrapping ellipsoids are
//    //^ distributed correctly between humerus and scapula
//
//    Mass=1e-5;
//    Jii={0.0,0.0,0.0};
//
//    r0= ScapulaRef.r0;
//
//    AnySeg &ScapulaRef = ....Segments.Scapula;
//    AnySeg &HumerusRef = ....Segments.Humerus;
//    AnySeg &ClaviculaRef = ....Segments.Clavicula;
//
//
//    AnySurfEllipsoid Ellipsoid_DeltoidWrappingLateral1 =
//    {
//      AnyRefNode &Node1 = .HumerusRef.I_DeltoideusLateral1;
//      AnyRefNode &Node2 = .ScapulaRef.O_DeltoideusLateral1;
//      AnyRefNode &Node3 = .ScapulaRef.O_DeltoideusLateral2;
////      AdjustorDirection = {1,.....Sign*0.3,0};
//      #include "CalEllipsMembers_3nodes.any"
//    };
//    AnySurfEllipsoid Ellipsoid_DeltoidWrappingLateral2 =
//    {
//      AnyRefNode &Node1 = .HumerusRef.I_DeltoideusLateral2;
//      AnyRefNode &Node2 = .ScapulaRef.O_DeltoideusLateral2;
//      AnyRefNode &Node3 = .ScapulaRef.O_DeltoideusLateral3;
////      AdjustorDirection = {1,.....Sign*0.3,0};
//      #include "CalEllipsMembers_3nodes.any"
//    };
//    AnySurfEllipsoid Ellipsoid_DeltoidWrappingLateral3 =
//    {
//      AnyRefNode &Node1 = .HumerusRef.I_DeltoideusLateral3;
//      AnyRefNode &Node2 = .ScapulaRef.O_DeltoideusLateral3;
//      AnyRefNode &Node3 = .ScapulaRef.O_DeltoideusLateral4;
////      AdjustorDirection = {1,.....Sign*0.25,0};
//      #include "CalEllipsMembers_3nodes.any"
//    };
//    AnySurfEllipsoid Ellipsoid_DeltoidWrappingLateral4 =
//    {
//      AnyRefNode &Node1 = .HumerusRef.I_DeltoideusLateral4;
//      AnyRefNode &Node2 = .ScapulaRef.O_DeltoideusLateral4;
//      AnyRefNode &Node3 = .ScapulaRef.gh_rotated1;
////      AdjustorDirection = {1,.....Sign*0.25,0};
//////      AdjustorDirection = {0.8,.....Sign*0.3,0};
//      AdjustorXRotation = pi/2 - .....Sign * pi/2; // This ellipsoid is defined by the gh_rotated1 node as its third node.
//      #include "CalEllipsMembers_3nodes.any"
//    };
//
//
//
//Ellipsoid_DeltoidWrappingLateral3 = {
//      AnySurfCylinder Extra_cyl= {
//        sRel = {0,......Sign*0.05,0};
//        Radius=0.05;
//        Length=0.2;
//        CapRatio = 1;
//        CenterOrigin = On;
//      };
//    };
//    Ellipsoid_DeltoidWrappingLateral4 = {
//      AnySurfCylinder Extra_cyl= {
//        sRel = {0,......Sign*0.05,0};
//        Radius=0.05;
//        Length=0.2;
//        CapRatio = 1;
//        CenterOrigin = On;
//      };
//    };
//
//AnyRefNode AlignmentRefNode = {
//  ARel = .ScapulaRef.Axes0;
//    AnyRefNode Deltoid_Scapula_Cyl_Stop3_Ant={
//
//      AnyVec3 P1 = ..ScapulaRef.gh.sRel;
//      AnyVec3 P2 = ..ScapulaRef.O_DeltoideusLateral3.sRel;
//      AnyVec3 P3 = ..ScapulaRef.GHReactionCenterNode.sRel;
//
//      sRel= P1;
//      ARel= RotMat(sRel,P2,P3)*RotMat(pi/2,y);
//
//      AnySurfCylinder cyl = {
//      Radius= .....DeltoidWrappingPosterior.WrappingSegment.AlignmentRefNode.Deltoid_Scapula_Cyl.cyl.Radius*0.98*0.7;
//        Length= vnorm(.sRel-.P2)*5;
//        CapRatio=1;
//        //AnyDrawParamSurf drw={RGB={0,0,1};};
//        //      CenterOrigin = On;
//      };
//
//    };
//     AnyRefNode Deltoid_Scapula_Cyl_Stop3_Ant_new={
//
//      AnyVec3 P1 = ..ScapulaRef.gh.sRel;
//      AnyVec3 P2 = (..ScapulaRef.O_DeltoideusLateral1.sRel+..ScapulaRef.O_DeltoideusLateral4.sRel)/2;
//      AnyVec3 P3 = ..ScapulaRef.GHReactionCenterNode.sRel;
//
//      sRel= P1;
//      ARel= RotMat(sRel,P2,P3)*RotMat(pi/2,y);
//
//      AnySurfCylinder cyl = {
//      //Radius= .....DeltoidWrappingPosterior.WrappingSegment.AlignmentRefNode.Deltoid_Scapula_Cyl.cyl.Radius*0.98;
//      Radius= vnorm((...ScapulaRef.O_DeltoideusLateral1.sRel-...ScapulaRef.O_DeltoideusLateral4.sRel)/2);//.....DeltoidWrappingPosterior.WrappingSegment.AlignmentRefNode.Deltoid_Scapula_Cyl.cyl.Radius*0.98*0.7;
//        Length= vnorm(.sRel-.P2)*5;
//        CapRatio=1;
//        //AnyDrawParamSurf drw={RGB={0,0,1};};
//        //      CenterOrigin = On;
//      };
//
//    };
//
//
//      AnyRefNode Deltoid_Scapula_Cyl_Stop1={
//
//    AnyVec3 P1 = ..ScapulaRef.Scale(..ScapulaRef.Data.gh_pos*..ScapulaRef.Mirror); //P2=.ai.sRel + VZ*Length;
//    AnyVec3 P2 = ..ScapulaRef.O_DeltoideusLateral1.sRel; //P2=.ai.sRel + VZ*Length;
//    AnyVec3 P3 = ..ScapulaRef.GHReactionCenterNode.sRel;//.Scale(.Data.deltoid_cyl_P3_pos*.Mirror); //P3=.ai.sRel - VX*Radius;
//
//    sRel= P1;
//    ARel=RotMat(sRel,P2,P3)*RotMat(pi/2,y);
//
//    AnySurfCylinder cyl = {
//      Radius= .....DeltoidWrappingPosterior.WrappingSegment.AlignmentRefNode.Deltoid_Scapula_Cyl.cyl.Radius*0.98;
//      Length= vnorm(.sRel-.P2)*5;
//      CapRatio=1;
//      //AnyDrawParamSurf drw={RGB={0,0,1};};
////      CenterOrigin = On;
//    };
//
//  };
//  AnyRefNode Deltoid_Scapula_Cyl_Stop2={
//
//    AnyVec3 P1 = ..ScapulaRef.Scale(..ScapulaRef.Data.gh_pos*..ScapulaRef.Mirror); //P2=.ai.sRel + VZ*Length;
//    AnyVec3 P2 = ..ScapulaRef.O_DeltoideusLateral2.sRel; //P2=.ai.sRel + VZ*Length;
//    AnyVec3 P3 = ..ScapulaRef.GHReactionCenterNode.sRel;//.Scale(.Data.deltoid_cyl_P3_pos*.Mirror); //P3=.ai.sRel - VX*Radius;
//
//    sRel= P1;
//    ARel=RotMat(sRel,P2,P3)*RotMat(pi/2,y);
//
//    AnySurfCylinder cyl = {
//      Radius= .....DeltoidWrappingPosterior.WrappingSegment.AlignmentRefNode.Deltoid_Scapula_Cyl.cyl.Radius*0.98;
//      Length= vnorm(.sRel-.P2)*5;
//      CapRatio=1;
//      //AnyDrawParamSurf drw={RGB={0,0,1};};
////      CenterOrigin = On;
//    };
//
//  };
//  AnyRefNode Deltoid_Scapula_Cyl_Stop3={
//
//    AnyVec3 P1 = ..ScapulaRef.Scale(..ScapulaRef.Data.gh_pos*..ScapulaRef.Mirror); //P2=.ai.sRel + VZ*Length;
//    AnyVec3 P2 = ..ScapulaRef.O_DeltoideusLateral3.sRel; //P2=.ai.sRel + VZ*Length;
//    AnyVec3 P3 = ..ScapulaRef.GHReactionCenterNode.sRel;//.Scale(.Data.deltoid_cyl_P3_pos*.Mirror); //P3=.ai.sRel - VX*Radius;
//
//    sRel= P1;
//    ARel=RotMat(sRel,P2,P3)*RotMat(pi/2,y);
//
//    AnySurfCylinder cyl = {
//      Radius= .....DeltoidWrappingPosterior.WrappingSegment.AlignmentRefNode.Deltoid_Scapula_Cyl.cyl.Radius*0.98;
//      Length= vnorm(.sRel-.P2)*5;
//      CapRatio=1;
//      //AnyDrawParamSurf drw={RGB={0,0,1};};
////      CenterOrigin = On;
//    };
//
//  };
//  AnyRefNode Deltoid_Scapula_Cyl_Stop4={
//
//    AnyVec3 P1 = ..ScapulaRef.Scale(..ScapulaRef.Data.gh_pos*..ScapulaRef.Mirror); //P2=.ai.sRel + VZ*Length;
//    AnyVec3 P2 = ..ScapulaRef.O_DeltoideusLateral4.sRel; //P2=.ai.sRel + VZ*Length;
//    AnyVec3 P3 = ..ScapulaRef.GHReactionCenterNode.sRel;//.Scale(.Data.deltoid_cyl_P3_pos*.Mirror); //P3=.ai.sRel - VX*Radius;
//
//    sRel= P1;
//    ARel=RotMat(sRel,P2,P3)*RotMat(pi/2,y);
//
//    AnySurfCylinder cyl = {
//      Radius= .....DeltoidWrappingPosterior.WrappingSegment.AlignmentRefNode.Deltoid_Scapula_Cyl.cyl.Radius*0.98;
//      Length= vnorm(.sRel-.P2)*5;
//      CapRatio=1;
//      //AnyDrawParamSurf drw={RGB={0,0,1};};
////      CenterOrigin = On;
//    };
//
//  };
//};
//    AnyRefNode LocalReferenceFrame_ConstraintNode = {sRel= {0,0,0}; ARel= .ScapulaRef.Axes0;};
//    AnyRefNode DeltoideusPosteriorWrappingRotNode = {sRel= {0,0,0};
//      ARel = .ScapulaRef.Axes0* .ScapulaRef.gh_rotated1.ARel;};
//    AnyRefNode O_DeltoideusPosterior1 = {sRel= .ScapulaRef.r0 -.r0 + (.ScapulaRef.Axes0 * .ScapulaRef.O_DeltoideusPosterior1.sRel')';};
//    AnyRefNode O_DeltoideusPosterior4 = {sRel= .ScapulaRef.r0 -.r0 + (.ScapulaRef.Axes0 * .ScapulaRef.O_DeltoideusPosterior4.sRel')';};
//    AnyRefNode gh_joint = {sRel= .ScapulaRef.r0 -.r0 + (.ScapulaRef.Axes0 * .ScapulaRef.gh_rotated1.sRel')';};
//    AnyRefNode HumerusLateral = {sRel= .HumerusRef.r0 -.r0 + (.HumerusRef.Axes0 * .HumerusRef.TeresMinorhumurus_wrap.sRel')';};
//    AnyRefNode HumerusAnterior = {sRel= .HumerusRef.r0 -.r0 + (.HumerusRef.Axes0 * .HumerusRef.I_Subscapularis3.sRel')';};
//    AnyRefNode HumerusMedial = {sRel= .ScapulaRef.r0 -.r0 + (.ScapulaRef.Axes0 * .ScapulaRef.GHReactionCenterNodeRotated.sRel')'+
//      (.ScapulaRef.Axes0 *.ScapulaRef.GHReactionCenterNodeRotated.ARel* .ScapulaRef.GHReactionCenterNodeRotated.CavityEdgeNode8.sRel')';};
//    AnyRefNode O_DeltoideusLateral1 = {sRel= .ScapulaRef.r0 -.r0 + (.ScapulaRef.Axes0 * .ScapulaRef.O_DeltoideusLateral1.sRel')';};
//    AnyRefNode O_DeltoideusLateral4 = {sRel= .ScapulaRef.r0 -.r0 + (.ScapulaRef.Axes0 * .ScapulaRef.O_DeltoideusLateral4.sRel')';};
//    AnyRefNode I_DeltoideusPosterior3 = {sRel= .HumerusRef.r0 -.r0 + (.HumerusRef.Axes0 * .HumerusRef.I_DeltoideusPosterior3.sRel')';};
//
//  };
//
//  AnyKinLinear m_O_DeltoideusPosterior1 = {
//    AnyRefNode &ref1 = .WrappingSegment.O_DeltoideusPosterior1;
//    AnyRefNode &ref2 = ....Segments.Scapula.O_DeltoideusPosterior1;
//    Ref=0;
//  };
//  AnyKinLinear m_O_DeltoideusPosterior4 = {
//    AnyRefNode &ref1 = .WrappingSegment.O_DeltoideusPosterior4;
//    AnyRefNode &ref2 = ....Segments.Scapula.O_DeltoideusPosterior4;
//    Ref=0;
//  };
//
//  AnyKinLinear m_gh_joint = {
//    AnyRefNode &ref1 = .WrappingSegment.gh_joint;
//    AnyRefNode &ref2=....Segments.Humerus.gh;
//    Ref=0;
//  };
//
//  AnyKinLinear HumerusLateral = {
//    AnyRefNode &ref1 = .WrappingSegment.HumerusLateral;
//    AnyRefNode &ref2=....Segments.Humerus.TeresMinorhumurus_wrap;
//    Ref=0;
//  };
//  AnyKinLinear HumerusAnterior = {
//    AnyRefNode &ref1 = .WrappingSegment.HumerusAnterior;
//    AnyRefNode &ref2=....Segments.Humerus.I_Subscapularis3;
//    Ref=0;
//  };
//  AnyKinLinear HumerusMedial = {
//    AnyRefNode &ref1 = .WrappingSegment.HumerusMedial;
//    AnyRefNode &ref2= ....Segments.Scapula.GHReactionCenterNodeRotated.CavityEdgeNode8;
//    Ref=0;
//  };
//
//  AnyKinLinear m_O_DeltoideusLateral1 = {
//    AnyRefNode &ref1 = .WrappingSegment.O_DeltoideusLateral1;
//    AnyRefNode &ref2 = ....Segments.Scapula.O_DeltoideusLateral1;
//    Ref=0;
//  };
//  AnyKinLinear m_O_DeltoideusLateral4 = {
//    AnyRefNode &ref1 = .WrappingSegment.O_DeltoideusLateral4;
//    AnyRefNode &ref2 = ....Segments.Scapula.O_DeltoideusLateral4;
//    Ref=0;
//  };
//    AnyKinLinear m_I_DeltoideusPosterior3 = {
//    AnyRefNode &ref1 = .WrappingSegment.I_DeltoideusPosterior3;
//    AnyRefNode &ref2= ....Segments.Humerus.I_DeltoideusPosterior3;
//    Ref=0;
//  };
//
//
//  AnyKinEq Constraint = {
//    RigidBodyAverageMeasure CombinationMeasure(ROTATIONAL=On, LINEAR=On,POWER =1) = {
//
//      LocalReferenceFrame = &..WrappingSegment.LocalReferenceFrame_ConstraintNode;
//      InputMeasures = {
//        &..m_O_DeltoideusPosterior1,
//        &..m_O_DeltoideusPosterior4,
//        &..m_O_DeltoideusLateral1,
//        &..m_O_DeltoideusLateral4,
//        &..m_gh_joint,
//        &..HumerusLateral,
//        &..HumerusAnterior,
//        &..HumerusMedial,
////        &..m_I_DeltoideusPosterior3,
//      };
//      WeightCoefficients = {1,1,8,8,2,2,2,2};
//    };
//    Reaction.Type ??= repmat(nDim, Off);
//      };
//
//  AnyReacForce ForceToGHJoint = {
//    AnyKinLinear lin ={
//      AnyRefNode &ref1=.....Segments.Humerus.gh ;
//      AnyRefNode &ref2=..WrappingSegment.gh_joint;
//      Ref = 0;
//    };
//  };
//
//  AnyReacForce MomentsToScapula =
//  {
//    AnyKinRotational rot ={
//      AnyRefFrame &ref1=..WrappingSegment;
//      AnyRefFrame &ref2=.....Segments.Scapula;
//      Type=RotVector;
//      AngVelOnOff=On;
//    };
//  };


};

AnyFolder DeltoidWrappingAnterior = {

  AnySeg WrappingSegment ={
    //^ Segment on which the wrapping ellipsoids are placed.
    //^ The segment follows scapula and humerus kinematically (using an
    //^ Averaging measure), but is dynamically attached to both clavicula
    //^ and humerus to ensure that forces on the wrapping ellipsoids are
    //^ distributed correctly between humerus and clavicula

    Mass=1e-5;
    Jii={0.0,0.0,0.0};

    r0= ScapulaRef.r0;
    //Axes0 = ScapulaRef.Axes0;

    AnySeg &ScapulaRef = ....Segments.Scapula;
    AnySeg &HumerusRef = ....Segments.Humerus;
    AnySeg &ClaviculaRef = ....Segments.Clavicula;

    AnyRefNode LocalReferenceFrame_ConstraintNode = {sRel= {0,0,0}; ARel= .ScapulaRef.Axes0;};
    AnyRefNode gh_joint = {sRel= .ScapulaRef.r0 -.r0 + (.ScapulaRef.Axes0 * .ScapulaRef.gh_rotated1.sRel')';};
    AnyRefNode clav_AnatomicalFrame = {sRel= .ClaviculaRef.r0 -.r0 + (.ClaviculaRef.Axes0 * .ClaviculaRef.AnatomicalFrame.sRel')';};//.ClaviculaRef.Scale({-0.10452, 0.00285061, -0.139346});};
    AnyRefNode O_DeltoideusAnterior1 = {sRel= .ClaviculaRef.r0 -.r0 + (.ClaviculaRef.Axes0 * .ClaviculaRef.O_DeltoideusAnterior1.sRel')';};
    AnyRefNode O_DeltoideusAnterior4 = {sRel= .ClaviculaRef.r0 -.r0 + (.ClaviculaRef.Axes0 * .ClaviculaRef.O_DeltoideusAnterior4.sRel')';};


AnyRefNode AlignmentRefNode = {
  ARel = .ScapulaRef.Axes0;
AnyRefNode p1 = {sRel=.Deltoid_Clavicula_Cyl.P1;};
AnyRefNode p2 = {sRel=.Deltoid_Clavicula_Cyl.P2;};
AnyRefNode p3 = {sRel=.Deltoid_Clavicula_Cyl.P3;};
//AnyRefNode p11 = {sRel=.Deltoid_Clavicula_Cyl.P11;};

AnyRefNode Deltoid_Clavicula_Cyl={
//    AnyVec3 P1 = ..ClaviculaRef.Scale(..ScapulaRef.Data.Deltoid_Anterior_Cyl_pos*..ScapulaRef.Mirror); //P2=.ai.sRel + VZ*Length;
//    AnyVec3 P2 = ..ScapulaRef.Scale(..ScapulaRef.Data.gh_pos*..ScapulaRef.Mirror); //P2=.ai.sRel + VZ*Length;
//    AnyVec3 P3 = ..ScapulaRef.GHReactionCenterNode.sRel;//.Scale(.Data.deltoid_cyl_P3_pos*.Mirror); //P3=.ai.sRel - VX*Radius;
    AnyVec3 P1 = (
    {{0.3980767, 0.3691687, 0.8397913},
     {-0.1614154, 0.9293562, -0.3320272},
     {-0.9030393, -0.003382927, 0.4295446}}*(..ClaviculaRef.r0-..r0)')';//(..ScapulaRef.Axes0*(..ClaviculaRef.r0-..r0)')'; //P2=.ai.sRel + VZ*Length;
    AnyVec3 P2 = ..ScapulaRef.Scale(..ScapulaRef.Data.gh_pos*..ScapulaRef.Mirror); //P2=.ai.sRel + VZ*Length;
    AnyVec3 P3 = ..ScapulaRef.GHReactionCenterNode.sRel;//.Scale(.Data.deltoid_cyl_P3_pos*.Mirror); //P3=.ai.sRel - VX*Radius;
//    AnyVec3 P4 = ..HumerusRef.gh_rotated1.sRel;
//    AnyVec3 P5 = ..HumerusRef.Scale(..HumerusRef.Data.Deltoid_hum*..HumerusRef.Mirror);

    sRel= P1;
    ARel=RotMat(sRel,P2,P3)*RotMat(pi/2,y);

    AnySurfCylinder cyl = {
      Radius= vnorm(.P2-.P3)*1.3;
//Radius= Main.HumanModel.BodyModel.Right.ShoulderArm.Muscles.WrappingSurfaces.DeltoidWrappingLateral.WrappingSegment.AlignmentRefNode.Deltoid_Scapula_Cyl_Stop3_Ant_new.cyl.Radius;
      Length= vnorm(.sRel-.P2);//vnorm(.P4-.P5);//
      CapRatio=1;
//      CenterOrigin = On;
    };
  };

  AnyRefNode Deltoid_Clavicula_Cyl_ForLateral={
//    AnyVec3 P1 = ..ClaviculaRef.Scale(..ScapulaRef.Data.Deltoid_Anterior_Cyl_pos*..ScapulaRef.Mirror); //P2=.ai.sRel + VZ*Length;
//    AnyVec3 P2 = ..ScapulaRef.Scale(..ScapulaRef.Data.gh_pos*..ScapulaRef.Mirror); //P2=.ai.sRel + VZ*Length;
//    AnyVec3 P3 = ..ScapulaRef.GHReactionCenterNode.sRel;//.Scale(.Data.deltoid_cyl_P3_pos*.Mirror); //P3=.ai.sRel - VX*Radius;
    AnyVec3 P1 = (
    {{0.3980767, 0.3691687, 0.8397913},
     {-0.1614154, 0.9293562, -0.3320272},
     {-0.9030393, -0.003382927, 0.4295446}}*(..ClaviculaRef.r0-..r0)')';//(..ScapulaRef.Axes0*(..ClaviculaRef.r0-..r0)')'; //P2=.ai.sRel + VZ*Length;
    AnyVec3 P2 = ..ScapulaRef.Scale(..ScapulaRef.Data.gh_pos*..ScapulaRef.Mirror); //P2=.ai.sRel + VZ*Length;
    AnyVec3 P3 = ..ScapulaRef.GHReactionCenterNode.sRel;//.Scale(.Data.deltoid_cyl_P3_pos*.Mirror); //P3=.ai.sRel - VX*Radius;
//    AnyVec3 P4 = ..HumerusRef.gh_rotated1.sRel;
//    AnyVec3 P5 = ..HumerusRef.Scale(..HumerusRef.Data.Deltoid_hum*..HumerusRef.Mirror);

    sRel= P1;
    ARel=RotMat(sRel,P2,P3)*RotMat(pi/2,y);

    AnySurfCylinder cyl = {
//      Radius= vnorm(.P2-.P3)*1.3;
Radius= .....DeltoidWrappingPosterior.WrappingSegment.AlignmentRefNode.Deltoid_Scapula_Cyl.cyl.Radius*0.99;
      Length= vnorm(.sRel-.P2);//vnorm(.P4-.P5);//
      CapRatio=1;
//      CenterOrigin = On;
    };
  };

};


  };


  AnyKinLinear m_clav_AnatomicalFrame = {
    AnyRefNode &ref1 = .WrappingSegment.clav_AnatomicalFrame;
    AnyRefNode &ref2 = ....Segments.Clavicula.AnatomicalFrame;
    Ref=0;
  };

  AnyKinLinear m_O_DeltoideusAnterior1 = {
    AnyRefNode &ref1 = .WrappingSegment.O_DeltoideusAnterior1;
    AnyRefNode &ref2 = ....Segments.Clavicula.O_DeltoideusAnterior1;
    Ref=0;
  };
  AnyKinLinear m_O_DeltoideusAnterior4 = {
    AnyRefNode &ref1 = .WrappingSegment.O_DeltoideusAnterior4;
    AnyRefNode &ref2 = ....Segments.Clavicula.O_DeltoideusAnterior4;
    Ref=0;
  };

    AnyKinLinear m_gh_joint = {
    AnyRefNode &ref1 = .WrappingSegment.gh_joint;
    AnyRefNode &ref2=....Segments.Humerus.gh;
    Ref=0;
  };

  AnyKinEq Constraint = {
    RigidBodyAverageMeasure CombinationMeasure(ROTATIONAL=On, LINEAR=On,POWER =1) = {

      LocalReferenceFrame = &..WrappingSegment.LocalReferenceFrame_ConstraintNode;
      InputMeasures = {
        &..m_clav_AnatomicalFrame,
        &..m_O_DeltoideusAnterior1,
        &..m_O_DeltoideusAnterior4,
        &..m_gh_joint,
      };
      WeightCoefficients = {10,0.5,0.5,10};
    };
    Reaction.Type ??= repmat(nDim, Off);
      };


  AnyReacForce ForceToGHJoint = {
    AnyKinLinear lin ={
      AnyRefNode &ref1=.....Segments.Humerus.gh ;
      AnyRefNode &ref2=..WrappingSegment.gh_joint;
      Ref = 0;
    };
  };

  AnyReacForce MomentsToCalvicula =
  {
    AnyKinRotational rot ={
      AnyRefFrame &ref1=..WrappingSegment;
      AnyRefFrame &ref2=.....Segments.Clavicula;
      Type=RotVector;
    };
  };


//-------------------------------------------------------New rake seg
AnySeg WrappingSegment_RepresentDeltoidLateral ={

  Mass=1e-5;
  Jii={0.0,0.0,0.0};

  r0= ScapulaRef.r0;
  //Axes0 = ScapulaRef.Axes0;

  AnySeg &ScapulaRef = ....Segments.Scapula;
  AnySeg &HumerusRef = ....Segments.Humerus;
  AnySeg &ClaviculaRef = ....Segments.Clavicula;

  AnyRefNode LocalReferenceFrame_ConstraintNode = {sRel= {0,0,0}; ARel= .ScapulaRef.Axes0;};
  AnyRefNode gh_joint = {sRel= .ScapulaRef.r0 -.r0 + (.ScapulaRef.Axes0 * .ScapulaRef.gh_rotated1.sRel')';ARel = .ScapulaRef.Axes0;};
  AnyRefNode O_DeltoideusLateral1 = {sRel= .ScapulaRef.r0 -.r0 + (.ScapulaRef.Axes0 * .ScapulaRef.O_DeltoideusLateral1.sRel')';};
  AnyRefNode O_DeltoideusLateral2 = {sRel= .ScapulaRef.r0 -.r0 + (.ScapulaRef.Axes0 * .ScapulaRef.O_DeltoideusLateral2.sRel')';};
  AnyRefNode O_DeltoideusLateral3 = {sRel= .ScapulaRef.r0 -.r0 + (.ScapulaRef.Axes0 * .ScapulaRef.O_DeltoideusLateral3.sRel')';};
  AnyRefNode O_DeltoideusLateral4 = {sRel= .ScapulaRef.r0 -.r0 + (.ScapulaRef.Axes0 * .ScapulaRef.O_DeltoideusLateral4.sRel')';};
  AnyRefNode I_DeltoideusLateral1 = {sRel= .HumerusRef.r0 -.r0 + (.HumerusRef.Axes0 * .HumerusRef.I_DeltoideusLateral1.sRel')';};
  AnyRefNode I_DeltoideusLateral2 = {sRel= .HumerusRef.r0 -.r0 + (.HumerusRef.Axes0 * .HumerusRef.I_DeltoideusLateral2.sRel')';};
  //    AnyRefNode I_DeltoideusLateral4 = {sRel= .HumerusRef.r0 -.r0 + (.HumerusRef.Axes0 * .HumerusRef.I_DeltoideusLateral4.sRel')';};
  //    AnyRefNode O_DeltoideusAnterior1 = {sRel= .ClaviculaRef.r0 -.r0 + (.ClaviculaRef.Axes0 * .ClaviculaRef.O_DeltoideusAnterior1.sRel')';};
  AnyRefNode O_DeltoideusAnterior1 = {sRel= .ClaviculaRef.r0 -.r0 + (.ClaviculaRef.Axes0 * .ClaviculaRef.O_DeltoideusAnterior1.sRel')';};

  AnyRefNode MidOriginDeltoidLateral = {sRel= 0.5*(.O_DeltoideusLateral2.sRel+.O_DeltoideusLateral3.sRel);
    ARel = RotMat(.O_DeltoideusLateral2.sRel,.O_DeltoideusLateral3.sRel,.I_DeltoideusLateral2.sRel);};
  AnyRefNode MidOriginDeltoidLateral_Normal = {sRel= 0.5*(.O_DeltoideusLateral2.sRel+.O_DeltoideusLateral3.sRel);
    ARel = RotMat(.I_DeltoideusLateral2.sRel,.MidOriginDeltoidLateral.sRel,.gh_joint.sRel);};


  AnyRefNode DL3OriginDeltoidLateral_Normal = {sRel= .O_DeltoideusLateral3.sRel;
    ARel = RotMat(.I_DeltoideusLateral2.sRel,.O_DeltoideusLateral3.sRel,.gh_joint.sRel);};
  AnyRefNode DL4OriginDeltoidLateral_Normal = {sRel= .O_DeltoideusLateral4.sRel;
    ARel = RotMat(.I_DeltoideusLateral2.sRel,.O_DeltoideusLateral4.sRel,.gh_joint.sRel);};

  AnyRefNode O_DeltoideusLateralMid = {sRel= .ScapulaRef.r0 -.r0 + (.ScapulaRef.Axes0 * 0.5* (.ScapulaRef.O_DeltoideusLateral2.sRel+.ScapulaRef.O_DeltoideusLateral3.sRel)')';};
  AnyRefNode gh_joint_tilted = {sRel= .ScapulaRef.r0 -.r0 + (.ScapulaRef.Axes0 * .ScapulaRef.gh_rotated1.sRel')';ARel = .Axes0'*RotMat(-pi/6,x);};
  AnyRefNode O_DeltoideusLateralMid_Aligned = {sRel= .O_DeltoideusLateralMid.sRel;
    ARel = RotMat(.O_DeltoideusLateral2.sRel,.O_DeltoideusLateral3.sRel,.gh_joint.sRel);};

  //  AnyRefNode DL3ViaDeltoidLateral_Normal = {sRel= .ViaNode1_DL3.sRel;
//    ARel = RotMat(.I_DeltoideusLateral2.sRel,.ViaNode1_DL3.sRel,.gh_joint.sRel);};


// Via nodes made with O_DeltoideusLateralOut instead of O_DeltoideusLateral2
  AnyRefNode O_DeltoideusLateralMid3_4 = {sRel= (.O_DeltoideusLateral3.sRel+.O_DeltoideusLateral4.sRel)/2;};
  AnyRefNode DL3OriginDeltoidLateral_Normal_mid3_4 = {sRel= .O_DeltoideusLateralMid3_4.sRel;
    ARel = RotMat(.I_DeltoideusLateral2.sRel,.O_DeltoideusLateralMid3_4.sRel,.gh_joint.sRel);};


//-----------------------------------------------------Via nodes ON THE SPHERE manual vianode placement
AnyFloat DirectionVia1 = {-1.3,-1,0}/vnorm({-1.3,-1,0});
AnyFloat RadiusVia1 = WrappingShpereCylRadius.Radius;
//AnyFloat RadiusVia1 = ScapulaRef.DeltoidLateral_NormaltoScapula.cyl.Radius;
AnyFloat CoordinateDirectionMid = RotMat(I_DeltoideusLateral2.sRel,DL3OriginDeltoidLateral_Normal_mid3_4.sRel,gh_joint.sRel);
AnyFloat CoordinateDirection = RotMat(I_DeltoideusLateral2.sRel,DL3OriginDeltoidLateral_Normal.sRel,gh_joint.sRel);
  AnyRefNode ViaNode1_DL1 = {sRel= .O_DeltoideusLateral1.sRel + (.CoordinateDirectionMid* .DirectionVia1')'*.RadiusVia1*0.6;
    ARel = RotMat(.I_DeltoideusLateral2.sRel,.O_DeltoideusLateral1.sRel,.gh_joint.sRel);};
  AnyRefNode ViaNode1_DL2 = {sRel= .O_DeltoideusLateral2.sRel + (.CoordinateDirectionMid* .DirectionVia1')'*.RadiusVia1*0.8;
    ARel = RotMat(.I_DeltoideusLateral2.sRel,.O_DeltoideusLateral2.sRel,.gh_joint.sRel);};
  AnyRefNode ViaNode1_DL3 = {sRel= .O_DeltoideusLateral3.sRel + (.CoordinateDirectionMid* .DirectionVia1')'*.RadiusVia1;
    ARel = RotMat(.I_DeltoideusLateral2.sRel,.O_DeltoideusLateral3.sRel,.gh_joint.sRel);};
  AnyRefNode ViaNode1_DL4 = {sRel= .O_DeltoideusLateral4.sRel + (RotMat(.I_DeltoideusLateral2.sRel,.O_DeltoideusLateral4.sRel,.gh_joint.sRel)* .DirectionVia1')'*.RadiusVia1;
    ARel = RotMat(.I_DeltoideusLateral2.sRel,.O_DeltoideusLateral4.sRel,.gh_joint.sRel);};


  AnySurfPlaneFit MidDeltoidSurface = {
    Points = {.MidOriginDeltoidLateral.sRel,.gh_joint.sRel,.I_DeltoideusLateral2.sRel};
  };
  AnySurfPlaneFit DL4DeltoidSurface = {
    Points = {.DL4OriginDeltoidLateral_Normal.sRel,.gh_joint.sRel,.I_DeltoideusLateral2.sRel};
  };
  AnySurfPlaneFit DL3_HumI1_DeltoidSurface = {
    Points = {.DL3OriginDeltoidLateral_Normal.sRel,.gh_joint.sRel,.I_DeltoideusLateral1.sRel};
  };
  AnySurfPlaneFit DLmid3_4_HumI1_DeltoidSurface = {
    Points = {.DL3OriginDeltoidLateral_Normal_mid3_4.sRel,.gh_joint.sRel,.I_DeltoideusLateral1.sRel};
  };
  AnySurfPlaneFit DL4_Via_DeltoidSurface = {
    Points = {.ViaNode1_DL4.sRel,.gh_joint.sRel,.I_DeltoideusLateral1.sRel};
  };

  AnySurfSphere WrappingShpereDL1 = { sRel = .gh_joint.sRel; Radius = vnorm(sRel-.O_DeltoideusLateral1.sRel)*0.95; };
  AnySurfSphere WrappingShpereDL2 = { sRel = .gh_joint.sRel; Radius = vnorm(sRel-.O_DeltoideusLateral2.sRel)*0.95; };
  AnySurfSphere WrappingShpereDL3 = { sRel = .gh_joint.sRel; Radius = vnorm(sRel-.O_DeltoideusLateral3.sRel)*0.95; };
  AnySurfSphere WrappingShpereDL4 = { sRel = .gh_joint.sRel; Radius = vnorm(sRel-.O_DeltoideusLateral4.sRel)*0.95; };
  AnySurfSphere WrappingShpereCylRadius = { sRel = .gh_joint.sRel; Radius = ...DeltoidWrappingPosterior.WrappingSegment.AlignmentRefNode.Deltoid_Scapula_Cyl.cyl.Radius*1.01; };

  AnyRefNode WrappingShpere_LatSurfNode = {sRel= .gh_joint.sRel + .WrappingShpereCylRadius.Radius*{0,0,1};};
  AnyRefNode WrappingShpere_InfSurfNode = {sRel= .gh_joint.sRel + .WrappingShpereCylRadius.Radius*{0,-1,0};};
  AnyRefNode FillGap_CenterSphere = {sRel= .gh_joint.sRel+{-0.01,0.006,-0.006};};
  AnySurfSphere FillGap_Sphere = { sRel = .FillGap_CenterSphere.sRel;
    Radius = vnorm(.WrappingShpere_InfSurfNode.sRel - .O_DeltoideusLateral3.sRel)/2; };


AnyRefNode FillGap_Cyl={
  AnyVec3 P1 = .FillGap_CenterSphere.sRel;

  sRel= .FillGap_CenterSphere.sRel;
  ARel= .ScapulaRef.Axes0*...DeltoidWrappingPosterior.WrappingSegment.AlignmentRefNode.Represent_Infraspinatus_Cyl.ARel*RotMat(pi,x);


  AnySurfCylinder cyl = {
    Radius= vnorm(..WrappingShpere_InfSurfNode.sRel - ..O_DeltoideusLateral3.sRel)/2*0.9;
    Length= Radius/10;
    CapRatio=3;
    CapRatio2=1;
    AnyDrawParamSurf drw={RGB={0,0,1};};
  };
};


};

//-------------------------------------------------------Adding nodes on segments
WrappingSegment_RepresentDeltoidLateral.HumerusRef = {
  AnyRefNode I_DeltoideusLateral2_InPlane = {sRel= .I_DeltoideusLateral2.sRel;
    ARel = RotMat(.I_DeltoideusLateral2.sRel,
    Main.HumanModel.BodyModel.Right.ShoulderArm.Muscles.WrappingSurfaces.DeltoidWrappingAnterior.WrappingSegment_RepresentDeltoidLateral.MidOriginDeltoidLateral.sRel,
    Main.HumanModel.BodyModel.Right.ShoulderArm.Muscles.WrappingSurfaces.DeltoidWrappingAnterior.WrappingSegment_RepresentDeltoidLateral.O_DeltoideusLateral3.sRel);};
  AnyRefNode gh_aligned = {sRel= .gh.sRel;
    ARel = ......Segments.Humerus.Axes0' * ......Segments.Scapula.Axes0;};

};

WrappingSegment_RepresentDeltoidLateral.ScapulaRef = {
  AnyRefNode MidOriginDeltoidLateral = {sRel= 0.5*(.O_DeltoideusLateral2.sRel+.O_DeltoideusLateral3.sRel);};
//  AnyRefNode DL3ViaDeltoidLateral_Normal =  {sRel= Main.HumanModel.BodyModel.Right.ShoulderArm.Muscles.WrappingSurfaces.DeltoidWrappingAnterior.WrappingSegment_RepresentDeltoidLateral.ViaNode_DL3.sRel;
//    ARel = RotMat(.O_DeltoideusLateral2.sRel,
//    Main.HumanModel.BodyModel.Right.ShoulderArm.Muscles.WrappingSurfaces.DeltoidWrappingAnterior.WrappingSegment_RepresentDeltoidLateral.MidOriginDeltoidLateral.sRel,
//    Main.HumanModel.BodyModel.Right.ShoulderArm.Muscles.WrappingSurfaces.DeltoidWrappingAnterior.WrappingSegment_RepresentDeltoidLateral.ViaNode_DL3.sRel);};

AnyRefNode DeltoidLateral_NormaltoScapula={
  AnyVec3 P1 = .gh.sRel;
  AnyVec3 P2 = .O_DeltoideusLateral4.sRel;
  AnyVec3 P3 = .O_DeltoideusLateral1.sRel;
  AnyVec3 P4 = .GHReactionCenterNode.sRel;

  sRel= P1;
  ARel=RotMat(P2,P3,P1)*RotMat(pi/2,y)*RotMat(pi/2,x);


  AnySurfCylinder cyl = {
    Radius= vnorm(.P1-.P4);
    Length= Radius*7;
    CapRatio=1;
    AnyDrawParamSurf drw={RGB={0,0,1};};
    //      CenterOrigin = On;
  };
};

AnyRefNode DeltoidAnterior_NormaltoScapula_TiltedStop={
  AnyVec3 P1 = .gh.sRel;
  AnyVec3 P2 = .O_DeltoideusLateral4.sRel;
  AnyVec3 P3 = .O_DeltoideusLateral1.sRel;
  AnyVec3 P4 = .GHReactionCenterNode.sRel;

  sRel= P1;
  ARel=RotMat(P2,P3,P1)*RotMat(pi/2,y)*RotMat(pi/2,x)*RotMat(-pi/10,y);


  AnySurfCylinder cyl = {
    Radius= vnorm(.P1-.P4)*1.3;
    Length= Radius*7;
    CapRatio=1;
    AnyDrawParamSurf drw={RGB={0,0,1};};
    //      CenterOrigin = On;
  };
};

AnyRefNode DeltoidPosterior_NormaltoScapula={
  AnyVec3 P1 = .gh.sRel;
  AnyVec3 P2 = .O_DeltoideusLateral4.sRel;
  AnyVec3 P3 = .O_DeltoideusLateral1.sRel;
  AnyVec3 P4 = .GHReactionCenterNode.sRel;

  sRel= P1;
  ARel=RotMat(P2,P3,P1)*RotMat(pi/2,y)*RotMat(pi/2,x)*RotMat(-pi/10,y);


  AnySurfCylinder cyl = {
    Radius= vnorm(.P1-.P4)*1.3;
    Length= Radius*7;
    CapRatio=1;
    AnyDrawParamSurf drw={RGB={0,0,1};};
    //      CenterOrigin = On;
  };
};


/////////////////////////////////////// 1st try
AnyRefNode Lat4_tilted_posterior_wrapping={
  AnyVec3 P1 = .gh.sRel;
  AnyVec3 P2 = .O_DeltoideusLateral4.sRel;
  AnyVec3 P3 = .O_DeltoideusLateral1.sRel;
  AnyVec3 P4 = .GHReactionCenterNode.sRel;

  sRel= P1+(.O_DeltoideusLateral2.sRel-.O_DeltoideusLateral3.sRel)/2;
  ARel=RotMat(P2,P3,P1)*RotMat(pi/2,y)*RotMat(pi/2,x)*RotMat(-pi/5,y);


  AnySurfCylinder cyl = {
    Radius= vnorm(.P1-.P4);
    Length= Radius*7;
    CapRatio=1;
    AnyDrawParamSurf drw={RGB={0,0,1};};
    //      CenterOrigin = On;
  };
};

//-----------Off-centered to gh with insertion diff
AnyRefNode Lat4_tilted_anterior_wrapping={
  AnyVec3 P1 = .gh.sRel;
  AnyVec3 P2 = .O_DeltoideusLateral4.sRel;
  AnyVec3 P3 = .O_DeltoideusLateral1.sRel;
  AnyVec3 P4 = .GHReactionCenterNode.sRel;

  sRel= P1+(..O_DeltoideusAnterior1.sRel-..O_DeltoideusLateral4.sRel);
  ARel=RotMat(P2,P3,P1)*RotMat(pi/2,y)*RotMat(pi/2,x)*RotMat(pi/5,x);


  AnySurfCylinder cyl = {
    Radius= vnorm(.P1-.P4);
    Length= Radius*7;
    CapRatio=1;
    AnyDrawParamSurf drw={RGB={0,0,1};};
    //      CenterOrigin = On;
  };
};

AnyRefNode Lat1_tilted_anterior_wrapping={
  AnyVec3 P1 = .gh.sRel;
  AnyVec3 P2 = .O_DeltoideusLateral4.sRel;
  AnyVec3 P3 = .O_DeltoideusLateral1.sRel;
  AnyVec3 P4 = .GHReactionCenterNode.sRel;

  sRel= P1+0.1*(-.O_DeltoideusLateral2.sRel+.O_DeltoideusLateral3.sRel);
  ARel=RotMat(P2,P3,P1)*RotMat(pi/2,y)*RotMat(pi/2,x)*RotMat(-pi/10,y);

    AnySurfCylinder cyl = {
    Radius= vnorm(.P1-.P4)*1.2;
    Length= Radius*3;
    CapRatio=1;
    AnyDrawParamSurf drw={RGB={0,0,1};};
    //      CenterOrigin = On;
  };
};
AnyRefNode Lat2_tilted_anterior_wrapping={
  AnyVec3 P1 = .gh.sRel;
  AnyVec3 P2 = .O_DeltoideusLateral4.sRel;
  AnyVec3 P3 = .O_DeltoideusLateral1.sRel;
  AnyVec3 P4 = .GHReactionCenterNode.sRel;

  sRel= P1+1.2*(-.O_DeltoideusLateral2.sRel+.O_DeltoideusLateral3.sRel)+
  0.3*(-Main.HumanModel.BodyModel.Right.ShoulderArm.Muscles.WrappingSurfaces.LateralDeltoid_ViaNodeSegment.O_DeltoideusLateral2.sRel+Main.HumanModel.BodyModel.Right.ShoulderArm.Muscles.WrappingSurfaces.LateralDeltoid_ViaNodeSegment.ViaNode1_DL2.sRel);
  ARel=RotMat(P2,P3,P1)*RotMat(pi/2,y)*RotMat(pi/2,x)*RotMat(-pi/10,y);


  AnySurfCylinder cyl = {
    Radius= vnorm(.P1-.P4)*1.2;
    Length= Radius*3;
    CapRatio=1;
    AnyDrawParamSurf drw={RGB={0,0,1};};
    //      CenterOrigin = On;
  };
};

AnyRefNode Lat3_tilted_anterior_wrapping={
  AnyVec3 P1 = .gh.sRel;
  AnyVec3 P2 = .O_DeltoideusLateral4.sRel;
  AnyVec3 P3 = .O_DeltoideusLateral1.sRel;
  AnyVec3 P4 = .GHReactionCenterNode.sRel;

  sRel= P1+(-.O_DeltoideusLateral2.sRel+.O_DeltoideusLateral3.sRel)*2+
    0.0*(-Main.HumanModel.BodyModel.Right.ShoulderArm.Muscles.WrappingSurfaces.LateralDeltoid_ViaNodeSegment.O_DeltoideusLateral3.sRel+Main.HumanModel.BodyModel.Right.ShoulderArm.Muscles.WrappingSurfaces.LateralDeltoid_ViaNodeSegment.ViaNode1_DL3.sRel);
  ARel=RotMat(P2,P3,P1)*RotMat(pi/2,y)*RotMat(pi/2,x)*RotMat(-pi/10,y);


  AnySurfCylinder cyl = {
    Radius= vnorm(.P1-.P4)*1.2;
    Length= Radius*3;
    CapRatio=1;
    AnyDrawParamSurf drw={RGB={0,0,1};};
    //      CenterOrigin = On;
  };
};


};

AnyRevoluteJoint Revolute_WrappingSegment_RepresentDeltoidLateral = {
  Axis = x;
  AnyRefFrame &Scapula = .WrappingSegment_RepresentDeltoidLateral.ScapulaRef.O_DeltoideusLateralMid_Aligned;
  AnyRefFrame &wrappingSeg = .WrappingSegment_RepresentDeltoidLateral.O_DeltoideusLateralMid_Aligned;
};


////-------------------------------------------------------Fix to Scapula
  AnyKinEqSimpleDriver WrappingSegment_RepresentDeltoidLateral_FixToScapula ={
  AnyKinLinear lin = {
    Ref=0;
    AnyRefFrame &LayerNode = ..WrappingSegment_RepresentDeltoidLateral.ScapulaRef.gh_tilted;
    AnyRefNode &ref=..WrappingSegment_RepresentDeltoidLateral.gh_joint_tilted;
  };
  MeasureOrganizer ={0};
    DriverPos =repmat(nDim,0);
    DriverVel =repmat(nDim,0);
    Reaction.Type ??=repmat(nDim,Off);
  };


};


/////////////////////////////////////////// LateralDeltoid_ViaNodeSegment
AnySeg LateralDeltoid_ViaNodeSegment ={

  Mass=1e-5;
  Jii={0.0,0.0,0.0};

  r0= ScapulaRef.r0;
  //Axes0 = ScapulaRef.Axes0;

  AnySeg &ScapulaRef = ...Segments.Scapula;
  AnySeg &HumerusRef = ...Segments.Humerus;
  AnySeg &ClaviculaRef = ...Segments.Clavicula;

  AnyRefNode LocalReferenceFrame_ConstraintNode = {sRel= {0,0,0}; ARel= .ScapulaRef.Axes0;};
  AnyRefNode gh_joint = {sRel= .ScapulaRef.r0 -.r0 + (.ScapulaRef.Axes0 * .ScapulaRef.gh_rotated1.sRel')';ARel = .ScapulaRef.Axes0;};
  AnyRefNode O_DeltoideusLateral1 = {sRel= .ScapulaRef.r0 -.r0 + (.ScapulaRef.Axes0 * .ScapulaRef.O_DeltoideusLateral1.sRel')';};
  AnyRefNode O_DeltoideusLateral2 = {sRel= .ScapulaRef.r0 -.r0 + (.ScapulaRef.Axes0 * .ScapulaRef.O_DeltoideusLateral2.sRel')';};
  AnyRefNode O_DeltoideusLateral3 = {sRel= .ScapulaRef.r0 -.r0 + (.ScapulaRef.Axes0 * .ScapulaRef.O_DeltoideusLateral3.sRel')';};
  AnyRefNode O_DeltoideusLateral4 = {sRel= .ScapulaRef.r0 -.r0 + (.ScapulaRef.Axes0 * .ScapulaRef.O_DeltoideusLateral4.sRel')';};
  AnyRefNode I_DeltoideusLateral1 = {sRel= .HumerusRef.r0 -.r0 + (.HumerusRef.Axes0 * .HumerusRef.I_DeltoideusLateral1.sRel')';};
  AnyRefNode I_DeltoideusLateral2 = {sRel= .HumerusRef.r0 -.r0 + (.HumerusRef.Axes0 * .HumerusRef.I_DeltoideusLateral2.sRel')';};
  AnyRefNode O_DeltoideusLateralMid = {sRel= .ScapulaRef.r0 -.r0 + (.ScapulaRef.Axes0 * 0.5* (.ScapulaRef.O_DeltoideusLateral2.sRel+.ScapulaRef.O_DeltoideusLateral3.sRel)')';};
  AnyRefNode gh_joint_tilted = {sRel= .ScapulaRef.r0 -.r0 + (.ScapulaRef.Axes0 * .ScapulaRef.gh_rotated1.sRel')';ARel = .Axes0'*RotMat(-pi/6,x);};
  AnyRefNode O_DeltoideusLateral3_tilted = {sRel= .O_DeltoideusLateral3.sRel;
    ARel = RotMat(.O_DeltoideusLateral2.sRel,.O_DeltoideusLateral3.sRel,.ViaNode1_DL3.sRel)*RotMat(pi/2,x);
  };

    AnyRefNode O_DeltoideusLateralMid_Aligned = {sRel= .O_DeltoideusLateralMid.sRel;
    ARel = RotMat(.O_DeltoideusLateral2.sRel,.O_DeltoideusLateral3.sRel,.gh_joint.sRel);};

  AnyRefNode MidOriginDeltoidLateral = {sRel= 0.5*(.O_DeltoideusLateral2.sRel+.O_DeltoideusLateral3.sRel);
    ARel = RotMat(.O_DeltoideusLateral2.sRel,.O_DeltoideusLateral3.sRel,.I_DeltoideusLateral2.sRel);};
  AnyRefNode MidOriginDeltoidLateral_Normal = {sRel= 0.5*(.O_DeltoideusLateral2.sRel+.O_DeltoideusLateral3.sRel);
    ARel = RotMat(.I_DeltoideusLateral2.sRel,.MidOriginDeltoidLateral.sRel,.gh_joint.sRel);};


  AnyRefNode DL3OriginDeltoidLateral_Normal = {sRel= .O_DeltoideusLateral3.sRel;
    ARel = RotMat(.I_DeltoideusLateral2.sRel,.O_DeltoideusLateral3.sRel,.gh_joint.sRel);};
  AnyRefNode DL4OriginDeltoidLateral_Normal = {sRel= .O_DeltoideusLateral4.sRel;
    ARel = RotMat(.I_DeltoideusLateral2.sRel,.O_DeltoideusLateral4.sRel,.gh_joint.sRel);};

// Via nodes made with O_DeltoideusLateralOut instead of O_DeltoideusLateral2
  AnyRefNode O_DeltoideusLateralMid3_4 = {sRel= (.O_DeltoideusLateral3.sRel+.O_DeltoideusLateral4.sRel)/2;};
  AnyRefNode DL3OriginDeltoidLateral_Normal_mid3_4 = {sRel= .O_DeltoideusLateralMid3_4.sRel;
    ARel = RotMat(.I_DeltoideusLateral2.sRel,.O_DeltoideusLateralMid3_4.sRel,.gh_joint.sRel);};

    AnySurfPlaneFit MidDeltoidSurface = {
    Points = {.MidOriginDeltoidLateral.sRel,.gh_joint.sRel,.I_DeltoideusLateral2.sRel};
  };
  AnySurfPlaneFit DL4DeltoidSurface = {
    Points = {.DL4OriginDeltoidLateral_Normal.sRel,.gh_joint.sRel,.I_DeltoideusLateral2.sRel};
  };
  AnySurfPlaneFit DL3_HumI1_DeltoidSurface = {
    Points = {.DL3OriginDeltoidLateral_Normal.sRel,.gh_joint.sRel,.I_DeltoideusLateral1.sRel};
  };
  AnySurfPlaneFit DLmid3_4_HumI1_DeltoidSurface = {
    Points = {.DL3OriginDeltoidLateral_Normal_mid3_4.sRel,.gh_joint.sRel,.I_DeltoideusLateral1.sRel};
  };
  AnySurfPlaneFit DL4_Via_DeltoidSurface = {
    Points = {.ViaNode1_DL4.sRel,.gh_joint.sRel,.I_DeltoideusLateral1.sRel};
  };

  AnySurfSphere WrappingShpereCylRadius = { sRel = .gh_joint.sRel; Radius = ..DeltoidWrappingPosterior.WrappingSegment.AlignmentRefNode.Deltoid_Scapula_Cyl.cyl.Radius*1.01; };

//-----------------------------------------------------Via nodes ON THE SPHERE manual vianode placement
AnyFloat DirectionVia1 = {-1.3,-1,0}/vnorm({-1.3,-1,0});
AnyFloat RadiusVia1 = WrappingShpereCylRadius.Radius *1;
//AnyFloat RadiusVia1 = ScapulaRef.DeltoidLateral_NormaltoScapula.cyl.Radius;
AnyFloat CoordinateDirectionMid = RotMat(I_DeltoideusLateral2.sRel,DL3OriginDeltoidLateral_Normal_mid3_4.sRel,gh_joint.sRel);
AnyFloat CoordinateDirection = RotMat(I_DeltoideusLateral2.sRel,DL3OriginDeltoidLateral_Normal.sRel,gh_joint.sRel);
  AnyRefNode ViaNode1_DL1 = {sRel= .O_DeltoideusLateral1.sRel + (.CoordinateDirectionMid* .DirectionVia1')'*.RadiusVia1*0.8;//0.6;
    ARel = RotMat(.I_DeltoideusLateral2.sRel,.O_DeltoideusLateral1.sRel,.gh_joint.sRel);};
  AnyRefNode ViaNode1_DL2 = {sRel= .O_DeltoideusLateral2.sRel + (.CoordinateDirectionMid* .DirectionVia1')'*.RadiusVia1*0.8;
    ARel = RotMat(.I_DeltoideusLateral2.sRel,.O_DeltoideusLateral2.sRel,.gh_joint.sRel);};
  AnyRefNode ViaNode1_DL3 = {sRel= .O_DeltoideusLateral3.sRel + (.CoordinateDirectionMid* .DirectionVia1')'*.RadiusVia1;
    ARel = RotMat(.I_DeltoideusLateral2.sRel,.O_DeltoideusLateral3.sRel,.gh_joint.sRel);};
//  AnyRefNode ViaNode1_DL4 = {sRel= .O_DeltoideusLateral4.sRel + (RotMat(.I_DeltoideusLateral2.sRel,.O_DeltoideusLateral4.sRel,.gh_joint.sRel)* .DirectionVia1')'*.RadiusVia1;
//    ARel = RotMat(.I_DeltoideusLateral2.sRel,.O_DeltoideusLateral4.sRel,.gh_joint.sRel);};
  AnyRefNode ViaNode1_DL4 = {sRel=
    (.O_DeltoideusLateral4.sRel + (RotMat(.I_DeltoideusLateral2.sRel,.O_DeltoideusLateral4.sRel,.gh_joint.sRel)* .DirectionVia1')'*.RadiusVia1+
    .O_DeltoideusLateral4.sRel + (.CoordinateDirectionMid* .DirectionVia1')' *.RadiusVia1)/2;
    ARel = RotMat(.I_DeltoideusLateral2.sRel,.O_DeltoideusLateral4.sRel,.gh_joint.sRel);};

  AnyRefNode ViaNode4 = {sRel = .ViaNode1_DL4.sRel;
    ARel = RotMat(.ViaNode1_DL4.sRel,.O_DeltoideusLateral4.sRel,.gh_joint.sRel);};

  AnyRefNode GHVia4 = {sRel = .gh_joint.sRel;
    ARel = RotMat(.gh_joint.sRel,..LateralDeltoid_ViaNodeSegment.r0-.r0+(..LateralDeltoid_ViaNodeSegment.Axes0*..LateralDeltoid_ViaNodeSegment.ViaNode1_DL4.sRel')',.O_DeltoideusLateral4.sRel) * RotMat(pi,x);

    AnyRefNode I_DeltoideusLateral4 = {sRel= (..Axes0'*.ARel' * (..HumerusRef.r0 -..r0 - .sRel+ (..HumerusRef.Axes0 * ..HumerusRef.I_DeltoideusLateral4.sRel')' )')';};
    AnyRefNode I_DeltoideusLateral4_projected = {sRel= {0,.I_DeltoideusLateral4.sRel[1],.I_DeltoideusLateral4.sRel[2]};};

    AnyVector I_DeltoideusLateral4_localGHVia4 = (.Axes'*Axes' * (.HumerusRef.r -.r - sRel+ (.HumerusRef.Axes * .HumerusRef.I_DeltoideusLateral4.sRel')' )')';
    AnyVector I_DeltoideusLateral4_localGHVia4_projected = {0,I_DeltoideusLateral4_localGHVia4[1],I_DeltoideusLateral4_localGHVia4[2]};

    AnyRefNode projected_ViaOrg = {sRel = {0,0.05,0};};
  };


  AnyVector I_DeltoideusLateral4_localGHVia4_0 = (
  GHVia4.ARel * (HumerusRef.r0 - GHVia4.sRel + (HumerusRef.Axes0 * HumerusRef.I_DeltoideusLateral4.sRel')' )'
  )' -r0;
  AnyVector I_DeltoideusLateral4_plane_0 = {0,I_DeltoideusLateral4_localGHVia4_0[1],I_DeltoideusLateral4_localGHVia4_0[2]};

  AnyRefNode projected_ins4= {sRel= .I_DeltoideusLateral4_localGHVia4_0;};
  AnyRefNode projected_ins4plane= {sRel= .I_DeltoideusLateral4_plane_0;};
};

///////////////////
LateralDeltoid_ViaNodeSegment.ScapulaRef = {
  AnyRefNode O_DeltoideusLateralMid_Aligned = {sRel= (.O_DeltoideusLateral2.sRel+.O_DeltoideusLateral3.sRel)/2;
    ARel = RotMat(.O_DeltoideusLateral2.sRel,.O_DeltoideusLateral3.sRel,.gh.sRel);};
  AnyRefNode gh_tilted = {sRel= .gh.sRel; ARel = .Axes0'*RotMat(-pi/6,x);};
//  AnyRefNode O_DeltoideusLateral3_tilted = {sRel= .O_DeltoideusLateral3.sRel; ARel = .Axes0'*RotMat(pi/4,x);};

AnyRefNode ViaNode1_DL3 = {sRel= (.Axes0'*.....Muscles.WrappingSurfaces.LateralDeltoid_ViaNodeSegment.ViaNode1_DL3.sRel')';};
  AnyRefNode O_DeltoideusLateral3_tilted = {sRel= .O_DeltoideusLateral3.sRel;
    ARel = RotMat(.O_DeltoideusLateral2.sRel,.O_DeltoideusLateral3.sRel,.ViaNode1_DL3.sRel)*RotMat(-pi/2,x);
  };

};

LateralDeltoid_ViaNodeSegment.HumerusRef = {
  AnyRefNode gh_tilted = {sRel= .gh.sRel; ARel = .Axes0'*RotMat(-pi/6,x);};
//  AnyRefNode O_DeltoideusLateral3_tilted = {sRel= ..O_DeltoideusLateral3.sRel; ARel = .Axes0'*RotMat(-pi/4,x);};
};

///////////////////


AnyRevoluteJoint Revolute_LateralDeltoid_ViaNodeSegment = {
  Axis = x;
  AnyRefFrame &Scapula = .LateralDeltoid_ViaNodeSegment.ScapulaRef.O_DeltoideusLateralMid_Aligned;
  AnyRefFrame &wrappingSeg = .LateralDeltoid_ViaNodeSegment.O_DeltoideusLateralMid_Aligned;
};


////-------------------------------------------------------Norm measure
AnyKinMeasureOrg StopperOnScapula={
  AnyKinLinear lin = {
    Ref=0;
    AnyRefFrame &LayerNode = ..LateralDeltoid_ViaNodeSegment.ScapulaRef.O_DeltoideusLateral3_tilted;
    AnyRefNode &ref=..LateralDeltoid_ViaNodeSegment.ViaNode1_DL3;
  };
  MeasureOrganizer ={1};
};

AnyKinMeasureOrg MovingWithHumerus={
  AnyKinLinear lin = {
    Ref=0;
    AnyRefNode &ref=..LateralDeltoid_ViaNodeSegment.O_DeltoideusLateral3_tilted;
    AnyRefFrame &LayerNode = ..LateralDeltoid_ViaNodeSegment.HumerusRef.I_DeltoideusLateral1;
  };
  MeasureOrganizer ={1};
};

AnyKinMeasureExpComb Norm ={
  a ??= -400;
  AnyKinMeasureOrg &ref=.StopperOnScapula;
  AnyKinMeasure &MeasureLayer = .MovingWithHumerus;
};

AnyKinEqSimpleDriver NormDrivers ={
  AnyKinMeasure &norm=.Norm;
  DriverPos =repmat(nDim,0);
  DriverVel =repmat(nDim,0);
  Reaction.Type ??=repmat(nDim,Off);
};


//----------------------------------------------------------- LateralDeltoidBendAngle
  AnySeg LateralDeltoid_BendAngleSegment ={

  Mass=1e-5;
  Jii={0.0,0.0,0.0};

  r0= ScapulaRef.r0;
  //Axes0 = ScapulaRef.Axes0;

  AnySeg &ScapulaRef = ...Segments.Scapula;
  AnySeg &HumerusRef = ...Segments.Humerus;
  AnySeg &ClaviculaRef = ...Segments.Clavicula;

  AnyRefNode LocalReferenceFrame_ConstraintNode = {sRel= {0,0,0}; ARel= .ScapulaRef.Axes0;};
  AnyRefNode gh_joint = {sRel= .ScapulaRef.r0 -.r0 + (.ScapulaRef.Axes0 * .ScapulaRef.gh_rotated1.sRel')';ARel = .ScapulaRef.Axes0;};
  AnyRefNode O_DeltoideusLateral1 = {sRel= .ScapulaRef.r0 -.r0 + (.ScapulaRef.Axes0 * .ScapulaRef.O_DeltoideusLateral1.sRel')';};
  AnyRefNode O_DeltoideusLateral2 = {sRel= .ScapulaRef.r0 -.r0 + (.ScapulaRef.Axes0 * .ScapulaRef.O_DeltoideusLateral2.sRel')';};
  AnyRefNode O_DeltoideusLateral3 = {sRel= .ScapulaRef.r0 -.r0 + (.ScapulaRef.Axes0 * .ScapulaRef.O_DeltoideusLateral3.sRel')';};
  AnyRefNode O_DeltoideusLateral4 = {sRel= .ScapulaRef.r0 -.r0 + (.ScapulaRef.Axes0 * .ScapulaRef.O_DeltoideusLateral4.sRel')';};
  AnyRefNode I_DeltoideusLateral1 = {sRel= .HumerusRef.r0 -.r0 + (.HumerusRef.Axes0 * .HumerusRef.I_DeltoideusLateral1.sRel')';};
  AnyRefNode I_DeltoideusLateral2 = {sRel= .HumerusRef.r0 -.r0 + (.HumerusRef.Axes0 * .HumerusRef.I_DeltoideusLateral2.sRel')';};
  AnyRefNode I_DeltoideusLateral4 = {sRel= .HumerusRef.r0 -.r0 + (.HumerusRef.Axes0 * .HumerusRef.I_DeltoideusLateral4.sRel')';};
  AnyRefNode O_DeltoideusLateralMid = {sRel= .ScapulaRef.r0 -.r0 + (.ScapulaRef.Axes0 * 0.5* (.ScapulaRef.O_DeltoideusLateral2.sRel+.ScapulaRef.O_DeltoideusLateral3.sRel)')';};

//    AnySurfPlaneFit MidDeltoidSurface = {
//    Points = {.MidOriginDeltoidLateral.sRel,.gh_joint.sRel,.I_DeltoideusLateral2.sRel};
//  };

  AnyRefNode ViaNode4 = {sRel = ..LateralDeltoid_ViaNodeSegment.r0-.r0+(..LateralDeltoid_ViaNodeSegment.Axes0*..LateralDeltoid_ViaNodeSegment.ViaNode1_DL4.sRel')';
    ARel = RotMat(..LateralDeltoid_ViaNodeSegment.r0-.r0+(..LateralDeltoid_ViaNodeSegment.Axes0*..LateralDeltoid_ViaNodeSegment.ViaNode1_DL4.sRel')',.I_DeltoideusLateral4.sRel,.gh_joint.sRel);};

  AnyRefNode GHVia4 = {sRel = .gh_joint.sRel;
    ARel = RotMat(.gh_joint.sRel,..LateralDeltoid_ViaNodeSegment.r0-.r0+(..LateralDeltoid_ViaNodeSegment.Axes0*..LateralDeltoid_ViaNodeSegment.ViaNode1_DL4.sRel')',.I_DeltoideusLateral4.sRel);};

};

//-------------------------------------------------------3 linear
AnySphericalJoint LateralDeltoid_BendAngleSegment_Plane_Spherical = {
  AnyRefNode &ref1=...Segments.Scapula.gh ;
  AnyRefNode &ref2=.LateralDeltoid_BendAngleSegment.gh_joint;
};

//-------------------------------------------------------3 rotational
AnyKinEq DeltoidLateralSeg_Plane_HumerusConstraint = {
  MeasureOrganizer = {1,2};
  AnyKinLinear lin ={
    AnyRefNode &ref1=..LateralDeltoid_BendAngleSegment.ViaNode4;
    AnyRefNode &ref2=....Segments.Humerus.I_DeltoideusLateral4;
    Ref = 0;
  };
};

AnyKinEq DeltoidLateralSeg_Plane_ScapulaConstraint = {
  MeasureOrganizer = {2};
  AnyKinLinear lin ={
    AnyRefNode &ref1=..LateralDeltoid_BendAngleSegment.ViaNode4;
    AnyRefNode &ref2=..LateralDeltoid_ViaNodeSegment.ViaNode1_DL4;
    Ref = 0;
  };
};

//------------------------------------------------------------dot product
AnyFolder LateralDeltoidBendAngle = {

  //----------------measure angle between lines via-org and vio-ins
  AnyVector ViaOrg= ..DeltoideusLateral.DeltoideusLateral4.Org.r - ..DeltoideusLateral.DeltoideusLateral4.Via1.r;
  AnyVector ViaIns= ..DeltoideusLateral.DeltoideusLateral4.Ins.r - ..DeltoideusLateral.DeltoideusLateral4.Via1.r;
  AnyFloat norm_ViaOrg = vnorm(ViaOrg);
  AnyFloat norm_ViaIns = vnorm(ViaIns);
  AnyFloat Lat4_BendAngle_Lines = acos( (ViaOrg[0]*ViaIns[0]+ViaOrg[1]*ViaIns[1]+ViaOrg[2]*ViaIns[2])/ (norm_ViaOrg*norm_ViaIns) ) * 180/pi;

  //----------------measure angle around gh
  AnyKinMeasureOrg Lat4_BendAngle_AroundGH_mes =
  {
    MeasureOrganizer = {0};

    AnyKinRotational rot_mes =
    {
      Type = RotAxesAngles;
      Axis1 = x;
      Axis2 = y;
      Axis3 = z;
      AnyRefFrame &ViaNodeSegment = ...LateralDeltoid_ViaNodeSegment.GHVia4;
      AnyRefFrame &BendAngleSegment = ...LateralDeltoid_BendAngleSegment.GHVia4;
    };
  };
  AnyFloat Lat4_BendAngle_AroundGH = Lat4_BendAngle_AroundGH_mes.Pos * 180/pi;


  AnySeg &ScapulaRef = ...Segments.Scapula;
  AnySeg &HumerusRef = ...Segments.Humerus;
  AnySeg &ClaviculaRef = ...Segments.Clavicula;

  AnyVector I_DeltoideusLateral4_localGHVia4 = (
  .LateralDeltoid_ViaNodeSegment.GHVia4.Axes' * (HumerusRef.r -.LateralDeltoid_ViaNodeSegment.GHVia4.r + (HumerusRef.Axes * HumerusRef.I_DeltoideusLateral4.sRel')' )'
  )' ;
  AnyVector I_DeltoideusLateral4_plane = {0,I_DeltoideusLateral4_localGHVia4[1],I_DeltoideusLateral4_localGHVia4[2]};

  AnyVector projected_ViaOrg= (.LateralDeltoid_ViaNodeSegment.Axes* .LateralDeltoid_ViaNodeSegment.GHVia4.Axes * {0,0.01,0}')';
  AnyVector projected_ins= .LateralDeltoid_ViaNodeSegment.GHVia4.I_DeltoideusLateral4_localGHVia4_projected;
  AnyFloat norm_projected_ViaOrg = vnorm(projected_ViaOrg);
  AnyFloat norm_projected_ins = vnorm(projected_ins);
  AnyFloat Lat4_BendAngle_projected = acos( (projected_ViaOrg[0]*projected_ins[0]+projected_ViaOrg[1]*projected_ins[1]+projected_ViaOrg[2]*projected_ins[2])/ (norm_projected_ViaOrg*norm_projected_ins) ) * 180/pi;
//  AnyVector Angle= ;

//    AnyVector I_DeltoideusLateral4_localGHVia4 = (.Axes'*Axes' * (.HumerusRef.r -.r - sRel+ (.HumerusRef.Axes * .HumerusRef.I_DeltoideusLateral4.sRel')' )')';

};
