//This is included from jnt.any when no shoulder rhythm is included.
// This is its own include file, so the calibration studies can reuse
// the drivers.

//Replaced by rhythm.
AnyKinEqSimpleDriver ScapulaTSThoraxNodeDriver =
{
  AnyKinMeasure &Measure1=.ScapulaTSThoraxMeasure ;
  DriverPos = {0};
  DriverVel = {0};
  Reaction.Type = {Off};
};


//Replaced by rhythm
AnyKinEqSimpleDriver ConoideumLigamentDrv ={

  //This the position of conoid node on clavicual unscaled

  AnyVec3  ClaviculaConoidR=..Segments.Clavicula.Scale.T0(..Segments.Clavicula.conoid.sRel);

  //This the position of conoid node on clavicual unscaled
  AnyVec3  ScapulaConoidR=..Segments.Scapula.Scale.T0(..Segments.Scapula.conoid.sRel);


   AnyVec3 StandardConoidVector= ClaviculaConoidR-ScapulaConoidR;


  AnyVar ScaleFactor = vnorm (..Segments.Scapula.O_DeltoideusLateral4.sRel -..Segments.Scapula.O_DeltoideusLateral1.sRel)
  / vnorm(..Segments.Scapula.Data.O_DeltoideusLateral4_pos -..Segments.Scapula.Data.O_DeltoideusLateral1_pos) ;

  AnyFloat ScaleStdConoidVectorLength = vnorm(StandardConoidVector);

  AnyKinPLine &ref=.ConoideumLigament;
  DriverPos={ScaleStdConoidVectorLength};
  DriverVel={0};
  Reaction.Type={Off};
};
