// References to recreate structure for ammr 3.0
AnyFolder &LevatorScapulae1 = LevatorScapulae.LevatorScapulae1;
AnyFolder &LevatorScapulae2 = LevatorScapulae.LevatorScapulae2;
AnyFolder &LevatorScapulae3 = LevatorScapulae.LevatorScapulae3;
AnyFolder &LevatorScapulae4 = LevatorScapulae.LevatorScapulae4;
AnyFolder &Sternocleidomastoid1 = Sternocleidomastoid.Sternocleidomastoid1;
AnyFolder &Sternocleidomastoid2 = Sternocleidomastoid.Sternocleidomastoid2;
AnyFolder &TrapeziusScapular1 = TrapeziusScapular.TrapeziusScapular1;
AnyFolder &TrapeziusScapular2 = TrapeziusScapular.TrapeziusScapular2;
AnyFolder &TrapeziusScapular3 = TrapeziusScapular.TrapeziusScapular3;
AnyFolder &TrapeziusScapular4 = TrapeziusScapular.TrapeziusScapular4;
AnyFolder &TrapeziusScapular5 = TrapeziusScapular.TrapeziusScapular5;
AnyFolder &TrapeziusScapular6 = TrapeziusScapular.TrapeziusScapular6;
AnyFolder &TrapeziusScapular7 = TrapeziusScapular.TrapeziusScapular7;
AnyFolder &TrapeziusScapular8 = TrapeziusScapular.TrapeziusScapular8;
AnyFolder &TrapeziusScapular9 = TrapeziusScapular.TrapeziusScapular9;
AnyFolder &TrapeziusScapular10 = TrapeziusScapular.TrapeziusScapular10;
AnyFolder &TrapeziusScapular11 = TrapeziusScapular.TrapeziusScapular11;
AnyFolder &TrapeziusScapular12 = TrapeziusScapular.TrapeziusScapular12;
AnyFolder &TrapeziusScapular13 = TrapeziusScapular.TrapeziusScapular13;
AnyFolder &TrapeziusScapular14 = TrapeziusScapular.TrapeziusScapular14;
AnyFolder &TrapeziusClavicular1 = TrapeziusClavicular.TrapeziusClavicular1;
AnyFolder &TrapeziusClavicular2 = TrapeziusClavicular.TrapeziusClavicular2;
AnyFolder &TrapeziusClavicular3 = TrapeziusClavicular.TrapeziusClavicular3;
AnyFolder &TrapeziusClavicular4 = TrapeziusClavicular.TrapeziusClavicular4;
AnyFolder &TrapeziusClavicular5 = TrapeziusClavicular.TrapeziusClavicular5;
AnyFolder &TrapeziusClavicular6 = TrapeziusClavicular.TrapeziusClavicular6;
AnyFolder &BicepsBrachiiBreve = BicepsBrachiiBreve.BicepsBrachiiBreve;
AnyFolder &BicepsBrachiiLongum = BicepsBrachiiLongum.BicepsBrachiiLongum;
AnyFolder &Coracobrachialis1 = Coracobrachialis.Coracobrachialis1;
AnyFolder &Coracobrachialis2 = Coracobrachialis.Coracobrachialis2;
AnyFolder &Coracobrachialis3 = Coracobrachialis.Coracobrachialis3;
AnyFolder &Coracobrachialis4 = Coracobrachialis.Coracobrachialis4;
AnyFolder &Coracobrachialis5 = Coracobrachialis.Coracobrachialis5;
AnyFolder &Coracobrachialis6 = Coracobrachialis.Coracobrachialis6;

#if BM_ARM_DELTOID_WRAPPING == _DELTOID_WRAPPING_RAKE_
  AnyFolder &deltoideus_scapular_part_1 = DeltoideusScapular.deltoideus_scapular_part_1;
  AnyFolder &deltoideus_scapular_part_2 = DeltoideusScapular.deltoideus_scapular_part_2;
  AnyFolder &deltoideus_scapular_part_3 = DeltoideusScapular.deltoideus_scapular_part_3;
  AnyFolder &deltoideus_scapular_part_4 = DeltoideusScapular.deltoideus_scapular_part_4;
  AnyFolder &deltoideus_scapular_part_5 = DeltoideusScapular.deltoideus_scapular_part_5;
  AnyFolder &deltoideus_scapular_part_6 = DeltoideusScapular.deltoideus_scapular_part_6;
  AnyFolder &deltoideus_clavicular_part_1 = DeltoideusClavicular.deltoideus_clavicular_part_1;
  AnyFolder &deltoideus_clavicular_part_2 = DeltoideusClavicular.deltoideus_clavicular_part_2;
  AnyFolder &deltoideus_clavicular_part_3 = DeltoideusClavicular.deltoideus_clavicular_part_3;
  AnyFolder &deltoideus_clavicular_part_4 = DeltoideusClavicular.deltoideus_clavicular_part_4;
  AnyFolder &deltoideus_clavicular_part_5 = DeltoideusClavicular.deltoideus_clavicular_part_5;
  AnyFolder &deltoideus_clavicular_part_6 = DeltoideusClavicular.deltoideus_clavicular_part_6;
#else
  AnyFolder &DeltoideusPosterior1 = DeltoideusPosterior.DeltoideusPosterior1;
  AnyFolder &DeltoideusPosterior3 = DeltoideusPosterior.DeltoideusPosterior3;
  AnyFolder &DeltoideusPosterior2 = DeltoideusPosterior.DeltoideusPosterior2;
  AnyFolder &DeltoideusPosterior4 = DeltoideusPosterior.DeltoideusPosterior4;
  AnyFolder &DeltoideusLateral1 = DeltoideusLateral.DeltoideusLateral1;
  AnyFolder &DeltoideusLateral3 = DeltoideusLateral.DeltoideusLateral3;
  AnyFolder &DeltoideusLateral2 = DeltoideusLateral.DeltoideusLateral2;
  AnyFolder &DeltoideusLateral4 = DeltoideusLateral.DeltoideusLateral4;
  AnyFolder &DeltoideusAnterior1 = DeltoideusAnterior.DeltoideusAnterior1;
  AnyFolder &DeltoideusAnterior2 = DeltoideusAnterior.DeltoideusAnterior2;
  AnyFolder &DeltoideusAnterior3 = DeltoideusAnterior.DeltoideusAnterior3;
  AnyFolder &DeltoideusAnterior4 = DeltoideusAnterior.DeltoideusAnterior4;
#endif

AnyFolder &Infraspinatus1 = Infraspinatus.Infraspinatus1;
AnyFolder &Infraspinatus2 = Infraspinatus.Infraspinatus2;
AnyFolder &Infraspinatus3 = Infraspinatus.Infraspinatus3;
AnyFolder &Infraspinatus4 = Infraspinatus.Infraspinatus4;
AnyFolder &Infraspinatus5 = Infraspinatus.Infraspinatus5;
AnyFolder &Infraspinatus6 = Infraspinatus.Infraspinatus6;
AnyFolder &LatissimusDorsi1 = LatissimusDorsi.LatissimusDorsi1;
AnyFolder &LatissimusDorsi2 = LatissimusDorsi.LatissimusDorsi2;
AnyFolder &LatissimusDorsi3 = LatissimusDorsi.LatissimusDorsi3;
AnyFolder &LatissimusDorsi4 = LatissimusDorsi.LatissimusDorsi4;
AnyFolder &LatissimusDorsi5 = LatissimusDorsi.LatissimusDorsi5;
AnyFolder &LatissimusDorsi6 = LatissimusDorsi.LatissimusDorsi6;
AnyFolder &LatissimusDorsi7 = LatissimusDorsi.LatissimusDorsi7;
AnyFolder &LatissimusDorsi8 = LatissimusDorsi.LatissimusDorsi8;
AnyFolder &LatissimusDorsi9 = LatissimusDorsi.LatissimusDorsi9;
AnyFolder &LatissimusDorsi10 = LatissimusDorsi.LatissimusDorsi10;
AnyFolder &LatissimusDorsi11 = LatissimusDorsi.LatissimusDorsi11;
AnyFolder &PectoralisMajorSternocostal1 = PectoralisMajorSternocostal.PectoralisMajorSternocostal1;
AnyFolder &PectoralisMajorSternocostal2 = PectoralisMajorSternocostal.PectoralisMajorSternocostal2;
AnyFolder &PectoralisMajorSternocostal3 = PectoralisMajorSternocostal.PectoralisMajorSternocostal3;
AnyFolder &PectoralisMajorSternocostal4 = PectoralisMajorSternocostal.PectoralisMajorSternocostal4;
AnyFolder &PectoralisMajorSternocostal5 = PectoralisMajorSternocostal.PectoralisMajorSternocostal5;
AnyFolder &PectoralisMajorSternocostal6 = PectoralisMajorSternocostal.PectoralisMajorSternocostal6;
AnyFolder &PectoralisMajorSternocostal7 = PectoralisMajorSternocostal.PectoralisMajorSternocostal7;
AnyFolder &PectoralisMajorSternocostal8 = PectoralisMajorSternocostal.PectoralisMajorSternocostal8;
AnyFolder &PectoralisMajorSternocostal9 = PectoralisMajorSternocostal.PectoralisMajorSternocostal9;
AnyFolder &PectoralisMajorSternocostal10 = PectoralisMajorSternocostal.PectoralisMajorSternocostal10;
AnyFolder &PectoralisMajorClavicular1 = PectoralisMajorClavicular.PectoralisMajorClavicular1;
AnyFolder &PectoralisMajorClavicular2 = PectoralisMajorClavicular.PectoralisMajorClavicular2;
AnyFolder &PectoralisMajorClavicular3 = PectoralisMajorClavicular.PectoralisMajorClavicular3;
AnyFolder &PectoralisMajorClavicular4 = PectoralisMajorClavicular.PectoralisMajorClavicular4;
AnyFolder &PectoralisMajorClavicular5 = PectoralisMajorClavicular.PectoralisMajorClavicular5;
AnyFolder &PectoralisMinor1 = PectoralisMinor.PectoralisMinor1;
AnyFolder &PectoralisMinor2 = PectoralisMinor.PectoralisMinor2;
AnyFolder &PectoralisMinor3 = PectoralisMinor.PectoralisMinor3;
AnyFolder &Rhomboideus1 = Rhomboideus.Rhomboideus1;
AnyFolder &Rhomboideus2 = Rhomboideus.Rhomboideus2;
AnyFolder &Rhomboideus3 = Rhomboideus.Rhomboideus3;
AnyFolder &Rhomboideus4 = Rhomboideus.Rhomboideus4;
AnyFolder &Rhomboideus5 = Rhomboideus.Rhomboideus5;
AnyFolder &Rhomboideus6 = Rhomboideus.Rhomboideus6;
AnyFolder &SerratusAnterior1 = SerratusAnterior.SerratusAnterior1;
AnyFolder &SerratusAnterior2 = SerratusAnterior.SerratusAnterior2;
AnyFolder &SerratusAnterior3 = SerratusAnterior.SerratusAnterior3;
AnyFolder &SerratusAnterior4 = SerratusAnterior.SerratusAnterior4;
AnyFolder &SerratusAnterior5 = SerratusAnterior.SerratusAnterior5;
AnyFolder &SerratusAnterior6 = SerratusAnterior.SerratusAnterior6;
AnyFolder &SerratusAnterior7 = SerratusAnterior.SerratusAnterior7;
AnyFolder &SerratusAnterior8 = SerratusAnterior.SerratusAnterior8;
AnyFolder &SerratusAnterior9 = SerratusAnterior.SerratusAnterior9;
AnyFolder &Subscapularis1 = Subscapularis.Subscapularis1;
AnyFolder &Subscapularis2 = Subscapularis.Subscapularis2;
AnyFolder &Subscapularis3 = Subscapularis.Subscapularis3;
AnyFolder &Subscapularis4 = Subscapularis.Subscapularis4;
AnyFolder &Subscapularis5 = Subscapularis.Subscapularis5;
AnyFolder &Subscapularis6 = Subscapularis.Subscapularis6;
AnyFolder &Supraspinatus1 = Supraspinatus.Supraspinatus1;
AnyFolder &Supraspinatus2 = Supraspinatus.Supraspinatus2;
AnyFolder &Supraspinatus3 = Supraspinatus.Supraspinatus3;
AnyFolder &Supraspinatus4 = Supraspinatus.Supraspinatus4;
AnyFolder &Supraspinatus5 = Supraspinatus.Supraspinatus5;
AnyFolder &Supraspinatus6 = Supraspinatus.Supraspinatus6;
AnyFolder &TeresMajor1 = TeresMajor.TeresMajor1;
AnyFolder &TeresMajor2 = TeresMajor.TeresMajor2;
AnyFolder &TeresMajor3 = TeresMajor.TeresMajor3;
AnyFolder &TeresMajor4 = TeresMajor.TeresMajor4;
AnyFolder &TeresMajor5 = TeresMajor.TeresMajor5;
AnyFolder &TeresMajor6 = TeresMajor.TeresMajor6;
AnyFolder &TeresMinor1 = TeresMinor.TeresMinor1;
AnyFolder &TeresMinor2 = TeresMinor.TeresMinor2;
AnyFolder &TeresMinor3 = TeresMinor.TeresMinor3;
AnyFolder &TeresMinor4 = TeresMinor.TeresMinor4;
AnyFolder &TeresMinor5 = TeresMinor.TeresMinor5;
AnyFolder &TeresMinor6 = TeresMinor.TeresMinor6;
AnyFolder &Brachialis1 = Brachialis.Brachialis1;
AnyFolder &Brachialis2 = Brachialis.Brachialis2;
AnyFolder &TricepsBrachiiLongum1 = TricepsBrachiiLongum.TricepsBrachiiLongum1;
AnyFolder &TricepsBrachiiLongum2 = TricepsBrachiiLongum.TricepsBrachiiLongum2;
AnyFolder &TricepsBrachiiMediale1 = TricepsBrachiiMediale.TricepsBrachiiMediale1;
AnyFolder &TricepsBrachiiMediale2 = TricepsBrachiiMediale.TricepsBrachiiMediale2;
AnyFolder &TricepsBrachiiLaterale1 = TricepsBrachiiLaterale.TricepsBrachiiLaterale1;
AnyFolder &TricepsBrachiiLaterale2 = TricepsBrachiiLaterale.TricepsBrachiiLaterale2;
AnyFolder &Brach_rad_1 = Brachioradialis.Brach_rad_1;
AnyFolder &Brach_rad_2 = Brachioradialis.Brach_rad_2;
AnyFolder &Anconeus_1 = Anconeus.Anconeus_1;
AnyFolder &Anconeus_2 = Anconeus.Anconeus_2;
AnyFolder &Pronator_teres_caput_humeral_1 = PronatorTeres.Pronator_teres_caput_humeral_1;
AnyFolder &Pronator_teres_caput_humeral_2 = PronatorTeres.Pronator_teres_caput_humeral_2;
AnyFolder &Pronator_teres_caput_ulnare_1 = PronatorTeres.Pronator_teres_caput_ulnare_1;
AnyFolder &Supinator_humerus_part_1 = Supinator.Supinator_humerus_part_1;
AnyFolder &Supinator_humerus_part_2 = Supinator.Supinator_humerus_part_2;
AnyFolder &Supinator_ulna_part_1 = Supinator.Supinator_ulna_part_1;
AnyFolder &Supinator_ulna_part_2 = Supinator.Supinator_ulna_part_2;
AnyFolder &Pron_quadr_1 = PronatorQuadratus.Pron_quadr_1;
AnyFolder &Pron_quadr_2 = PronatorQuadratus.Pron_quadr_2;
AnyFolder &Extensor_Indicis = ExtensorIndicis.Extensor_Indicis;
AnyFolder &Abductor_Pollicis_Longus = AbductorPollicis.Abductor_Pollicis_Longus;
AnyFolder &Extensor_Pollicis_Brevis = ExtensorPollicis.Extensor_Pollicis_Brevis;
AnyFolder &Extensor_Pollicis_Longus = ExtensorPollicis.Extensor_Pollicis_Longus;
AnyFolder &Extensor_Carpi_Radialis_Brevis = ExtensorCarpiRadialis.Extensor_Carpi_Radialis_Brevis;
AnyFolder &Extensor_Carpi_Radialis_Longus = ExtensorCarpiRadialis.Extensor_Carpi_Radialis_Longus;
AnyFolder &Extensor_Carpi_Ulnaris = ExtensorCarpiUlnaris.Extensor_Carpi_Ulnaris;
AnyFolder &Flexor_Carpi_Ulnaris = FlexorCarpiUlnaris.Flexor_Carpi_Ulnaris;
AnyFolder &Flexor_Carpi_Radialis = FlexorCarpiRadialis.Flexor_Carpi_Radialis;
AnyFolder &Palmaris_Longus = PalmarisLongus.Palmaris_Longus;
AnyFolder &Flexor_Digitorum_Superficialis__Digit5 = FlexorDigitorumSuperficialis.Flexor_Digitorum_Superficialis__Digit5;
AnyFolder &Flexor_Digitorum_Superficialis__Digit4 = FlexorDigitorumSuperficialis.Flexor_Digitorum_Superficialis__Digit4;
AnyFolder &Flexor_Digitorum_Superficialis__Digit3 = FlexorDigitorumSuperficialis.Flexor_Digitorum_Superficialis__Digit3;
AnyFolder &Flexor_Digitorum_Superficialis__Digit2 = FlexorDigitorumSuperficialis.Flexor_Digitorum_Superficialis__Digit2;
AnyFolder &Flexor_Digitorum_Profundus__Digit5 = FlexorDigitorumProfundus.Flexor_Digitorum_Profundus__Digit5;
AnyFolder &Flexor_Digitorum_Profundus__Digit4 = FlexorDigitorumProfundus.Flexor_Digitorum_Profundus__Digit4;
AnyFolder &Flexor_Digitorum_Profundus__Digit3 = FlexorDigitorumProfundus.Flexor_Digitorum_Profundus__Digit3;
AnyFolder &Flexor_Digitorum_Profundus__Digit2 = FlexorDigitorumProfundus.Flexor_Digitorum_Profundus__Digit2;
AnyFolder &Extensor_Digitorum__Digit5 = ExtensorDigitorum.Extensor_Digitorum__Digit5;
AnyFolder &Extensor_Digitorum__Digit4 = ExtensorDigitorum.Extensor_Digitorum__Digit4;
AnyFolder &Extensor_Digitorum__Digit3 = ExtensorDigitorum.Extensor_Digitorum__Digit3;
AnyFolder &Extensor_Digitorum__Digit2 = ExtensorDigitorum.Extensor_Digitorum__Digit2;
AnyFolder &Extensor_Digiti_Minimi = ExtensorDigitiMinimi.Extensor_Digiti_Minimi;
AnyFolder &Flexor_Pollicis_Longus = FlexorPollicisLongus.Flexor_Pollicis_Longus;
