/* Range of Motion definition for the Arm */

AnyFolder RangeOfMotion = {
  AnyFolder Shoulder = {
    AnyVar MaxGlenohumeralFlexionAngle = 160;
    AnyVar MaxGlenohumeralExtensionAngle = -70;
    AnyVar MaxGlenohumeralAbductionAngle = 178;
    AnyVar MaxGlenohumeralAdductionAngle = -44;
    AnyVar MaxGlenohumeralExternalRotationAngle = 89;
    AnyVar MaxGlenohumeralInternalRotationAngle = 89;
    AnyVar MaxScapulaClaviculaElevationAngle = 40;
    AnyVar MaxScapulaClaviculaDepressionAngle = -5;
    AnyVar MaxScapulaClaviculaProtractionAngle = 15;
    AnyVar MaxScapulaClaviculaRetractionAngle = -36;
    AnyVar Neutral = 0;

    // Shoulder positions
    AnyFloat Neutral = {Neutral, Neutral, Neutral};
    AnyFloat Flexed = {MaxGlenohumeralFlexionAngle, 0, 0};
    AnyFloat Extended = {MaxGlenohumeralExtensionAngle, 0, 0};
    AnyFloat Abducted = {0, MaxGlenohumeralAbductionAngle, 0};
    AnyFloat Adducted = {0, MaxGlenohumeralAdductionAngle, 0};
    AnyFloat ExternallyRotated = {0, 0, MaxGlenohumeralExternalRotationAngle};
    AnyFloat InternallyRotated = {0, 0, MaxGlenohumeralInternalRotationAngle};
    AnyFloat FlexedAndExternallyRotated = {MaxGlenohumeralFlexionAngle, 0, MaxGlenohumeralExternalRotationAngle};
    AnyFloat FlexedAndInternallyRotated = {MaxGlenohumeralFlexionAngle, 0, MaxGlenohumeralInternalRotationAngle};
    AnyFloat ExtendedAndExternallyRotated = {MaxGlenohumeralExtensionAngle, 0, MaxGlenohumeralExternalRotationAngle};
    AnyFloat ExtendedAndInternallyRotated = {MaxGlenohumeralExtensionAngle, 0, MaxGlenohumeralInternalRotationAngle};
    AnyFloat FlexedAndAdducted = {MaxGlenohumeralFlexionAngle, MaxGlenohumeralAdductionAngle, 0};
    AnyFloat FlexedAndAbducted = {MaxGlenohumeralFlexionAngle, MaxGlenohumeralAbductionAngle, 0};

  };

  AnyFolder Elbow = {
    AnyVar MaxFlexionAngle = 150;
    AnyVar MaxExtensionAngle = 0;
    AnyVar MaxPronationAngle = 90;
    AnyVar MaxSupinationAngle = -90;
    AnyVar Neutral = 0;
  };

  AnyFolder Wrist = {
    AnyVar MaxFlexionAngle = 85;
    AnyVar MaxExtensionAngle = -70;
    AnyVar MaxAbductionAngle = 20;
    AnyVar MaxAdductionAngle = -35;
    AnyVar Neutral = 0;
  };
};
