AnyDoc _AMMR_BETA_INFO_ =
{
  #if (ANYBODY_V1 > 8)|(ANYBODY_V1 == 8 & ANYBODY_V2 >= 2)
    // 'Hidden' member is deprecated in newer verison
  #else
    Hidden = On;
  #endif

   #ifpathexists "../../../../.git"

   #ifdef ANYBODY_PATH_PYTHONHOME
    #ifpathexists "<ANYBODY_PATH_PYTHONHOME>/python.exe"
      #define _READ_GIT_INFO
    #endif
   #endif

   #ifndef _READ_GIT_INFO
     #ifpathexists "<ANYBODY_PATH_INSTALLDIR>/Python/python.exe"
        #define _READ_GIT_INFO
      #endif
   #endif

   #ifdef _READ_GIT_INFO
   #undef _READ_GIT_INFO
   AnyFunEx ReadGitInfo = {
     AnyString Return = {"",""};
     AnyFunExMonoPy git_info = { ModuleFile = "git_info.py"; ArgList = { AnyString gitfolder = "";};};
   };
   AnyString GitInfo = ReadGitInfo("../../../../.git");
   #endif


   #endif
};
