//The data for muscles atachment points come from:
//Musculotendon Parameters and Musculoskeletal Pathways Within the Human Foot. Gary T. Yamaguchi et al. Journal of Applied Biomechanics, 2007; 23:20-41. 2007
//
//The subject 4 has been choosen for his relatively standard foot size.


#if BM_COMPATIBILITY_MUSCLE_STRUCTURE == ON
  #include "ammr_3.0_compatibility_structure_Foot_Mus.any"
#endif


//***********
//Mus digit 1
//***********

MuscleGroup AbductorHallucis() = {
  AnyMuscleViaPoint AbductorHallucis1 =
  {
    AnyMuscleModel &MusMdl = ....MuscleModels.AbductorHallucis;
    AnyRefFrame &Org = ....Seg.Foot.Calcaneus.ABDH_Org;
    AnyRefFrame &Via = ....Seg.Foot.Navicular.ABDH_Via; //Navi
    AnyRefFrame &Via2 = ....Seg.Foot.Metatarsal1.ABDH_Via; //MT1
    AnyRefFrame &Ins = ....Seg.Foot.ProximalPhalange1.ABDH_Ins; // proxi1
    AnyDrawMuscle DrwMus = {#include "<ANYBODY_PATH_BODY>/drawSettings/MusDrawSettings.any"};
    #include "MuscleForceDrawing.any"
  };
};


MuscleGroup FlexorHallucisBrevisLateralis() = {
  AnyMuscleViaPoint FlexorHallucisBrevisLateralis_1 =
  {
    AnyMuscleModel &MusMdl = ....MuscleModels.FlexorHallucisBrevisLateralis_1;
    AnyRefFrame &Org = ....Seg.Foot.Cuboid.FHBL_Org;  //sarrafian et al "anatomy of the foot and ankle" pp.267

    AnyRefFrame &Via = ....Seg.Foot.Metatarsal1.FHBL_Via; //MT1
    AnyRefFrame &Via2 = ....Seg.Foot.Metatarsal1.FHBL_Via2; //MT1
    AnyRefFrame &Ins = ....Seg.Foot.ProximalPhalange1.FHBL_Ins; // proxi1
    AnyDrawMuscle DrwMus = {#include "<ANYBODY_PATH_BODY>/drawSettings/MusDrawSettings.any"};
    #include "MuscleForceDrawing.any"
  };

  AnyMuscleViaPoint FlexorHallucisBrevisLateralis_2 =
  {
    AnyMuscleModel &MusMdl = ....MuscleModels.FlexorHallucisBrevisLateralis_2;
    AnyRefFrame &Org = ....Seg.Foot.LateralCuneiform.FHBL_Org;  //sarrafian et al "anatomy of the foot and ankle" pp.267
    AnyRefFrame &Via = ....Seg.Foot.Metatarsal1.FHBL_Via; //MT1
    AnyRefFrame &Via2 = ....Seg.Foot.Metatarsal1.FHBL_Via2; //MT1
    AnyRefFrame &Ins = ....Seg.Foot.ProximalPhalange1.FHBL_Ins; // proxi1
    AnyDrawMuscle DrwMus = {#include "<ANYBODY_PATH_BODY>/drawSettings/MusDrawSettings.any"};
    #include "MuscleForceDrawing.any"
  };
};


MuscleGroup FlexorHallucisBrevisMedialis() = {
  AnyMuscleViaPoint FlexorHallucisBrevisMedialis1 =
  {
    AnyMuscleModel &MusMdl = ....MuscleModels.FlexorHallucisBrevisMedialis;
    //AnyRefFrame &Org = ....Seg.Foot.Navicular.FHBM_Org;  // Navi (or cuboid?)
    AnyRefFrame &Org = ....Seg.Foot.MedialCuneiform.FHBM_Org;  // Navi (or cuboid?)

    AnyRefFrame &Via = ....Seg.Foot.Metatarsal1.FHBM_Via; //MT1
    AnyRefFrame &Via2 = ....Seg.Foot.Metatarsal1.FHBM_Via2; //MT1
    AnyRefFrame &Ins = ....Seg.Foot.ProximalPhalange1.FHBM_Ins; // proxi1
    AnyDrawMuscle DrwMus = {#include "<ANYBODY_PATH_BODY>/drawSettings/MusDrawSettings.any"};
    #include "MuscleForceDrawing.any"
  };
};


MuscleGroup AdductorHallucisOblique() = {
  AnyMuscleViaPoint AdductorHallucisOblique1 =
  {
    AnyMuscleModel &MusMdl = ....MuscleModels.AdductorHallucisOblique1;
    AnyRefFrame &Org = ....Seg.Foot.Metatarsal2.ADHO_Org1;  // base of MT2, MT3, MT4 according to Takamitsu
    AnyRefFrame &Via = ....Seg.Foot.Metatarsal1.ADHO_Via; //MT1
    AnyRefFrame &Ins = ....Seg.Foot.ProximalPhalange1.ADHO_Ins; // proxi1
    AnyDrawMuscle DrwMus = {#include "<ANYBODY_PATH_BODY>/drawSettings/MusDrawSettings.any"};
    #include "MuscleForceDrawing.any"
  };

  AnyMuscleViaPoint AdductorHallucisOblique2 =
  {
    AnyMuscleModel &MusMdl = ....MuscleModels.AdductorHallucisOblique2;
    AnyRefFrame &Org = ....Seg.Foot.Metatarsal3.ADHO_Org2;  // base of MT2, MT3, MT4 according to Takamitsu
    AnyRefFrame &Via = ....Seg.Foot.Metatarsal1.ADHO_Via; //MT1
    AnyRefFrame &Ins = ....Seg.Foot.ProximalPhalange1.ADHO_Ins; // proxi1
    AnyDrawMuscle DrwMus = {#include "<ANYBODY_PATH_BODY>/drawSettings/MusDrawSettings.any"};
    #include "MuscleForceDrawing.any"
  };

  AnyMuscleViaPoint AdductorHallucisOblique3 =
  {
    AnyMuscleModel &MusMdl = ....MuscleModels.AdductorHallucisOblique3;
    AnyRefFrame &Org = ....Seg.Foot.Metatarsal4.ADHO_Org3;  // base of MT2, MT3, MT4 according to Takamitsu
    AnyRefFrame &Via = ....Seg.Foot.Metatarsal1.ADHO_Via; //MT1
    AnyRefFrame &Ins = ....Seg.Foot.ProximalPhalange1.ADHO_Ins; // proxi1
    AnyDrawMuscle DrwMus = {#include "<ANYBODY_PATH_BODY>/drawSettings/MusDrawSettings.any"};
    #include "MuscleForceDrawing.any"
  };

  AnyMuscleViaPoint AdductorHallucisOblique4 =
  {
    AnyMuscleModel &MusMdl = ....MuscleModels.AdductorHallucisOblique4;
    AnyRefFrame &Org = ....Seg.Foot.Cuboid.ADHO_Org4;  // base of MT2, MT3, MT4 according to Takamitsu    sarrafian adds cuboid and cuneiforms
    AnyRefFrame &Via = ....Seg.Foot.Metatarsal1.ADHO_Via; //MT1
    AnyRefFrame &Ins = ....Seg.Foot.ProximalPhalange1.ADHO_Ins; // proxi1
    AnyDrawMuscle DrwMus = {#include "<ANYBODY_PATH_BODY>/drawSettings/MusDrawSettings.any"};
    #include "MuscleForceDrawing.any"
  };

  AnyMuscleViaPoint AdductorHallucisOblique5 =
  {
    AnyMuscleModel &MusMdl = ....MuscleModels.AdductorHallucisOblique5;
    AnyRefFrame &Org = ....Seg.Foot.LateralCuneiform.ADHO_Org5; // base of MT2, MT3, MT4 according to Takamitsu    sarrafian adds cuboid and cuneiforms
    AnyRefFrame &Via = ....Seg.Foot.Metatarsal1.ADHO_Via; //MT1
    AnyRefFrame &Ins = ....Seg.Foot.ProximalPhalange1.ADHO_Ins; // proxi1
    AnyDrawMuscle DrwMus = {#include "<ANYBODY_PATH_BODY>/drawSettings/MusDrawSettings.any"};
    #include "MuscleForceDrawing.any"
  };
};


MuscleGroup AdductorHallucisTransverse() = {
  AnyMuscleViaPoint AdductorHallucisTransverse1 =
  {
    AnyMuscleModel &MusMdl = ....MuscleModels.AdductorHallucisTransverse1;
    AnyRefFrame &Org1 = ....Seg.Foot.Metatarsal3.ADHT_Org1;  // MT3
    AnyRefFrame &Via = ....Seg.Foot.Metatarsal1.ADHT_Via; //MT1
    AnyRefFrame &Ins = ....Seg.Foot.ProximalPhalange1.ADHT_Ins; // proxi1
    AnyDrawMuscle DrwMus = {#include "<ANYBODY_PATH_BODY>/drawSettings/MusDrawSettings.any"};
    #include "MuscleForceDrawing.any"
  };

  AnyMuscleViaPoint AdductorHallucisTransverse2 =
  {
    AnyMuscleModel &MusMdl = ....MuscleModels.AdductorHallucisTransverse2;
    AnyRefFrame &Org2 = ....Seg.Foot.Metatarsal4.ADHT_Org2;  // MT4
    AnyRefFrame &Via = ....Seg.Foot.Metatarsal1.ADHT_Via; //MT1
    AnyRefFrame &Ins = ....Seg.Foot.ProximalPhalange1.ADHT_Ins; // proxi1
    AnyDrawMuscle DrwMus = {#include "<ANYBODY_PATH_BODY>/drawSettings/MusDrawSettings.any"};
    #include "MuscleForceDrawing.any"
  };

  // Should be added according to :
  //Anatomical study of human adductor hallucis muscle with respect to its origin and insertion. Takamitsu Arakawa, 2003

  AnyMuscleViaPoint AdductorHallucisTransverse3 =
  {
    AnyMuscleModel &MusMdl = ....MuscleModels.AdductorHallucisTransverse3;
    AnyRefFrame &Org2 = ....Seg.Foot.Metatarsal5.ADHT_Org3;  // MT5
    AnyRefFrame &Via = ....Seg.Foot.Metatarsal1.ADHT_Via; //MT1
    AnyRefFrame &Ins = ....Seg.Foot.ProximalPhalange1.ADHT_Ins; // proxi1
    AnyDrawMuscle DrwMus = {#include "<ANYBODY_PATH_BODY>/drawSettings/MusDrawSettings.any"};
    #include "MuscleForceDrawing.any"
  };
};


MuscleGroup ExtensorHallucisBrevis() = {
  // insertion in proximal phalanx
  AnyMuscleViaPoint ExtensorHallucisBrevis1 =
  {
    AnyMuscleModel &MusMdl = ....MuscleModels.ExtensorHallucisBrevis;
    AnyRefFrame &Org = ....Seg.Foot.Calcaneus.EHB_Org;  // calcaneus
    AnyRefFrame &Via1 = ....Seg.Foot.IntermediateCuneiform.EHB_Via1; //intermediate cunei
    AnyRefFrame &Via2 = ....Seg.Foot.Metatarsal1.EHB_Via2; //MT1
    AnyRefFrame &Ins1 = ....Seg.Foot.Metatarsal1.EHB_Ins1; // MT1
    AnyRefFrame &Ins2 = ....Seg.Foot.ProximalPhalange1.EHB_Ins2; // proxi 1
    AnyDrawMuscle DrwMus = {#include "<ANYBODY_PATH_BODY>/drawSettings/MusDrawSettings.any"};
    #include "MuscleForceDrawing.any"
  };
};


//*********************************
//DI, origins are strange, reviewed
//*********************************
MuscleGroup DorsalInterosseous() = {
  AnyMuscleViaPoint DorsalInterosseous1Part1 =
  {
    AnyMuscleModel &MusMdl = ....MuscleModels.DorsalInterosseous1Part1 ;
    AnyRefFrame &Org = ....Seg.Foot.Metatarsal2.DI1_Org1;
    AnyRefFrame &Ins = ....Seg.Foot.ProximalPhalange2.DI1_Ins;
    AnyDrawMuscle DrwMus = {#include "<ANYBODY_PATH_BODY>/drawSettings/MusDrawSettings.any"};
    #include "MuscleForceDrawing.any"
  };

  AnyMuscleViaPoint DorsalInterosseous1Part2 =
  {
    AnyMuscleModel &MusMdl = ....MuscleModels.DorsalInterosseous1Part2 ;
    AnyRefFrame &Org = ....Seg.Foot.Metatarsal1.DI1_Org2;
    AnyRefFrame &Ins = ....Seg.Foot.ProximalPhalange2.DI1_Ins;
    AnyDrawMuscle DrwMus = {#include "<ANYBODY_PATH_BODY>/drawSettings/MusDrawSettings.any"};
    #include "MuscleForceDrawing.any"
  };

  AnyMuscleViaPoint DorsalInterosseous2Part1 =
  {
    AnyMuscleModel &MusMdl = ....MuscleModels.DorsalInterosseous2Part1 ;
    AnyRefFrame &Org = ....Seg.Foot.Metatarsal2.DI2_Org1;
    AnyRefFrame &Ins = ....Seg.Foot.ProximalPhalange2.DI2_Ins;
    AnyDrawMuscle DrwMus = {#include "<ANYBODY_PATH_BODY>/drawSettings/MusDrawSettings.any"};
    #include "MuscleForceDrawing.any"
  };

  AnyMuscleViaPoint DorsalInterosseous2Part2 =
  {
    AnyMuscleModel &MusMdl = ....MuscleModels.DorsalInterosseous2Part2 ;
    AnyRefFrame &Org = ....Seg.Foot.Metatarsal3.DI2_Org2;
    AnyRefFrame &Ins = ....Seg.Foot.ProximalPhalange2.DI2_Ins;
    AnyDrawMuscle DrwMus = {#include "<ANYBODY_PATH_BODY>/drawSettings/MusDrawSettings.any"};
    #include "MuscleForceDrawing.any"
  };

  AnyMuscleViaPoint DorsalInterosseous3Part1 =
  {
    AnyMuscleModel &MusMdl = ....MuscleModels.DorsalInterosseous3Part1 ;
    AnyRefFrame &Org = ....Seg.Foot.Metatarsal3.DI3_Org1;
    AnyRefFrame &Ins = ....Seg.Foot.ProximalPhalange3.DI3_Ins;
    AnyDrawMuscle DrwMus = {#include "<ANYBODY_PATH_BODY>/drawSettings/MusDrawSettings.any"};
    #include "MuscleForceDrawing.any"
  };

  AnyMuscleViaPoint DorsalInterosseous3Part2 =
  {
    AnyMuscleModel &MusMdl = ....MuscleModels.DorsalInterosseous3Part2 ;
    AnyRefFrame &Org = ....Seg.Foot.Metatarsal4.DI3_Org2;
    AnyRefFrame &Ins = ....Seg.Foot.ProximalPhalange3.DI3_Ins;
    AnyDrawMuscle DrwMus = {#include "<ANYBODY_PATH_BODY>/drawSettings/MusDrawSettings.any"};
    #include "MuscleForceDrawing.any"
  };

  AnyMuscleViaPoint DorsalInterosseous4Part1 =
  {
    AnyMuscleModel &MusMdl = ....MuscleModels.DorsalInterosseous4Part1 ;
    AnyRefFrame &Org = ....Seg.Foot.Metatarsal4.DI4_Org1;
    AnyRefFrame &Ins = ....Seg.Foot.ProximalPhalange4.DI4_Ins;
    AnyDrawMuscle DrwMus = {#include "<ANYBODY_PATH_BODY>/drawSettings/MusDrawSettings.any"};
    #include "MuscleForceDrawing.any"
  };

  //Not present in yamaguchi data, but should be there
  AnyMuscleViaPoint DorsalInterosseous4Part2 =
  {
    AnyMuscleModel &MusMdl = ....MuscleModels.DorsalInterosseous4Part2 ;
    AnyRefFrame &Org = ....Seg.Foot.Metatarsal5.DI4_Org2;
    AnyRefFrame &Ins = ....Seg.Foot.ProximalPhalange4.DI4_Ins;
    AnyDrawMuscle DrwMus = {#include "<ANYBODY_PATH_BODY>/drawSettings/MusDrawSettings.any"};
    #include "MuscleForceDrawing.any"
  };
};


// insertion in tendon of longus, should be same path as longus until distal phalanx
//*************************
//ExtensorDigitoriumBrevis
//*************************
MuscleGroup ExtensorDigitoriumBrevis() = {
  //AnyMuscleViaPoint ExtensorDigitoriumBrevis2 =
  //{
  //  AnyMuscleModel &MusMdl = ..MuscleModels.ExtensorDigitoriumBrevis2;
  //  AnyRefFrame &Org = ....Seg.Foot.Calcaneus.EDB_Org; // calca
  //  AnyRefFrame &Via1 = ....Seg.Foot.Metatarsal3.EDB2_Via1; //MT3
  //  AnyRefFrame &Via2Bis = ....Seg.Foot.Metatarsal2.EDB2_Via2Bis; //MT2
  //  AnyRefFrame &Via2 = ....Seg.Foot.Metatarsal2.EDB2_Via2; //MT2
  ////  AnyRefFrame &Via3 = ....Seg.Foot.ProximalPhalange2.EDB2_Via3; //proxi2
  ////  AnyRefFrame &Via4 = ....Seg.Foot.MiddlePhalange2.EDB2_Via4; //midle 2 tendon
  ////  AnyRefFrame &Ins = ....Seg.Foot.DistalPhalange2.EDB2_Ins; //distal phalanx2
  //  AnyDrawMuscle DrwMus = {#include "<ANYBODY_PATH_BODY>/drawSettings/MusDrawSettings.any"};
  //  #include "MuscleForceDrawing.any"
  //};
  AnyMuscleViaPoint ExtensorDigitoriumBrevis2 =
  {
    AnyMuscleModel &MusMdl = ....MuscleModels.ExtensorDigitoriumBrevis2;
    AnyRefFrame &Org = ....Seg.Foot.Calcaneus.EDB_Org; // calca
    AnyRefFrame &Via1 = ....Seg.Foot.Metatarsal3.EDB2_Via1; //MT3
    AnyRefFrame &Via2Bis = ....Seg.Foot.Metatarsal2.EDB2_Via2Bis; //MT2
    AnyRefFrame &Via2 = ....Seg.Foot.Metatarsal2.EDB2_Via2; //MT2
    AnyRefFrame &ins = ....Seg.Foot.MiddlePhalange2.ExtensorDigitorumLongusNode;
    //AnyRefFrame &Via3 = ....Seg.Foot.ProximalPhalange2.EDB2_Via3; //proxi2
    //AnyRefFrame &Via4 = ....Seg.Foot.MiddlePhalange2.EDB2_Via4; //midle 2 tendon
    //  AnyRefFrame &Ins = ....Seg.Foot.DistalPhalange2.EDB2_Ins; //distal phalanx2
    AnyDrawMuscle DrwMus = {#include "<ANYBODY_PATH_BODY>/drawSettings/MusDrawSettings.any"};
    #include "MuscleForceDrawing.any"
  };

  //AnyMuscleViaPoint ExtensorDigitoriumBrevis3 =
  //{
  //  AnyMuscleModel &MusMdl = ....MuscleModels.ExtensorDigitoriumBrevis3;
  //  AnyRefFrame &Org = ....Seg.Foot.Calcaneus.EDB_Org; // calca
  //  AnyRefFrame &Via0 = ....Seg.Foot.Metatarsal3.EDB3_Via0; //MT3
  //  AnyRefFrame &Via1Bis = ....Seg.Foot.Metatarsal3.EDB3_Via1Bis; //MT3
  //  AnyRefFrame &Via1 = ....Seg.Foot.Metatarsal3.EDB3_Via1; //MT3
  ////  AnyRefFrame &Via2 = ....Seg.Foot.ProximalPhalange3.EDB3_Via2; //proxi3
  ////  AnyRefFrame &Via3 = ....Seg.Foot.MiddlePhalange3.EDB3_Via3; //middle 3 tendon
  ////  AnyRefFrame &Ins = ....Seg.Foot.DistalPhalange3.EDB3_Ins; //distal phalanx3
  //  AnyDrawMuscle DrwMus = {#include "<ANYBODY_PATH_BODY>/drawSettings/MusDrawSettings.any"};
  //   #include "MuscleForceDrawing.any"
  //
  //};
  AnyMuscleViaPoint ExtensorDigitoriumBrevis3 =
  {
    AnyMuscleModel &MusMdl = ....MuscleModels.ExtensorDigitoriumBrevis3;
    AnyRefFrame &Org = ....Seg.Foot.Calcaneus.EDB_Org; // calca
    AnyRefFrame &Via0 = ....Seg.Foot.Metatarsal3.EDB3_Via0; //MT3
    AnyRefFrame &Via1Bis = ....Seg.Foot.Metatarsal3.EDB3_Via1Bis; //MT3
    AnyRefFrame &Via1 = ....Seg.Foot.Metatarsal3.EDB3_Via1; //MT3
    AnyRefFrame &ins = ....Seg.Foot.MiddlePhalange3.ExtensorDigitorumLongusNode;
    //  AnyRefFrame &Via2 = ....Seg.Foot.ProximalPhalange3.EDB3_Via2; //proxi3
    // AnyRefFrame &Via3 = ....Seg.Foot.MiddlePhalange3.EDB3_Via3; //middle 3 tendon
    //  AnyRefFrame &Ins = ....Seg.Foot.DistalPhalange3.EDB3_Ins; //distal phalanx3
    AnyDrawMuscle DrwMus = {#include "<ANYBODY_PATH_BODY>/drawSettings/MusDrawSettings.any"};
    #include "MuscleForceDrawing.any"
  };

  //AnyMuscleViaPoint ExtensorDigitoriumBrevis4 =
  //{
  //  AnyMuscleModel &MusMdl = ..MuscleModels.ExtensorDigitoriumBrevis4;
  //  AnyRefFrame &Org = ....Seg.Foot.Calcaneus.EDB_Org; // calca
  //  AnyRefFrame &Via1Bis = ....Seg.Foot.Metatarsal4.EDB4_Via1Bis; //MT4
  //  AnyRefFrame &Via1 = ....Seg.Foot.Metatarsal4.EDB4_Via1; //MT4
  ////  AnyRefFrame &Via2 = ....Seg.Foot.ProximalPhalange4.EDB4_Via2; //proxi4
  ////  AnyRefFrame &Via3 = ....Seg.Foot.MiddlePhalange4.EDB4_Via3; //middle 4 tendon
  ////  AnyRefFrame &Ins = ....Seg.Foot.DistalPhalange4.EDB4_Ins; //distal phalanx4
  //  AnyDrawMuscle DrwMus = {#include "<ANYBODY_PATH_BODY>/drawSettings/MusDrawSettings.any"};
  // #include "MuscleForceDrawing.any"
  //};
  AnyMuscleViaPoint ExtensorDigitoriumBrevis4 =
  {
    AnyMuscleModel &MusMdl = ....MuscleModels.ExtensorDigitoriumBrevis4;
    AnyRefFrame &Org = ....Seg.Foot.Calcaneus.EDB_Org; // calca
    AnyRefFrame &Via1Bis = ....Seg.Foot.Metatarsal4.EDB4_Via1Bis; //MT4
    AnyRefFrame &Via1 = ....Seg.Foot.Metatarsal4.EDB4_Via1; //MT4
    AnyRefFrame &ins = ....Seg.Foot.MiddlePhalange4.ExtensorDigitorumLongusNode;
    // AnyRefFrame &Via2 = ....Seg.Foot.ProximalPhalange4.EDB4_Via2; //proxi4
    // AnyRefFrame &Via3 = ....Seg.Foot.MiddlePhalange4.EDB4_Via3; //middle 4 tendon
    //  AnyRefFrame &Ins = ....Seg.Foot.DistalPhalange4.EDB4_Ins; //distal phalanx4
    AnyDrawMuscle DrwMus = {#include "<ANYBODY_PATH_BODY>/drawSettings/MusDrawSettings.any"};
    #include "MuscleForceDrawing.any"
  };
};


//*****************
//PI
//*****************
MuscleGroup PlantarInterosseous() = {
  AnyMuscleViaPoint PlantarInterosseous1 =
  {
    AnyMuscleModel &MusMdl = ....MuscleModels.PlantarInterosseous1;
    //  AnyRefFrame &Org = ....Seg.Foot.Metatarsal3.PI1_Org;
    AnyRefFrame &Org = ....Seg.Foot.LateralCuneiform.PI1_Org;
    AnyRefFrame &Ins = ....Seg.Foot.ProximalPhalange3.PI1_Ins;
    AnyDrawMuscle DrwMus = {#include "<ANYBODY_PATH_BODY>/drawSettings/MusDrawSettings.any"};
    #include "MuscleForceDrawing.any"
  };

  AnyMuscleViaPoint PlantarInterosseous2Part1 =
  {
    AnyMuscleModel &MusMdl = ....MuscleModels.PlantarInterosseous2Part1;
    AnyRefFrame &Org = ....Seg.Foot.Metatarsal4.PI2_Org1;
    AnyRefFrame &Ins = ....Seg.Foot.ProximalPhalange4.PI2_Ins;
    AnyDrawMuscle DrwMus = {#include "<ANYBODY_PATH_BODY>/drawSettings/MusDrawSettings.any"};
    #include "MuscleForceDrawing.any"
  };

  AnyMuscleViaPoint PlantarInterosseous2Part2 =
  {
    AnyMuscleModel &MusMdl = ....MuscleModels.PlantarInterosseous2Part2;
    AnyRefFrame &Org = ....Seg.Foot.Metatarsal4.PI2_Org2;
    AnyRefFrame &Ins = ....Seg.Foot.ProximalPhalange4.PI2_Ins;
    AnyDrawMuscle DrwMus = {#include "<ANYBODY_PATH_BODY>/drawSettings/MusDrawSettings.any"};
    #include "MuscleForceDrawing.any"
  };

  AnyMuscleViaPoint PlantarInterosseous2Part3 =
  {
    AnyMuscleModel &MusMdl = ....MuscleModels.PlantarInterosseous2Part3;
    //  AnyRefFrame &Org = ....Seg.Foot.Metatarsal4.PI2_Org3;
    AnyRefFrame &Org = ....Seg.Foot.Cuboid.PI2_Org3;
    AnyRefFrame &Ins = ....Seg.Foot.ProximalPhalange4.PI2_Ins;
    AnyDrawMuscle DrwMus = {#include "<ANYBODY_PATH_BODY>/drawSettings/MusDrawSettings.any"};
    #include "MuscleForceDrawing.any"
  };

  AnyMuscleViaPoint PlantarInterosseous3Part1 =
  {
    AnyMuscleModel &MusMdl = ....MuscleModels.PlantarInterosseous3Part1;
    AnyRefFrame &Org = ....Seg.Foot.Metatarsal5.PI3_Org1;
    AnyRefFrame &Ins = ....Seg.Foot.ProximalPhalange5.PI3_Ins;
    AnyDrawMuscle DrwMus = {#include "<ANYBODY_PATH_BODY>/drawSettings/MusDrawSettings.any"};
    #include "MuscleForceDrawing.any"
  };

  AnyMuscleViaPoint PlantarInterosseous3Part2 =
  {
    AnyMuscleModel &MusMdl = ....MuscleModels.PlantarInterosseous3Part2;
    AnyRefFrame &Org = ....Seg.Foot.Cuboid.PI3_Org2;
    AnyRefFrame &Ins = ....Seg.Foot.ProximalPhalange5.PI3_Ins;
    AnyDrawMuscle DrwMus = {#include "<ANYBODY_PATH_BODY>/drawSettings/MusDrawSettings.any"};
    #include "MuscleForceDrawing.any"
  };

  AnyMuscleViaPoint PlantarInterosseous3Part3 =
  {
    AnyMuscleModel &MusMdl = ....MuscleModels.PlantarInterosseous3Part3;
    AnyRefFrame &Org = ....Seg.Foot.Metatarsal5.PI3_Org3;
    AnyRefFrame &Ins = ....Seg.Foot.ProximalPhalange5.PI3_Ins;
    AnyDrawMuscle DrwMus = {#include "<ANYBODY_PATH_BODY>/drawSettings/MusDrawSettings.any"};
    #include "MuscleForceDrawing.any"
  };
};


//stops at the middle phalanx.
//**********************
//FlexorDigitorumBrevis
//**********************
MuscleGroup FlexorDigitorumBrevis() = {
  AnyMuscleViaPoint FlexorDigitorumBrevis2 =
  {
    AnyMuscleModel &MusMdl = ....MuscleModels.FlexorDigitorumBrevis2;
    AnyRefFrame &Org = ....Seg.Foot.Calcaneus.FDB_Org; //calca
    //  AnyRefFrame &Via1 = ....Seg.Foot.Cuboid.FDB2_Via1; //cuboid
    AnyRefFrame &Via2 = ....Seg.Foot.Metatarsal2.FDB2_Via2; //MT2
    AnyRefFrame &Via3 = ....Seg.Foot.ProximalPhalange2.FDB2_Via3; //proxi 2
    AnyRefFrame &Ins = ....Seg.Foot.MiddlePhalange2.FDB2_Ins; //midle p2
    AnyDrawMuscle DrwMus = {#include "<ANYBODY_PATH_BODY>/drawSettings/MusDrawSettings.any"};
    #include "MuscleForceDrawing.any"
  };

  AnyMuscleViaPoint FlexorDigitorumBrevis3 =
  {
    AnyMuscleModel &MusMdl = ....MuscleModels.FlexorDigitorumBrevis3;
    AnyRefFrame &Org = ....Seg.Foot.Calcaneus.FDB_Org;//calca
    // AnyRefFrame &Via1 = ....Seg.Foot.Cuboid.FDB3_Via1; //cuboid
    AnyRefFrame &Via2 = ....Seg.Foot.Metatarsal3.FDB3_Via2; //MT3
    AnyRefFrame &Via3 = ....Seg.Foot.ProximalPhalange3.FDB3_Via3; //proxi 3
    AnyRefFrame &Ins = ....Seg.Foot.MiddlePhalange3.FDB3_Ins; //midle p3
    AnyDrawMuscle DrwMus = {#include "<ANYBODY_PATH_BODY>/drawSettings/MusDrawSettings.any"};
    #include "MuscleForceDrawing.any"
  };

  AnyMuscleViaPoint FlexorDigitorumBrevis4 =
  {
    AnyMuscleModel &MusMdl = ....MuscleModels.FlexorDigitorumBrevis4;
    AnyRefFrame &Org = ....Seg.Foot.Calcaneus.FDB_Org;//calca
    //  AnyRefFrame &Via1 = ....Seg.Foot.Cuboid.FDB4_Via1; //cuboid
    AnyRefFrame &Via2 = ....Seg.Foot.Metatarsal4.FDB4_Via2; //MT4
    AnyRefFrame &Via3 = ....Seg.Foot.ProximalPhalange4.FDB4_Via3; //proxi 4
    AnyRefFrame &Ins = ....Seg.Foot.MiddlePhalange4.FDB4_Ins; //midle p4
    AnyDrawMuscle DrwMus = {#include "<ANYBODY_PATH_BODY>/drawSettings/MusDrawSettings.any"};
    #include "MuscleForceDrawing.any"
  };

  AnyMuscleViaPoint FlexorDigitorumBrevis5 =
  {
    AnyMuscleModel &MusMdl = ....MuscleModels.FlexorDigitorumBrevis5;
    AnyRefFrame &Org = ....Seg.Foot.Calcaneus.FDB_Org;//calca
    //  AnyRefFrame &Via1 = ....Seg.Foot.Cuboid.FDB5_Via1; //cuboid
    AnyRefFrame &Via2 = ....Seg.Foot.Metatarsal5.FDB5_Via2; //MT5
    AnyRefFrame &Ins = ....Seg.Foot.MiddlePhalange5.FDB5_Ins; //Middle 5
    AnyDrawMuscle DrwMus = {#include "<ANYBODY_PATH_BODY>/drawSettings/MusDrawSettings.any"};
    #include "MuscleForceDrawing.any"
  };
};


//*********************************************
//QuadratusPlantar (M/L), Tendon insertion!!!!
//*********************************************
MuscleGroup QuadratusPlantarMedialis() = {
  AnyMuscleViaPoint QuadratusPlantarMedialis1 =
  {
    AnyMuscleModel &MusMdl = ....MuscleModels.QuadratusPlantarMedialis1;
    AnyRefFrame &Org = ....Seg.Foot.Calcaneus.QPM_Org1; //calca
    AnyRefFrame &Ins = ....Seg.Foot.FDL.FDLDummySeg.QP_Ins1; //tendon
    AnyDrawMuscle DrwMus = {#include "<ANYBODY_PATH_BODY>/drawSettings/MusDrawSettings.any"};
    #include "MuscleForceDrawing.any"
  };

  AnyMuscleViaPoint QuadratusPlantarMedialis2 =
  {
    AnyMuscleModel &MusMdl = ....MuscleModels.QuadratusPlantarMedialis2;
    AnyRefFrame &Org = ....Seg.Foot.Calcaneus.QPM_Org2; //calca
    AnyRefFrame &Ins = ....Seg.Foot.FDL.FDLDummySeg.QP_Ins2; //tendon
    AnyDrawMuscle DrwMus = {#include "<ANYBODY_PATH_BODY>/drawSettings/MusDrawSettings.any"};
    #include "MuscleForceDrawing.any"
  };

  AnyMuscleViaPoint QuadratusPlantarMedialis3 =
  {
    AnyMuscleModel &MusMdl = ....MuscleModels.QuadratusPlantarMedialis3;
    AnyRefFrame &Org = ....Seg.Foot.Calcaneus.QPM_Org3; //calca
    AnyRefFrame &Ins = ....Seg.Foot.FDL.FDLDummySeg.QP_Ins3; //tendon
    AnyDrawMuscle DrwMus = {#include "<ANYBODY_PATH_BODY>/drawSettings/MusDrawSettings.any"};
    #include "MuscleForceDrawing.any"
  };
};


MuscleGroup QuadratusPlantarLateralis() = {
  AnyMuscleViaPoint QuadratusPlantarLateralis1 =
  {
    AnyMuscleModel &MusMdl = ....MuscleModels.QuadratusPlantarLateralis1;
    AnyRefFrame &Org = ....Seg.Foot.Calcaneus.QPL_Org1; //calca
    AnyRefFrame &Ins = ....Seg.Foot.FDL.FDLDummySeg.QP_Ins1; //tendon
    AnyDrawMuscle DrwMus = {#include "<ANYBODY_PATH_BODY>/drawSettings/MusDrawSettings.any"};
    #include "MuscleForceDrawing.any"
  };

  AnyMuscleViaPoint QuadratusPlantarLateralis2 =
  {
    AnyMuscleModel &MusMdl = ....MuscleModels.QuadratusPlantarLateralis2;
    AnyRefFrame &Org = ....Seg.Foot.Calcaneus.QPL_Org2; //calca
    AnyRefFrame &Ins = ....Seg.Foot.FDL.FDLDummySeg.QP_Ins2; //tendon
    AnyDrawMuscle DrwMus = {#include "<ANYBODY_PATH_BODY>/drawSettings/MusDrawSettings.any"};
    #include "MuscleForceDrawing.any"
  };

  AnyMuscleViaPoint QuadratusPlantarLateralis3 =
  {
    AnyMuscleModel &MusMdl = ....MuscleModels.QuadratusPlantarLateralis3;
    AnyRefFrame &Org = ....Seg.Foot.Calcaneus.QPL_Org3; //calca
    AnyRefFrame &Ins = ....Seg.Foot.FDL.FDLDummySeg.QP_Ins3; //tendon
    AnyDrawMuscle DrwMus = {#include "<ANYBODY_PATH_BODY>/drawSettings/MusDrawSettings.any"};
    #include "MuscleForceDrawing.any"
  };
};

//*********************************
//Lumbrical, tendon insertion!!!!! and via points are wrapping around ADHT / transverse lig ??
//*********************************
MuscleGroup Lumbrical() = {
  AnyMuscleViaPoint Lumbrical2 =
  {
    AnyMuscleModel &MusMdl = ....MuscleModels.Lumbrical2;
    AnyRefFrame &Org = ....Seg.Foot.FDL.FDLDummySeg.LB2_Org; //tendon
    AnyRefFrame &Via = ....Seg.Foot.Metatarsal2.LB2_Via; //meta2
    AnyRefFrame &Ins = ....Seg.Foot.ProximalPhalange2.LB2_Ins; //proxi2
    AnyDrawMuscle DrwMus = {#include "<ANYBODY_PATH_BODY>/drawSettings/MusDrawSettings.any"};
    #include "MuscleForceDrawing.any"
  };

  AnyMuscleViaPoint Lumbrical3 =
  {
    AnyMuscleModel &MusMdl = ....MuscleModels.Lumbrical3;
    AnyRefFrame &Org = ....Seg.Foot.FDL.FDLDummySeg.LB3_Org; //tendon
    AnyRefFrame &Via = ....Seg.Foot.Metatarsal3.LB3_Via; //meta3
    AnyRefFrame &Ins = ....Seg.Foot.ProximalPhalange3.LB3_Ins; //proxi3
    AnyDrawMuscle DrwMus = {#include "<ANYBODY_PATH_BODY>/drawSettings/MusDrawSettings.any"};
    #include "MuscleForceDrawing.any"
  };

  AnyMuscleViaPoint Lumbrical4 =
  {
    AnyMuscleModel &MusMdl = ....MuscleModels.Lumbrical4;
    AnyRefFrame &Org = ....Seg.Foot.FDL.FDLDummySeg.LB4_Org; //tendon
    AnyRefFrame &Via = ....Seg.Foot.Metatarsal4.LB4_Via; //meta4
    AnyRefFrame &Ins = ....Seg.Foot.ProximalPhalange4.LB4_Ins; //proxi4
    AnyDrawMuscle DrwMus = {#include "<ANYBODY_PATH_BODY>/drawSettings/MusDrawSettings.any"};
    #include "MuscleForceDrawing.any"
  };

  AnyMuscleViaPoint Lumbrical5 =
  {
    AnyMuscleModel &MusMdl = ....MuscleModels.Lumbrical5;
    AnyRefFrame &Org = ....Seg.Foot.FDL.FDLDummySeg.LB5_Org; //tendon
    AnyRefFrame &Via = ....Seg.Foot.Metatarsal5.LB5_Via; //meta5
    AnyRefFrame &Ins = ....Seg.Foot.ProximalPhalange5.LB5_Ins; //proxi5
    AnyDrawMuscle DrwMus = {#include "<ANYBODY_PATH_BODY>/drawSettings/MusDrawSettings.any"};
    #include "MuscleForceDrawing.any"
  };
};


//*********************
//AbductorDigitiMinimi
//*********************
MuscleGroup AbductorDigitiMinimi() = {
  AnyMuscleViaPoint AbductorDigitiMinimi1 =
  {
    AnyMuscleModel &MusMdl = ....MuscleModels.AbductorDigitiMinimi1;
    AnyRefFrame &Org = ....Seg.Foot.Calcaneus.ABDM_Org1; //calca
    AnyRefFrame &Via1 = ....Seg.Foot.Metatarsal5.ABDM_Via1; //MT5
    AnyRefFrame &Via2 = ....Seg.Foot.Metatarsal5.ABDM_Via2; //MT5
    AnyRefFrame &Ins = ....Seg.Foot.ProximalPhalange5.ABDM_Ins; //proxi5
    AnyDrawMuscle DrwMus = {#include "<ANYBODY_PATH_BODY>/drawSettings/MusDrawSettings.any"};
    #include "MuscleForceDrawing.any"
  };

  AnyMuscleViaPoint AbductorDigitiMinimi2 =
  {
    AnyMuscleModel &MusMdl = ....MuscleModels.AbductorDigitiMinimi2;
    AnyRefFrame &Org = ....Seg.Foot.Calcaneus.ABDM_Org2; //calca
    AnyRefFrame &Via1 = ....Seg.Foot.Metatarsal5.ABDM_Via1; //MT5
    AnyRefFrame &Via2 = ....Seg.Foot.Metatarsal5.ABDM_Via2; //MT5
    AnyRefFrame &Ins = ....Seg.Foot.ProximalPhalange5.ABDM_Ins; //proxi5
    AnyDrawMuscle DrwMus = {#include "<ANYBODY_PATH_BODY>/drawSettings/MusDrawSettings.any"};
    #include "MuscleForceDrawing.any"
  };

  AnyMuscleViaPoint AbductorDigitiMinimi3 =
  {
    AnyMuscleModel &MusMdl = ....MuscleModels.AbductorDigitiMinimi3;
    AnyRefFrame &Org = ....Seg.Foot.Calcaneus.ABDM_Org3; //calca
    AnyRefFrame &Via1 = ....Seg.Foot.Metatarsal5.ABDM_Via1; //MT5
    AnyRefFrame &Via2 = ....Seg.Foot.Metatarsal5.ABDM_Via2; //MT5
    AnyRefFrame &Ins = ....Seg.Foot.ProximalPhalange5.ABDM_Ins; //proxi5
    AnyDrawMuscle DrwMus = {#include "<ANYBODY_PATH_BODY>/drawSettings/MusDrawSettings.any"};
    #include "MuscleForceDrawing.any"
  };
};


//***************************
//FlexorDigitiMinimiBrevis, Should wrap around meta 5 ??
//****************************
MuscleGroup FlexorDigitiMinimiBrevis() = {
  AnyMuscleViaPoint FlexorDigitiMinimiBrevis1 =
  {
    AnyMuscleModel &MusMdl = ....MuscleModels.FlexorDigitiMinimiBrevis;
    AnyRefFrame &Org = ....Seg.Foot.Metatarsal5.FDMB_Org;
    AnyRefFrame &Via = ....Seg.Foot.Metatarsal5.FDMB_Via;
    AnyRefFrame &Ins = ....Seg.Foot.ProximalPhalange5.FDMB_Ins;
    AnyDrawMuscle DrwMus = {#include "<ANYBODY_PATH_BODY>/drawSettings/MusDrawSettings.any"};
    #include "MuscleForceDrawing.any"
  };
};


MuscleGroup PeroneusTertius() = {
  AnyMuscleViaPoint PeroneusTertius1 = {
    AnyMuscleModel &MusMdl = ....MuscleModels.PeroneusTertius1Par;
    AnyRefNode &Org = ....Seg.Shank.PeroneusTertius1Node;
    AnyRefNode &Via1 = ....Seg.Shank.PeroneusTertiusViaNode1;
    //AnyRefNode &Via3 = ....Seg.Foot.Cuboid.PeroneusTertiusViaNode3;
    AnyRefNode &Ins = ....Seg.Foot.Metatarsal5.PeroneusTertius1Node;
    AnyDrawMuscle DrwMus = {#include "<ANYBODY_PATH_BODY>/drawSettings/MusDrawSettings.any"};
  };

  AnyMuscleViaPoint PeroneusTertius2 = {
    AnyMuscleModel &MusMdl = ....MuscleModels.PeroneusTertius2Par;
    AnyRefNode &Org = ....Seg.Shank.PeroneusTertius2Node;
    AnyRefNode &Via1 = ....Seg.Shank.PeroneusTertiusViaNode1;
    //  AnyRefNode &Via3 = ..Seg.Cuboid.PeroneusTertiusViaNode3;
    AnyRefNode &Ins = ....Seg.Foot.Metatarsal5.PeroneusTertius2Node;
    AnyDrawMuscle DrwMus = {#include "<ANYBODY_PATH_BODY>/drawSettings/MusDrawSettings.any"};
  };

  AnyMuscleViaPoint PeroneusTertius3 = {
    AnyMuscleModel &MusMdl = ....MuscleModels.PeroneusTertius3Par;
    AnyRefNode &Org = ....Seg.Shank.PeroneusTertius3Node;
    AnyRefNode &Via1 = ....Seg.Shank.PeroneusTertiusViaNode1;
    //  AnyRefNode &Via3 = ..Seg.Cuboid.PeroneusTertiusViaNode3;
    AnyRefNode &Ins = ....Seg.Foot.Metatarsal5.PeroneusTertius3Node;
    AnyDrawMuscle DrwMus = {#include "<ANYBODY_PATH_BODY>/drawSettings/MusDrawSettings.any"};
  };
};
