AnyFolder &FlexorDigitorumLongus1 = FlexorDigitorumLongus.FlexorDigitorumLongus1;
AnyFolder &FlexorDigitorumLongus2 = FlexorDigitorumLongus.FlexorDigitorumLongus2;
AnyFolder &FlexorDigitorumLongus3 = FlexorDigitorumLongus.FlexorDigitorumLongus3;
AnyFolder &FlexorDigitorumLongus4 = FlexorDigitorumLongus.FlexorDigitorumLongus4;
AnyFolder &FlexorHallucisLongus1 = FlexorHallucisLongus.FlexorHallucisLongus1;
AnyFolder &FlexorHallucisLongus2 = FlexorHallucisLongus.FlexorHallucisLongus2;
AnyFolder &FlexorHallucisLongus3 = FlexorHallucisLongus.FlexorHallucisLongus3;
AnyFolder &TibialisPosteriorLateralis1 = TibialisPosteriorLateralis.TibialisPosteriorLateralis1;
AnyFolder &TibialisPosteriorLateralis2 = TibialisPosteriorLateralis.TibialisPosteriorLateralis2;
AnyFolder &TibialisPosteriorLateralis3 = TibialisPosteriorLateralis.TibialisPosteriorLateralis3;
AnyFolder &TibialisPosteriorMedialis1 = TibialisPosteriorMedialis.TibialisPosteriorMedialis1;
AnyFolder &TibialisPosteriorMedialis2 = TibialisPosteriorMedialis.TibialisPosteriorMedialis2;
AnyFolder &TibialisPosteriorMedialis3 = TibialisPosteriorMedialis.TibialisPosteriorMedialis3;
AnyFolder &TibialisAnterior1 = TibialisAnterior.TibialisAnterior1;
AnyFolder &TibialisAnterior2 = TibialisAnterior.TibialisAnterior2;
AnyFolder &TibialisAnterior3 = TibialisAnterior.TibialisAnterior3;
AnyFolder &PeroneusBrevis1 = PeroneusBrevis.PeroneusBrevis1;
AnyFolder &PeroneusBrevis2 = PeroneusBrevis.PeroneusBrevis2;
AnyFolder &PeroneusBrevis3 = PeroneusBrevis.PeroneusBrevis3;
AnyFolder &PeroneusLongus1 = PeroneusLongus.PeroneusLongus1;
AnyFolder &PeroneusLongus2 = PeroneusLongus.PeroneusLongus2;
AnyFolder &PeroneusLongus3 = PeroneusLongus.PeroneusLongus3;
AnyFolder &ExtensorDigitorumLongus1 = ExtensorDigitorumLongus.ExtensorDigitorumLongus1;
AnyFolder &ExtensorDigitorumLongus2 = ExtensorDigitorumLongus.ExtensorDigitorumLongus2;
AnyFolder &ExtensorDigitorumLongus3 = ExtensorDigitorumLongus.ExtensorDigitorumLongus3;
AnyFolder &ExtensorDigitorumLongus4 = ExtensorDigitorumLongus.ExtensorDigitorumLongus4;
AnyFolder &ExtensorHallucisLongus1 = ExtensorHallucisLongus.ExtensorHallucisLongus1;
AnyFolder &ExtensorHallucisLongus2 = ExtensorHallucisLongus.ExtensorHallucisLongus2;
AnyFolder &ExtensorHallucisLongus3 = ExtensorHallucisLongus.ExtensorHallucisLongus3;
Foot = {
  AnyFolder &FlexorDigitorumLongusToe2Tendon = FlexorDigitorumLongusToeTendon.FlexorDigitorumLongusToe2Tendon;
  AnyFolder &FlexorDigitorumLongusToe3Tendon = FlexorDigitorumLongusToeTendon.FlexorDigitorumLongusToe3Tendon;
  AnyFolder &FlexorDigitorumLongusToe4Tendon = FlexorDigitorumLongusToeTendon.FlexorDigitorumLongusToe4Tendon;
  AnyFolder &FlexorDigitorumLongusToe5Tendon = FlexorDigitorumLongusToeTendon.FlexorDigitorumLongusToe5Tendon;
  AnyFolder &ExtensorDigitorumLongusToe2Tendon = ExtensorDigitorumLongusToeTendon.ExtensorDigitorumLongusToe2Tendon;
  AnyFolder &ExtensorDigitorumLongusToe2TendonPart1 = ExtensorDigitorumLongusToeTendon.ExtensorDigitorumLongusToe2TendonPart1;
  AnyFolder &ExtensorDigitorumLongusToe2TendonPart2 = ExtensorDigitorumLongusToeTendon.ExtensorDigitorumLongusToe2TendonPart2;
  AnyFolder &ExtensorDigitorumLongusToe2TendonPart3 = ExtensorDigitorumLongusToeTendon.ExtensorDigitorumLongusToe2TendonPart3;
  AnyFolder &ExtensorDigitorumLongusToe2TendonPart4 = ExtensorDigitorumLongusToeTendon.ExtensorDigitorumLongusToe2TendonPart4;
  AnyFolder &ExtensorDigitorumLongusToe3Tendon = ExtensorDigitorumLongusToeTendon.ExtensorDigitorumLongusToe3Tendon;
  AnyFolder &ExtensorDigitorumLongusToe3TendonPart1 = ExtensorDigitorumLongusToeTendon.ExtensorDigitorumLongusToe3TendonPart1;
  AnyFolder &ExtensorDigitorumLongusToe3TendonPart2 = ExtensorDigitorumLongusToeTendon.ExtensorDigitorumLongusToe3TendonPart2;
  AnyFolder &ExtensorDigitorumLongusToe3TendonPart3 = ExtensorDigitorumLongusToeTendon.ExtensorDigitorumLongusToe3TendonPart3;
  AnyFolder &ExtensorDigitorumLongusToe3TendonPart4 = ExtensorDigitorumLongusToeTendon.ExtensorDigitorumLongusToe3TendonPart4;
  AnyFolder &ExtensorDigitorumLongusToe4Tendon = ExtensorDigitorumLongusToeTendon.ExtensorDigitorumLongusToe4Tendon;
  AnyFolder &ExtensorDigitorumLongusToe4TendonPart1 = ExtensorDigitorumLongusToeTendon.ExtensorDigitorumLongusToe4TendonPart1;
  AnyFolder &ExtensorDigitorumLongusToe4TendonPart2 = ExtensorDigitorumLongusToeTendon.ExtensorDigitorumLongusToe4TendonPart2;
  AnyFolder &ExtensorDigitorumLongusToe4TendonPart3 = ExtensorDigitorumLongusToeTendon.ExtensorDigitorumLongusToe4TendonPart3;
  AnyFolder &ExtensorDigitorumLongusToe4TendonPart4 = ExtensorDigitorumLongusToeTendon.ExtensorDigitorumLongusToe4TendonPart4;
  AnyFolder &ExtensorDigitorumLongusToe5Tendon = ExtensorDigitorumLongusToeTendon.ExtensorDigitorumLongusToe5Tendon;
  AnyFolder &ExtensorDigitorumLongusToe5TendonPart1 = ExtensorDigitorumLongusToeTendon.ExtensorDigitorumLongusToe5TendonPart1;
  AnyFolder &ExtensorDigitorumLongusToe5TendonPart2 = ExtensorDigitorumLongusToeTendon.ExtensorDigitorumLongusToe5TendonPart2;
  AnyFolder &ExtensorDigitorumLongusToe5TendonPart3 = ExtensorDigitorumLongusToeTendon.ExtensorDigitorumLongusToe5TendonPart3;
  AnyFolder &ExtensorDigitorumLongusToe5TendonPart4 = ExtensorDigitorumLongusToeTendon.ExtensorDigitorumLongusToe5TendonPart4;
  AnyFolder &ExtensorHallucisLongusTendonPart1 = ExtensorHallucisLongusTendon.ExtensorHallucisLongusTendonPart1;
  AnyFolder &ExtensorHallucisLongusTendonPart2 = ExtensorHallucisLongusTendon.ExtensorHallucisLongusTendonPart2;
  AnyFolder &ExtensorHallucisLongusTendonPart3 = ExtensorHallucisLongusTendon.ExtensorHallucisLongusTendonPart3;
  #if BM_FOOT_MODEL == _FOOT_MODEL_DETAILED_GM_
  AnyFolder &TibialisPosteriorNavicularTendon = TibialisPosteriorTendon.TibialisPosteriorNavicularTendon;
  AnyFolder &TibialisPosteriorMedCuneiTendon = TibialisPosteriorTendon.TibialisPosteriorMedCuneiTendon;
  AnyFolder &TibialisPosteriorIntCuneiTendon = TibialisPosteriorTendon.TibialisPosteriorIntCuneiTendon;
  AnyFolder &TibialisPosteriorLatCuneiTendon = TibialisPosteriorTendon.TibialisPosteriorLatCuneiTendon;
  AnyFolder &TibialisPosteriorCuboidTendon = TibialisPosteriorTendon.TibialisPosteriorCuboidTendon;
  AnyFolder &TibialisPosteriorMt2Tendon = TibialisPosteriorTendon.TibialisPosteriorMt2Tendon;
  AnyFolder &TibialisPosteriorMt3Tendon = TibialisPosteriorTendon.TibialisPosteriorMt3Tendon;
  AnyFolder &TibialisPosteriorMt4Tendon = TibialisPosteriorTendon.TibialisPosteriorMt4Tendon;
  AnyFolder &TibialisAnteriorMedCuneiTendon = TibialisAnteriorTendon.TibialisAnteriorMedCuneiTendon;
  AnyFolder &TibialisAnteriorMt1Tendon = TibialisAnteriorTendon.TibialisAnteriorMt1Tendon;
  AnyFolder &PeroneusLongusMedCuneiTendon = PeroneusLongusTendon.PeroneusLongusMedCuneiTendon;
  AnyFolder &PeroneusLongusMt1Tendon = PeroneusLongusTendon.PeroneusLongusMt1Tendon;
  #endif
};
