// Definitions of joints in the right lower extremity.
//
// Mark de Zee


#if BM_FOOT_MODEL == _FOOT_MODEL_LEG_FOOT_
/// Ankle joint definition
AnyUniversalJoint Ankle = {
  Axis1 = z; //flexion extension
  Axis2  =  y; //abduction adduction
  AnyRefNode &ShankNode = ..Segments.Shank.AnkleJoint;
  AnyRefNode &FootNode  = ..Segments.Foot.AnkleJoint;
  Constraints.Reaction.Type = {On, On, On, Off}; //See reaction force below, AnkleAxialRotationMoment.
};

// This reaction force replace the reaction moment of the joint, the point is to have this reaction
// applied to the same kinematic measure as the joint muscles. This allowed to output correct moments
// on the joint muscles, otherwise there would be a contribution of the joint reaction to the general muscles
// that result in incorrect values for the eversion joint muscle.
AnyReacForce AnkleAxialRotationMoment ={
AnyKinMeasureOrg AnkleExternalRotation={
    AnyKinRotational Ankle = {
      Type=RotAxesAngles;
      AngVelOnOff = On;
      AnyRefNode &ShankNode = ....Segments.Shank.AnkleJoint.RotNode;
      AnyRefNode &FootNode  = ....Segments.Foot.AnkleJoint.RotNode;
    };
    MeasureOrganizer={0};
  };
};
#endif

/*
AnyRevoluteJoint Ankle = {
  Axis = z; //flexion extension
  AnyRefNode &ShankNode = ..Segments.Shank.AnkleJoint;
  AnyRefNode &FootNode  = ..Segments.Foot.AnkleJoint;
}; // End of Ankle
*/

/// Knee joint definition
AnyRevoluteJoint Knee = {
  Axis = z;
  AnyRefNode &ThighNode = ..Segments.Thigh.KneeJoint;
  AnyRefNode &ShankNode = ..Segments.Shank.KneeJoint;

// Constraints.Reaction.Type = {On, On, On, Off,Off};

}; // End of knee


/// Hip joint definition.
/// Defined with the femoral node first so reactions are reported in femur based reference frame.
AnySphericalJoint Hip = {
  AnyRefNode &ThighNode = ..Segments.Thigh.HipJoint;
  AnyRefNode &PelvisNode = ..HipNodeRef;
}; // End of Hip
