// Definitions of muscles in the right leg
// Mark de Zee

// This is an interface reference to make sure that the
// include file MusDrawSettings2.any always can be left
// unchanged and not affected of different directory
// levels.

AnyFolder &Ref = Main.DrawSettings.Muscle;

AnyMuscleViaPoint Ham = {
  AnyMuscleModel &MusMdl = ..MusPar.HamMdl;
  AnyRefNode &Ins = ..Seg.Shank.HamNodeR;
  AnyRefNode &Via1 = ..Seg.Thigh.HamsViaNode1R;
  AnyRefNode &Org = ..HipNodeRef.HamNodeR;
  viewMuscle = {#include "../DrawSettings/MusDrawSettings2.any"};
};

AnyMuscleViaPoint BiFemSh = {
  AnyMuscleModel &MusMdl = ..MusPar.BiFemShMdl;
  AnyRefNode &Ins = ..Seg.Shank.BiFemShNodeR;
  AnyRefNode &Org = ..Seg.Thigh.BiFemShNodeR;
  viewMuscle = {#include "../DrawSettings/MusDrawSettings2.any"};
};

AnyMuscleViaPoint GlutMax = {
  AnyMuscleModel &MusMdl = ..MusPar.GlutMaxMdl;
  AnyRefNode &Ins = ..Seg.Thigh.GlutMaxNodeR;
  AnyRefNode &Via3 = ..Seg.Thigh.GlutMaxViaNode2R;
  AnyRefNode &Via2 = ..HipNodeRef.GlutMaxViaNode2R;
  AnyRefNode &Via1 = ..HipNodeRef.GlutMaxViaNode1R;
  AnyRefNode &Org = ..HipNodeRef.GlutMaxNodeR;
  viewMuscle = {#include "../DrawSettings/MusDrawSettings2.any"};
};

AnyMuscleViaPoint RectFem = {
  AnyMuscleModel &MusMdl = ..MusPar.RectFemMdl;
  AnyRefNode &Ins = ..Seg.Shank.Rect_FemNodeR;
  AnyRefNode &Via2 = ..Seg.Thigh.Rect_FemViaNode2R;
  AnyRefNode &Org = ..HipNodeRef.Rect_FemNodeR;
  viewMuscle = {#include "../DrawSettings/MusDrawSettings2.any"};
};

AnyMuscleViaPoint Vasti = {
  AnyMuscleModel &MusMdl = ..MusPar.VastiMdl;
  AnyRefNode &Ins = ..Seg.Shank.VastiNodeR;
  AnyRefNode &Via2 = ..Seg.Thigh.VastiViaNode2R; //In SIMM one can define in which range this ViaPoint is working, which is not possible in AnyBody
  AnyRefNode &Via1 = ..Seg.Thigh.VastiViaNode1R;
  AnyRefNode &Org = ..Seg.Thigh.VastiNodeR;
  viewMuscle = {#include "../DrawSettings/MusDrawSettings2.any"};
};

AnyMuscleViaPoint Gas = {
  AnyMuscleModel &MusMdl = ..MusPar.GasMdl;
  AnyRefNode &Ins = ..Seg.Foot.GasNodeR;
  AnyRefNode &Via2 = ..Seg.Shank.GasViaNode2R;
  //AnyRefNode &Via1 = ..Seg.Thigh.GasViaNode1R; //In SIMM one can define in which range this ViaPoint is working, which is not possible in AnyBody
  AnyRefNode &Org = ..Seg.Thigh.GasNodeR;
  viewMuscle = {#include "../DrawSettings/MusDrawSettings2.any"};
};

AnyMuscleViaPoint Sol = {
  AnyMuscleModel &MusMdl = ..MusPar.SolMdl;
  AnyRefNode &Ins = ..Seg.Foot.SolNodeR;
  AnyRefNode &Org = ..Seg.Shank.SolNodeR;
  viewMuscle = {#include "../DrawSettings/MusDrawSettings2.any"};
};

AnyMuscleViaPoint TibAnt = {
  AnyMuscleModel &MusMdl = ..MusPar.TibAntMdl;
  AnyRefNode &Ins = ..Seg.Foot.Tib_AntNodeR;
  AnyRefNode &Via1 = ..Seg.Shank.Tib_AntViaNode1R;
  AnyRefNode &Org = ..Seg.Shank.Tib_AntNodeR;
  viewMuscle = {#include "../DrawSettings/MusDrawSettings2.any"};
};
