//This file contains the interface to the leg it consist of joints and
//nodes which can be used for defining contact with the sorroundings

#if (BM_FOOT_MODEL == _FOOT_MODEL_LEG_FOOT_) | (BM_FOOT_MODEL == _FOOT_MODEL_RIGID_GM_) | (BM_FOOT_MODEL == _FOOT_MODEL_TOE_FLEX_GM_) | (BM_FOOT_MODEL == _FOOT_MODEL_DETAILED_GM_)

AnyKinMeasureLinComb AnklePlantarFlexion = {
  AnyKinRotational RotMeasure = {
    Type=RotAxesAngles;
    Axis1 = z; Axis2 = x; Axis3 = y;
    AnyRefNode &ShankNode = ...Segments.Shank.AnkleJoint;
    AnyRefNode &FootNode  = ...Segments.Talus.AnkleJoint;
  };
  Coef = {{-1,0,0}};
  OutDim = 1;
};

AnyKinMeasureOrg SubTalarEversion={

  AnyFolder &Talus = ..Segments.Talus.SubTalarJoint;
  Talus ={
    AnyRefNode RotNode={
      ARel={{0,....Sign*-1,0},{....Sign*1,0,0},{0,0,1}};
    };
  };
  AnyFolder &Foot = ..Segments.Foot.SubTalarJoint;
  Foot ={
    AnyRefNode RotNode={
      ARel={{....Sign*1,0,0},{0,....Sign*1,0},{0,0,1}};
    };
  };
  AnyKinRotational Ankle = {
    Type=RotAxesAngles;
    AnyRefNode &TalusNode = ...Segments.Talus.SubTalarJoint;
    AnyRefNode &SubTalarNode  = ...Segments.Foot.SubTalarJoint;

  }; // End of SubTalar
  MeasureOrganizer={0};
};

#endif


AnyKinMeasureOrg KneeFlexion = {
  AnyFolder &Thigh = ..Segments.Thigh.KneeJoint;
  Thigh ={
    AnyRefNode RotNode={
      ARel={{....Sign*1,0,0},{0,....Sign*1,0},{0,0,1}};
    };
  };
  AnyFolder &Shank = ..Segments.Shank.KneeJoint;
  Shank ={
    AnyRefNode RotNode={
      ARel={{....Sign*1,0,0},{0,....Sign*1,0},{0,0,1}};
    };
  };
  AnyKinRotational KneeRot={
    AnyRefNode &ShankNode = ...Segments.Shank.KneeJoint.RotNode;
    AnyRefNode &ThighNode = ...Segments.Thigh.KneeJoint.RotNode;
    Type=RotAxesAngles;
  };
  MeasureOrganizer={0};
};


AnyKinMeasureOrg PatellaFlexion = {
  AnyFolder &Thigh = ..Segments.Thigh.PatellaFemurJoint;
  Thigh ={
    AnyRefNode RotNode={
      ARel={{....Sign*1,0,0},{0,....Sign*1,0},{0,0,1}};
    };
  };
  AnyFolder &Patella = ..Segments.Patella.PatellaFemurJoint;
  Patella ={
    AnyRefNode RotNode={
      ARel={{....Sign*1,0,0},{0,....Sign*1,0},{0,0,1}};
    };
  };
  AnyKinRotational PatellaMeasure={
    AnyRefNode &ThighNode = ...Segments.Thigh.PatellaFemurJoint.RotNode;
    AnyRefNode &PatellaNode = ...Segments.Patella.PatellaFemurJoint.RotNode;
    Type=RotAxesAngles;
  };
  MeasureOrganizer={0};
};

AnyKinMeasureOrg HipFlexion = {
  AnyFolder &HipJointRef=..Segments.Pelvis.HipJoint;
  HipJointRef={
    AnyRefNode RotNode={
      ARel= {{....Sign*-1,0,0},{0,....Sign*-1,0},{0,0,1}};
    };
  };
  AnyFolder &ThighNodeRef = ..Segments.Thigh.HipJoint;
  ThighNodeRef ={
    AnyRefNode RotNode={
      ARel={{....Sign*-1,0,0},{0,....Sign*-1,0},{0,0,1}};
    };
  };
  AnyKinRotational HipMeasure ={
    AnyRefNode &PelvisNode = ...Segments.Pelvis.HipJoint.RotNode;
    AnyRefNode &ThighNode = ...Segments.Thigh.HipJoint.RotNode;
    PelvisNode={AnyDrawRefFrame drw={RGB={1,0,0};Visible = Off;}; };
    ThighNode={AnyDrawRefFrame drw={RGB={0,1,0};Visible = Off;};  };
    Axis1 = z; Axis2 = x;  Axis3 = y;
    Type=RotAxesAngles;
  };
  MeasureOrganizer={0};
};
AnyKinMeasureOrg HipAbduction = {
  AnyKinRotational &HipJoint =.HipFlexion.HipMeasure;
  MeasureOrganizer={1};
};
AnyKinMeasureOrg HipExternalRotation ={
  AnyKinRotational &HipJoint =.HipFlexion.HipMeasure;
  MeasureOrganizer={2};
};

/// International society of Biomechancis (ISB) defines hip rotation relative to
/// a ASIS-PSIS defined frame. The joint angles in this folder reflects those values
/// Note: these values are not 0 in the neutral position of the model since ASIS-PSIS are
///       a different heights.
AnyFolder HipISB = {

  AnyKinMeasureOrg Flexion = {
    AnyFolder &HipJointRef=...Segments.Pelvis.HipJoint.ISB;
    HipJointRef={
        AnyRefNode RotNode={
          ARel= {{.....Sign*-1,0,0},{0,.....Sign*-1,0},{0,0,1}};
        };
    };
    AnyKinRotational HipMeasure ={
      AnyRefNode &PelvisNode = ....Segments.Pelvis.HipJoint.ISB.RotNode;
      AnyRefNode &ThighNode = ....Segments.Thigh.HipJoint.RotNode;
      Axis1 = z; Axis2 = x;  Axis3 = y;
      Type=RotAxesAngles;
    };
    MeasureOrganizer={0};
  };
  AnyKinMeasureOrg Abduction = {
    AnyKinRotational &HipJoint =.Flexion.HipMeasure;
    MeasureOrganizer={1};
  };
  AnyKinMeasureOrg ExternalRotation ={
    AnyKinRotational &HipJoint =.Flexion.HipMeasure;
    MeasureOrganizer={2};
  };

};


AnyKinMeasureOrg HipFlexionJntMus = {
  AnyKinRotational HipMeasure ={
    AnyRefNode &PelvisNode = ...Segments.Pelvis.HipJoint.RotNode;
    AnyRefNode &ThighNode = ...Segments.Thigh.HipJoint.RotNode;
    AngVelOnOff = On; // xyz vector output
    Type=RotAxesAngles;
  };
  MeasureOrganizer={2};
};
AnyKinMeasureOrg HipAbductionJntMus = {
  AnyKinRotational &HipJoint =.HipFlexionJntMus.HipMeasure;
  MeasureOrganizer={0};
};
AnyKinMeasureOrg HipExternalRotationJntMus ={
  AnyKinRotational &HipJoint =.HipFlexionJntMus.HipMeasure;
  MeasureOrganizer={1};
};


//AnyRefNode &HeelContactNode =.Segments.Foot.Calcaneus.HeelNode;
//AnyRefNode &ToeMedialContactNode  =.Segments.Foot.ProximalPhalange1.ToeMedialContactNode;
//AnyRefNode &ToeLateralContactNode =.Segments.Foot.ProximalPhalange5.ToeLateralContactNode;
//
