AnyVar AnyVar_HipFlexion = .InterfaceFolder.HipFlexion.Pos[0]*180/pi;
AnyVar AnyVar_HipAbduction = .InterfaceFolder.HipAbduction.Pos[0]*180/pi;
AnyVar AnyVar_HipExternalRotation = .InterfaceFolder.HipExternalRotation.Pos[0]*180/pi;

//AnyVar AnyVar_PatellaFlexion = .InterfaceFolder.PatellaFlexion.Pos[0]*180/pi;
//AnyVar AnyVar_PatellaRotation = .InterfaceFolder.PatellaRotation.Pos[0]*180/pi;

AnyVar AnyVar_KneeFlexion = .InterfaceFolder.KneeFlexion.Pos[0]*180/pi;

#if ((BM_FOOT_MODEL == _FOOT_MODEL_LEG_DEFAULT_) | (BM_FOOT_MODEL == _FOOT_MODEL_RIGID_GM_) | (BM_FOOT_MODEL == _FOOT_MODEL_TOE_FLEX_GM_) | (BM_FOOT_MODEL == _FOOT_MODEL_DETAILED_GM_))
AnyVar AnyVar_AnklePlantarFlexion =.InterfaceFolder.AnklePlantarFlexion.Pos[0]*180/pi;
//AnyVar AnyVar_AnkleEversion =.InterfaceFolder.AnkleEversion.Pos[0]*180/pi;

AnyVar AnyVar_SubTalarEversion = .InterfaceFolder.SubTalarEversion.Pos[0]*180/pi;
#endif

#if ((BM_FOOT_MODEL == _FOOT_MODEL_TOE_FLEX_GM_) | (BM_FOOT_MODEL == _FOOT_MODEL_DETAILED_GM_))

AnyFolder Foot = {
  #if BM_FOOT_MODEL == _FOOT_MODEL_DETAILED_GM_

  AnyVar AnyVar_CalcaneoCuboidDorsiFlexion = ..InterfaceFolder.CalcaneoCuboidDorsiFlexion.Pos[0]*180/pi;
  AnyVar AnyVar_CalcaneoCuboidAbduction = ..InterfaceFolder.CalcaneoCuboidAbduction.Pos[0]*180/pi;
  AnyVar AnyVar_CalcaneoCuboidEversion = ..InterfaceFolder.CalcaneoCuboidEversion.Pos[0]*180/pi;
  AnyVar AnyVar_TaloNavicularDorsiFlexion = ..InterfaceFolder.TaloNavicularDorsiFlexion.Pos[0]*180/pi;
  AnyVar AnyVar_TaloNavicularAbduction = ..InterfaceFolder.TaloNavicularAbduction.Pos[0]*180/pi;
  AnyVar AnyVar_TaloNavicularEversion = ..InterfaceFolder.TaloNavicularEversion.Pos[0]*180/pi;
  AnyVar AnyVar_NaviculoMedialCuneiformDorsiFlexion = ..InterfaceFolder.NaviculoMedialCuneiformDorsiFlexion.Pos[0]*180/pi;
  AnyVar AnyVar_NaviculoMedialCuneiformAbduction = ..InterfaceFolder.NaviculoMedialCuneiformAbduction.Pos[0]*180/pi;
  AnyVar AnyVar_NaviculoIntermediateCuneiformDorsiFlexion = ..InterfaceFolder.NaviculoIntermediateCuneiformDorsiFlexion.Pos[0]*180/pi;
  AnyVar AnyVar_NaviculoIntermediateCuneiformAbduction = ..InterfaceFolder.NaviculoIntermediateCuneiformAbduction.Pos[0]*180/pi;
  AnyVar AnyVar_NaviculoLateralCuneiformDorsiFlexion = ..InterfaceFolder.NaviculoLateralCuneiformDorsiFlexion.Pos[0]*180/pi;
  AnyVar AnyVar_NaviculoLateralCuneiformAbduction = ..InterfaceFolder.NaviculoLateralCuneiformAbduction.Pos[0]*180/pi;
  AnyVar AnyVar_TarsoMetatarsal1DorsiFlexion = ..InterfaceFolder.TarsoMetatarsal1DorsiFlexion.Pos[0]*180/pi;
  AnyVar AnyVar_TarsoMetatarsal1Abduction = ..InterfaceFolder.TarsoMetatarsal1Abduction.Pos[0]*180/pi;
  AnyVar AnyVar_TarsoMetatarsal2DorsiFlexion = ..InterfaceFolder.TarsoMetatarsal2DorsiFlexion.Pos[0]*180/pi;
  AnyVar AnyVar_TarsoMetatarsal2Abduction = ..InterfaceFolder.TarsoMetatarsal2Abduction.Pos[0]*180/pi;
  AnyVar AnyVar_TarsoMetatarsal3DorsiFlexion = ..InterfaceFolder.TarsoMetatarsal3DorsiFlexion.Pos[0]*180/pi;
  AnyVar AnyVar_TarsoMetatarsal3Abduction = ..InterfaceFolder.TarsoMetatarsal3Abduction.Pos[0]*180/pi;
  AnyVar AnyVar_TarsoMetatarsal4DorsiFlexion = ..InterfaceFolder.TarsoMetatarsal4DorsiFlexion.Pos[0]*180/pi;
  AnyVar AnyVar_TarsoMetatarsal4Abduction = ..InterfaceFolder.TarsoMetatarsal4Abduction.Pos[0]*180/pi;
  AnyVar AnyVar_TarsoMetatarsal5SkewDorsiFlexion = ..InterfaceFolder.TarsoMetatarsal5SkewDorsiFlexion.Pos[0]*180/pi;
  AnyVar AnyVar_TarsoMetatarsal5Abduction = ..InterfaceFolder.TarsoMetatarsal5Abduction.Pos[0]*180/pi;

  #endif //BM_FOOT_MODEL == _FOOT_MODEL_DETAILED_GM_

  AnyVar AnyVar_MetatarsoPhalangeal1DorsiFlexion = ..InterfaceFolder.MetatarsoPhalangeal1DorsiFlexion.Pos[0]*180/pi;

  #if BM_FOOT_MODEL == _FOOT_MODEL_DETAILED_GM_
  AnyVar AnyVar_MetatarsoPhalangeal1Abduction = ..InterfaceFolder.MetatarsoPhalangeal1Abduction.Pos[0]*180/pi;
  #endif

  AnyVar AnyVar_MetatarsoPhalangeal2DorsiFlexion = ..InterfaceFolder.MetatarsoPhalangeal2DorsiFlexion.Pos[0]*180/pi;

  #if BM_FOOT_MODEL == _FOOT_MODEL_DETAILED_GM_
  AnyVar AnyVar_MetatarsoPhalangeal2Abduction = ..InterfaceFolder.MetatarsoPhalangeal2Abduction.Pos[0]*180/pi;
  #endif

  AnyVar AnyVar_MetatarsoPhalangeal3DorsiFlexion = ..InterfaceFolder.MetatarsoPhalangeal3DorsiFlexion.Pos[0]*180/pi;

  #if BM_FOOT_MODEL == _FOOT_MODEL_DETAILED_GM_
  AnyVar AnyVar_MetatarsoPhalangeal3Abduction = ..InterfaceFolder.MetatarsoPhalangeal3Abduction.Pos[0]*180/pi;
  #endif

  AnyVar AnyVar_MetatarsoPhalangeal4DorsiFlexion = ..InterfaceFolder.MetatarsoPhalangeal4DorsiFlexion.Pos[0]*180/pi;

  #if BM_FOOT_MODEL == _FOOT_MODEL_DETAILED_GM_
  AnyVar AnyVar_MetatarsoPhalangeal4Abduction = ..InterfaceFolder.MetatarsoPhalangeal4Abduction.Pos[0]*180/pi;
  #endif

  AnyVar AnyVar_MetatarsoPhalangeal5DorsiFlexion = ..InterfaceFolder.MetatarsoPhalangeal5DorsiFlexion.Pos[0]*180/pi;

  #if BM_FOOT_MODEL == _FOOT_MODEL_DETAILED_GM_
  AnyVar AnyVar_MetatarsoPhalangeal5Abduction = ..InterfaceFolder.MetatarsoPhalangeal5Abduction.Pos[0]*180/pi;
  AnyVar AnyVar_ProximoDistalPhalange1DorsiFlexion = ..InterfaceFolder.ProximoDistalPhalange1DorsiFlexion.Pos[0]*180/pi;
  AnyVar AnyVar_ProximoMedialPhalange2DorsiFlexion = ..InterfaceFolder.ProximoMedialPhalange2DorsiFlexion.Pos[0]*180/pi;
  AnyVar AnyVar_ProximoMedialPhalange3DorsiFlexion = ..InterfaceFolder.ProximoMedialPhalange3DorsiFlexion.Pos[0]*180/pi;
  AnyVar AnyVar_ProximoMedialPhalange4DorsiFlexion = ..InterfaceFolder.ProximoMedialPhalange4DorsiFlexion.Pos[0]*180/pi;
  AnyVar AnyVar_ProximoMedialPhalange5DorsiFlexion = ..InterfaceFolder.ProximoMedialPhalange5DorsiFlexion.Pos[0]*180/pi;
  AnyVar AnyVar_MedioDistalPhalange2DorsiFlexion = ..InterfaceFolder.MedioDistalPhalange2DorsiFlexion.Pos[0]*180/pi;
  AnyVar AnyVar_MedioDistalPhalange3DorsiFlexion = ..InterfaceFolder.MedioDistalPhalange3DorsiFlexion.Pos[0]*180/pi;
  AnyVar AnyVar_MedioDistalPhalange4DorsiFlexion = ..InterfaceFolder.MedioDistalPhalange4DorsiFlexion.Pos[0]*180/pi;
  AnyVar AnyVar_MedioDistalPhalange5DorsiFlexion = ..InterfaceFolder.MedioDistalPhalange5DorsiFlexion.Pos[0]*180/pi;

  #endif  // BM_FOOT_MODEL == _FOOT_MODEL_DETAILED_GM_

};
#endif // ((BM_FOOT_MODEL == _FOOT_MODEL_TOE_FLEX_GM_) | (BM_FOOT_MODEL == _FOOT_MODEL_DETAILED_GM_))
