// Definitions of muscles in the right lower extremity

// Muscles and muscle-parts added, based on the Klein Horsman dataset. Karin Gorter, 9-2007

// Mark de Zee

// Sartorius, gracilis added to "hamstrings" biarticular
// muscles 26-6-02. GMax split into three, tensor fasciae
// latae added 5-9-02
// Mark Thompson

// -------------------------------------------------------
// This is an interface reference to make sure that the
// include file MusDrawSettings.any always can be left
// unchanged and not affected by different directory
// levels.
// -------------------------------------------------------

#if BM_COMPATIBILITY_MUSCLE_STRUCTURE == ON
  #include "ammr_3.0_compatibility_structure.any"
#endif

#if ((BM_FOOT_MODEL == _FOOT_MODEL_LEG_FOOT_) | (BM_FOOT_MODEL == _FOOT_MODEL_RIGID_GM_) | (BM_FOOT_MODEL == _FOOT_MODEL_TOE_FLEX_GM_) | (BM_FOOT_MODEL == _FOOT_MODEL_DETAILED_GM_))

  MuscleGroup SoleusMedialis() = {
    AnyMuscleShortestPath SoleusMedialis1 = {
      AnyMuscleModel &MusMdl = ...MuscleModels.SoleusMedialis1Par;
      AnyRefNode &Org = ...Segments.Shank.SoleusMedialis1Node;
      AnyRefNode &Via1 = ...Segments.Foot.Calcaneus.SoleusMedialis1SuperiorNode;
      AnyRefNode &Ins = ...Segments.Foot.Calcaneus.SoleusMedialis1Node;
      AnySurface &srf1 = ...Segments.Shank.AchillesWrapping1.Cyl;
      AnySurface &srf2 = ...Segments.Shank.AchillesWrapping2.Cyl;
      SPLine = {
        StringSurfaceMap = {{On,On},{Off,Off}};
        StringMesh = {30,3};
        AnyMatrix InitWrapPos = {
          transf3D({1.005*.srf1.Radius, 0, 0.5*.srf1.Length }, &.srf1 ) ,
          transf3D({-1.005*.srf2.Radius, 0, 0.5*.srf2.Length }, &.srf2 )
        };
        InitWrapPosVecArr = {&InitWrapPos, None};
      };
      viewMuscle = {#include "../DrawSettings/MusDrawSettings.any"};
    };

    AnyMuscleShortestPath SoleusMedialis2 = {
      AnyMuscleModel &MusMdl = ...MuscleModels.SoleusMedialis2Par;
      AnyRefNode &Org = ...Segments.Shank.SoleusMedialis2Node;
      AnyRefNode &Via1 = ...Segments.Foot.Calcaneus.SoleusMedialis2SuperiorNode;
      AnyRefNode &Ins = ...Segments.Foot.Calcaneus.SoleusMedialis2Node;
      AnySurface &srf1 = ...Segments.Shank.AchillesWrapping1.Cyl;
      AnySurface &srf2 = ...Segments.Shank.AchillesWrapping2.Cyl;
      SPLine.StringSurfaceMap = {{On,On},{Off,Off}};
      SPLine.StringMesh = {30,3};
      SPLine.InitWrapPosVecArr = .SoleusMedialis1.SPLine.InitWrapPosVecArr;
      viewMuscle = {#include "../DrawSettings/MusDrawSettings.any"};
    };

    AnyMuscleShortestPath SoleusMedialis3 = {
      AnyMuscleModel &MusMdl = ...MuscleModels.SoleusMedialis3Par;
      AnyRefNode &Org = ...Segments.Shank.SoleusMedialis3Node;
      AnyRefNode &Via1 = ...Segments.Foot.Calcaneus.SoleusMedialis3SuperiorNode;
      AnyRefNode &Ins = ...Segments.Foot.Calcaneus.SoleusMedialis3Node;
      AnySurface &srf1 = ...Segments.Shank.AchillesWrapping1.Cyl;
      AnySurface &srf2 = ...Segments.Shank.AchillesWrapping2.Cyl;
      SPLine.StringSurfaceMap = {{On,On},{Off,Off}};
      SPLine.StringMesh = {30,3};
      SPLine.InitWrapPosVecArr = .SoleusMedialis1.SPLine.InitWrapPosVecArr;
      viewMuscle = {#include "../DrawSettings/MusDrawSettings.any"};
    };
  };

  MuscleGroup SoleusLateralis() = {
    AnyMuscleShortestPath SoleusLateralis1 = {
      AnyMuscleModel &MusMdl = ...MuscleModels.SoleusLateralis1Par;
      AnyRefNode &Org = ...Segments.Shank.SoleusLateralis1Node;
      AnyRefNode &Via1 = ...Segments.Foot.Calcaneus.SoleusLateralis1SuperiorNode;
      AnyRefNode &Ins = ...Segments.Foot.Calcaneus.SoleusLateralis1Node;
      AnySurface &srf1 = ...Segments.Shank.AchillesWrapping1.Cyl;
      AnySurface &srf2 = ...Segments.Shank.AchillesWrapping2.Cyl;
      SPLine.StringSurfaceMap = {{On,On},{Off,Off}};
      SPLine.StringMesh = {30,3};
      SPLine.InitWrapPosVecArr = ..SoleusMedialis.SoleusMedialis1.SPLine.InitWrapPosVecArr;
      viewMuscle = {#include "../DrawSettings/MusDrawSettings.any"};
    };

    AnyMuscleShortestPath SoleusLateralis2 = {
      AnyMuscleModel &MusMdl = ...MuscleModels.SoleusLateralis2Par;
      AnyRefNode &Org = ...Segments.Shank.SoleusLateralis2Node;
      AnyRefNode &Via1 = ...Segments.Foot.Calcaneus.SoleusLateralis2SuperiorNode;
      AnyRefNode &Ins = ...Segments.Foot.Calcaneus.SoleusLateralis2Node;
      AnySurface &srf1 = ...Segments.Shank.AchillesWrapping1.Cyl;
      AnySurface &srf2 = ...Segments.Shank.AchillesWrapping2.Cyl;
      SPLine.StringSurfaceMap = {{On,On},{Off,Off}};
      SPLine.StringMesh = {30,3};
      SPLine.InitWrapPosVecArr = ..SoleusMedialis.SoleusMedialis1.SPLine.InitWrapPosVecArr;
      viewMuscle = {#include "../DrawSettings/MusDrawSettings.any"};
    };

    AnyMuscleShortestPath SoleusLateralis3 = {
      AnyMuscleModel &MusMdl = ...MuscleModels.SoleusLateralis3Par;
      AnyRefNode &Org = ...Segments.Shank.SoleusLateralis3Node;
      AnyRefNode &Via1 = ...Segments.Foot.Calcaneus.SoleusLateralis3SuperiorNode;
      AnyRefNode &Ins = ...Segments.Foot.Calcaneus.SoleusLateralis3Node;
      AnySurface &srf1 = ...Segments.Shank.AchillesWrapping1.Cyl;
      AnySurface &srf2 = ...Segments.Shank.AchillesWrapping2.Cyl;
      SPLine.StringSurfaceMap = {{On,On},{Off,Off}};
      SPLine.StringMesh = {30,3};
      SPLine.InitWrapPosVecArr = ..SoleusMedialis.SoleusMedialis1.SPLine.InitWrapPosVecArr;
      viewMuscle = {#include "../DrawSettings/MusDrawSettings.any"};
    };
  };

  MuscleGroup GastrocnemiusLateralis() = {
    AnyMuscleShortestPath GastrocnemiusLateralis1 = {
      AnyMuscleModel &MusMdl = ...MuscleModels.GastrocnemiusLateralis1Par;
      AnyRefNode &Org = ...Segments.Thigh.GastrocnemiusLateralis1Node;
      AnySurface &srf = ...Segments.Thigh.GastroWrapSurf.cyl;
      AnySurface &srf1 = ...Segments.Shank.AchillesWrapping1.Cyl;
      AnySurface &srf2 = ...Segments.Shank.AchillesWrapping2.Cyl;
      AnyRefNode &Via7 = ...Segments.Shank.GastrocnemiusLateralis7ViaNode;
      AnyRefNode &Via8 = ...Segments.Shank.GastrocnemiusLateralis8ViaNode;
      AnyRefNode &Via9 = ...Segments.Shank.GastrocnemiusLateralis9ViaNode;
      AnyRefNode &Via10 = ...Segments.Foot.Calcaneus.GastrocnemiusLateralis1SuperiorNode;
      AnyRefNode &Ins = ...Segments.Foot.Calcaneus.GastrocnemiusLateralis1Node;
      SPLine = {
        StringMesh = {30,3,3,30,3};
        StringSurfaceMap = {{On,Off,Off}, {Off,Off,Off}, {Off,Off,Off}, {Off,On,On}, {Off,Off,Off}};
        AnyMatrix InitWrapPos1 = {
          transf3D({1.1*.srf.Radius, ....Sign*1.1*.srf.Radius, 0.5*.srf.Length }, &.srf ) ,
        };
        AnyMatrix InitWrapPos2 = {
          transf3D({1.005*.srf1.Radius, 0, 0.5*.srf1.Length }, &.srf1 ) ,
          transf3D({-1.005*.srf2.Radius, 0, 0.5*.srf2.Length }, &.srf2 )
        };

        InitWrapPosVecArr = {&InitWrapPos1,None,None,&InitWrapPos2, None};
      };
      viewMuscle = {#include "../DrawSettings/MusDrawSettings.any"};
    };
  };

  MuscleGroup GastrocnemiusMedialis() = {
    AnyMuscleShortestPath GastrocnemiusMedialis1 = {
      AnyMuscleModel &MusMdl = ...MuscleModels.GastrocnemiusMedialis1Par;
      AnyRefNode &Org = ...Segments.Thigh.GastrocnemiusMedialis1Node;
      AnyRefNode &Via1 = ...Segments.Thigh.GastrocnemiusMedialis1ViaNode;
      AnySurface &srf = ...Segments.Thigh.GastroWrapSurf.cyl;
      AnySurface &srf1 = ...Segments.Shank.AchillesWrapping1.Cyl;
      AnySurface &srf2 = ...Segments.Shank.AchillesWrapping2.Cyl;
      AnyRefNode &Via4 = ...Segments.Shank.GastrocnemiusMedialis4ViaNode;
      AnyRefNode &Via5 = ...Segments.Shank.GastrocnemiusMedialis5ViaNode;
      AnyRefNode &Via6 = ...Segments.Shank.GastrocnemiusMedialis6ViaNode;
      AnyRefNode &Via7 = ...Segments.Shank.GastrocnemiusMedialis7ViaNode;
      AnyRefNode &Via8 = ...Segments.Foot.Calcaneus.GastrocnemiusMedialis1SuperiorNode;
      AnyRefNode &Ins = ...Segments.Foot.Calcaneus.GastrocnemiusMedialis1Node;
      SPLine.StringMesh = {3,30,3,3,3,30,3};
      SPLine.StringSurfaceMap = {{Off,Off,Off}, {On,Off,Off}, {Off,Off,Off},{Off,Off,Off},{Off,Off,Off},{Off,On,On}, {Off,Off,Off}};
      SPLine.InitWrapPosVecArr = {
        None,
        &..GastrocnemiusLateralis.GastrocnemiusLateralis1.SPLine.InitWrapPos1,
        None,
        None,
        None,
        &..GastrocnemiusLateralis.GastrocnemiusLateralis1.SPLine.InitWrapPos2,
        None
      };
      viewMuscle = {#include "../DrawSettings/MusDrawSettings.any"};
    };
  };

  MuscleGroup Plantaris = {
    AnyMuscleShortestPath Plantaris1 = {
      AnyMuscleModel &MusMdl = ...MuscleModels.Plantaris1Par;
      AnyRefNode &Org = ...Segments.Thigh.Plantaris1Node;
      AnySurface &srf = ...Segments.Thigh.GastroWrapSurf.cyl;
      AnySurface &srf1 = ...Segments.Shank.AchillesWrapping1.Cyl;
      AnySurface &srf2 = ...Segments.Shank.AchillesWrapping2.Cyl;
      AnyRefNode &Via1 = ...Segments.Foot.Calcaneus.Plantaris1SuperiorNode;
      AnyRefNode &Ins = ...Segments.Foot.Calcaneus.Plantaris1Node;
      SPLine = {
        StringSurfaceMap = {{On,On,On},{Off,Off,Off}};
        StringMesh = {30,3};
        AnyMatrix InitWrapPos = {
          transf3D({1.1*.srf.Radius, ....Sign*1.1*.srf.Radius, 0.5*.srf.Length }, &.srf ) ,
          transf3D({1.005*.srf1.Radius, 0, 0.5*.srf1.Length }, &.srf1 ) ,
          transf3D({-1.005*.srf2.Radius, 0, 0.5*.srf2.Length }, &.srf2 )
        };
        InitWrapPosVecArr = {&InitWrapPos, None};
      };
      viewMuscle = {#include "../DrawSettings/MusDrawSettings.any"};
    };
  };

  #if BM_FOOT_MODEL == _FOOT_MODEL_LEG_FOOT_

  MuscleGroup FlexorDigitorumLongus() = {
    AnyMuscleViaPoint FlexorDigitorumLongus1 = {
      AnyMuscleModel &MusMdl = ...MuscleModels.FlexorDigitorumLongus1Par;
      AnyRefNode &Org = ...Segments.Shank.FlexorDigitorumLongus1Node;
      AnyRefNode &Via1 = ...Segments.Shank.FlexorDigitorumLongusViaNode1;
      AnyRefNode &Via2 = ...Segments.Shank.FlexorDigitorumLongusViaNode2;
      AnyRefNode &Via3 = ...Segments.Shank.FlexorDigitorumLongusViaNode3;
      AnyRefNode &Via4 = ...Segments.Shank.FlexorDigitorumLongusViaNode4;
      AnyRefNode &Via5 = ...Segments.Shank.FlexorDigitorumLongusViaNode5;
    //  AnyRefNode &Via6 = ...Segments.Shank.FlexorDigitorumLongusViaNode6;
      AnyRefNode &Via7 = ...Segments.Foot.FlexorDigitorumLongusViaNode7;
      AnyRefNode &Via8 = ...Segments.Foot.FlexorDigitorumLongusViaNode8;
    //  AnyRefNode &Via9 = ...Segments.Foot.FlexorDigitorumLongusViaNode9;
      AnyRefNode &Ins = ...Segments.Foot.FlexorDigitorumLongus1Node;
      viewMuscle = {#include "../DrawSettings/MusDrawSettings.any"};
    };

    AnyMuscleViaPoint FlexorDigitorumLongus2 = {
      AnyMuscleModel &MusMdl = ...MuscleModels.FlexorDigitorumLongus2Par;
      AnyRefNode &Org = ...Segments.Shank.FlexorDigitorumLongus2Node;
      AnyRefNode &Via1 = ...Segments.Shank.FlexorDigitorumLongusViaNode1;
      AnyRefNode &Via2 = ...Segments.Shank.FlexorDigitorumLongusViaNode2;
      AnyRefNode &Via3 = ...Segments.Shank.FlexorDigitorumLongusViaNode3;
      AnyRefNode &Via4 = ...Segments.Shank.FlexorDigitorumLongusViaNode4;
      AnyRefNode &Via5 = ...Segments.Shank.FlexorDigitorumLongusViaNode5;
    //  AnyRefNode &Via6 = ...Segments.Shank.FlexorDigitorumLongusViaNode6;
      AnyRefNode &Via7 = ...Segments.Foot.FlexorDigitorumLongusViaNode7;
      AnyRefNode &Via8 = ...Segments.Foot.FlexorDigitorumLongusViaNode8;
    // AnyRefNode &Via9 = ...Segments.Foot.FlexorDigitorumLongusViaNode10;
      AnyRefNode &Ins = ...Segments.Foot.FlexorDigitorumLongus2Node;
      viewMuscle = {#include "../DrawSettings/MusDrawSettings.any"};
    };

    AnyMuscleViaPoint FlexorDigitorumLongus3 = {
      AnyMuscleModel &MusMdl = ...MuscleModels.FlexorDigitorumLongus3Par;
      AnyRefNode &Org = ...Segments.Shank.FlexorDigitorumLongus3Node;
      AnyRefNode &Via1 = ...Segments.Shank.FlexorDigitorumLongusViaNode1;
      AnyRefNode &Via2 = ...Segments.Shank.FlexorDigitorumLongusViaNode2;
      AnyRefNode &Via3 = ...Segments.Shank.FlexorDigitorumLongusViaNode3;
      AnyRefNode &Via4 = ...Segments.Shank.FlexorDigitorumLongusViaNode4;
      AnyRefNode &Via5 = ...Segments.Shank.FlexorDigitorumLongusViaNode5;
    //  AnyRefNode &Via6 = ...Segments.Shank.FlexorDigitorumLongusViaNode6;
      AnyRefNode &Via7 = ...Segments.Foot.FlexorDigitorumLongusViaNode7;
      AnyRefNode &Via8 = ...Segments.Foot.FlexorDigitorumLongusViaNode8;
    // AnyRefNode &Via9 = ...Segments.Foot.FlexorDigitorumLongusViaNode11;
      AnyRefNode &Ins = ...Segments.Foot.FlexorDigitorumLongus3Node;
      viewMuscle = {#include "../DrawSettings/MusDrawSettings.any"};
    };
    AnyMuscleViaPoint FlexorDigitorumLongus4 = {
      AnyMuscleModel &MusMdl = ...MuscleModels.FlexorDigitorumLongus4Par;
      AnyRefNode &Org = ...Segments.Shank.FlexorDigitorumLongus4Node;
      AnyRefNode &Via1 = ...Segments.Shank.FlexorDigitorumLongusViaNode1;
      AnyRefNode &Via2 = ...Segments.Shank.FlexorDigitorumLongusViaNode2;
      AnyRefNode &Via3 = ...Segments.Shank.FlexorDigitorumLongusViaNode3;
      AnyRefNode &Via4 = ...Segments.Shank.FlexorDigitorumLongusViaNode4;
      AnyRefNode &Via5 = ...Segments.Shank.FlexorDigitorumLongusViaNode5;
    //  AnyRefNode &Via6 = ...Segments.Shank.FlexorDigitorumLongusViaNode6;
      AnyRefNode &Via7 = ...Segments.Foot.FlexorDigitorumLongusViaNode7;
      AnyRefNode &Via8 = ...Segments.Foot.FlexorDigitorumLongusViaNode8;
      //AnyRefNode &Via9 = ...Segments.Foot.FlexorDigitorumLongusViaNode12;
      AnyRefNode &Ins = ...Segments.Foot.FlexorDigitorumLongus4Node;
      viewMuscle = {#include "../DrawSettings/MusDrawSettings.any"};
    };
  };

  MuscleGroup FlexorHallucisLongus() = {
    AnyMuscleViaPoint FlexorHallucisLongus1 = {
      AnyMuscleModel &MusMdl = ...MuscleModels.FlexorHallucisLongus1Par;
      AnyRefNode &Org = ...Segments.Shank.FlexorHallucisLongus1Node;
      AnyRefNode &Via1 = ...Segments.Shank.FlexorHallucisLongusViaNode1;
      AnyRefNode &Via2 = ...Segments.Shank.FlexorHallucisLongusViaNode2;
      AnyRefNode &Via3 = ...Segments.Shank.FlexorHallucisLongusViaNode3;
      AnyRefNode &Via4 = ...Segments.Shank.FlexorHallucisLongusViaNode4;
    //  AnyRefNode &Via5 = ...Segments.Shank.FlexorHallucisLongusViaNode5;
    //  AnyRefNode &Via6 = ...Segments.Shank.FlexorHallucisLongusViaNode6;
      AnyRefNode &Via7 = ...Segments.Foot.FlexorHallucisLongusViaNode7;
    //  AnyRefNode &Via8 = ...Segments.Foot.FlexorHallucisLongusViaNode8;
      AnyRefNode &Ins = ...Segments.Foot.FlexorHallucisLongus1Node;
      viewMuscle = {#include "../DrawSettings/MusDrawSettings.any"};
    };
    AnyMuscleViaPoint FlexorHallucisLongus2 = {
      AnyMuscleModel &MusMdl = ...MuscleModels.FlexorHallucisLongus2Par;
      AnyRefNode &Org = ...Segments.Shank.FlexorHallucisLongus2Node;
      AnyRefNode &Via1 = ...Segments.Shank.FlexorHallucisLongusViaNode1;
      AnyRefNode &Via2 = ...Segments.Shank.FlexorHallucisLongusViaNode2;
      AnyRefNode &Via3 = ...Segments.Shank.FlexorHallucisLongusViaNode3;
      AnyRefNode &Via4 = ...Segments.Shank.FlexorHallucisLongusViaNode4;
    //  AnyRefNode &Via5 = ...Segments.Shank.FlexorHallucisLongusViaNode5;
    //  AnyRefNode &Via6 = ...Segments.Shank.FlexorHallucisLongusViaNode6;
      AnyRefNode &Via7 = ...Segments.Foot.FlexorHallucisLongusViaNode7;
    // AnyRefNode &Via8 = ...Segments.Foot.FlexorHallucisLongusViaNode8;
      AnyRefNode &Ins = ...Segments.Foot.FlexorHallucisLongus2Node;
      viewMuscle = {#include "../DrawSettings/MusDrawSettings.any"};
    };
    AnyMuscleViaPoint FlexorHallucisLongus3 = {
      AnyMuscleModel &MusMdl = ...MuscleModels.FlexorHallucisLongus3Par;
      AnyRefNode &Org = ...Segments.Shank.FlexorHallucisLongus3Node;
      AnyRefNode &Via1 = ...Segments.Shank.FlexorHallucisLongusViaNode1;
      AnyRefNode &Via2 = ...Segments.Shank.FlexorHallucisLongusViaNode2;
      AnyRefNode &Via3 = ...Segments.Shank.FlexorHallucisLongusViaNode3;
      AnyRefNode &Via4 = ...Segments.Shank.FlexorHallucisLongusViaNode4;
    //  AnyRefNode &Via5 = ...Segments.Shank.FlexorHallucisLongusViaNode5;
    //  AnyRefNode &Via6 = ...Segments.Shank.FlexorHallucisLongusViaNode6;
      AnyRefNode &Via7 = ...Segments.Foot.FlexorHallucisLongusViaNode7;
    // AnyRefNode &Via8 = ...Segments.Foot.FlexorHallucisLongusViaNode8;
      AnyRefNode &Ins = ...Segments.Foot.FlexorHallucisLongus3Node;
      viewMuscle = {#include "../DrawSettings/MusDrawSettings.any"};
    };
  };

  MuscleGroup TibialisPosteriorLateralis() = {
    AnyMuscleViaPoint TibialisPosteriorLateralis1 = {
      AnyMuscleModel &MusMdl = ...MuscleModels.TibialisPosteriorLateralis1Par;
      AnyRefNode &Org = ...Segments.Shank.TibialisPosteriorLateralis1Node;
      AnyRefNode &Via1 = ...Segments.Shank.TibialisPosteriorViaNode1;
    //  AnyRefNode &Via2 = ...Segments.Shank.TibialisPosteriorViaNode2;
    //  AnyRefNode &Via3 = ...Segments.Shank.TibialisPosteriorViaNode3;
      //AnyRefNode &Via4 = ...Segments.Shank.TibialisPosteriorViaNode4;
    //  AnyRefNode &Via5 = ...Segments.Foot.TibialisPosteriorViaNode5;
      AnyRefNode &Via6 = ...Segments.Foot.TibialisPosteriorViaNode6;
      AnyRefNode &Via7 = ...Segments.Foot.TibialisPosteriorViaNode7;
      AnyRefNode &Ins = ...Segments.Foot.TibialisPosteriorLateralis1Node;
      viewMuscle = {#include "../DrawSettings/MusDrawSettings.any"};
    };

    AnyMuscleViaPoint TibialisPosteriorLateralis2 = {
      AnyMuscleModel &MusMdl = ...MuscleModels.TibialisPosteriorLateralis2Par;
      AnyRefNode &Org = ...Segments.Shank.TibialisPosteriorLateralis2Node;
      AnyRefNode &Via1 = ...Segments.Shank.TibialisPosteriorViaNode1;
    //  AnyRefNode &Via2 = ...Segments.Shank.TibialisPosteriorViaNode2;
    //  AnyRefNode &Via3 = ...Segments.Shank.TibialisPosteriorViaNode3;
      //AnyRefNode &Via4 = ...Segments.Shank.TibialisPosteriorViaNode4;
    //  AnyRefNode &Via5 = ...Segments.Foot.TibialisPosteriorViaNode5;
      AnyRefNode &Via6 = ...Segments.Foot.TibialisPosteriorViaNode6;
      AnyRefNode &Via7 = ...Segments.Foot.TibialisPosteriorViaNode7;
      AnyRefNode &Ins = ...Segments.Foot.TibialisPosteriorLateralis2Node;
      viewMuscle = {#include "../DrawSettings/MusDrawSettings.any"};
    };

    AnyMuscleViaPoint TibialisPosteriorLateralis3 = {
      AnyMuscleModel &MusMdl = ...MuscleModels.TibialisPosteriorLateralis3Par;
      AnyRefNode &Org = ...Segments.Shank.TibialisPosteriorLateralis3Node;
      AnyRefNode &Via1 = ...Segments.Shank.TibialisPosteriorViaNode1;
    //  AnyRefNode &Via2 = ...Segments.Shank.TibialisPosteriorViaNode2;
    //  AnyRefNode &Via3 = ...Segments.Shank.TibialisPosteriorViaNode3;
      //AnyRefNode &Via4 = ...Segments.Shank.TibialisPosteriorViaNode4;
    //  AnyRefNode &Via5 = ...Segments.Foot.TibialisPosteriorViaNode5;
      AnyRefNode &Via6 = ...Segments.Foot.TibialisPosteriorViaNode6;
      AnyRefNode &Via7 = ...Segments.Foot.TibialisPosteriorViaNode7;
      AnyRefNode &Ins = ...Segments.Foot.TibialisPosteriorLateralis3Node;
      viewMuscle = {#include "../DrawSettings/MusDrawSettings.any"};
    };
  };

  MuscleGroup TibialisPosteriorMedialis() = {
    AnyMuscleViaPoint TibialisPosteriorMedialis1 = {
      AnyMuscleModel &MusMdl = ...MuscleModels.TibialisPosteriorMedialis1Par;
      AnyRefNode &Org = ...Segments.Shank.TibialisPosteriorMedialis1Node;
      AnyRefNode &Via1 = ...Segments.Shank.TibialisPosteriorViaNode1;
    //  AnyRefNode &Via2 = ...Segments.Shank.TibialisPosteriorViaNode2;
    //  AnyRefNode &Via3 = ...Segments.Shank.TibialisPosteriorViaNode3;
      //AnyRefNode &Via4 = ...Segments.Shank.TibialisPosteriorViaNode4;
    //  AnyRefNode &Via5 = ...Segments.Foot.TibialisPosteriorViaNode5;
      AnyRefNode &Via6 = ...Segments.Foot.TibialisPosteriorViaNode6;
      AnyRefNode &Via7 = ...Segments.Foot.TibialisPosteriorViaNode7;
      AnyRefNode &Ins = ...Segments.Foot.TibialisPosteriorMedialis1Node;
      viewMuscle = {#include "../DrawSettings/MusDrawSettings.any"};
    };

    AnyMuscleViaPoint TibialisPosteriorMedialis2 = {
      AnyMuscleModel &MusMdl = ...MuscleModels.TibialisPosteriorMedialis2Par;
      AnyRefNode &Org = ...Segments.Shank.TibialisPosteriorMedialis2Node;
      AnyRefNode &Via1 = ...Segments.Shank.TibialisPosteriorViaNode1;
      AnyRefNode &Via2 = ...Segments.Shank.TibialisPosteriorViaNode2;
    //  AnyRefNode &Via3 = ...Segments.Shank.TibialisPosteriorViaNode3;
      //AnyRefNode &Via4 = ...Segments.Shank.TibialisPosteriorViaNode4;
    //  AnyRefNode &Via5 = ...Segments.Foot.TibialisPosteriorViaNode5;
      AnyRefNode &Via6 = ...Segments.Foot.TibialisPosteriorViaNode6;
      AnyRefNode &Via7 = ...Segments.Foot.TibialisPosteriorViaNode7;
      AnyRefNode &Ins = ...Segments.Foot.TibialisPosteriorMedialis2Node;
      viewMuscle = {#include "../DrawSettings/MusDrawSettings.any"};
    };

    AnyMuscleViaPoint TibialisPosteriorMedialis3 = {
      AnyMuscleModel &MusMdl = ...MuscleModels.TibialisPosteriorMedialis3Par;
      AnyRefNode &Org = ...Segments.Shank.TibialisPosteriorMedialis3Node;
      AnyRefNode &Via1 = ...Segments.Shank.TibialisPosteriorViaNode1;
      AnyRefNode &Via2 = ...Segments.Shank.TibialisPosteriorViaNode2;
    //  AnyRefNode &Via3 = ...Segments.Shank.TibialisPosteriorViaNode3;
      //AnyRefNode &Via4 = ...Segments.Shank.TibialisPosteriorViaNode4;
    //  AnyRefNode &Via5 = ...Segments.Foot.TibialisPosteriorViaNode5;
      AnyRefNode &Via6 = ...Segments.Foot.TibialisPosteriorViaNode6;
      AnyRefNode &Via7 = ...Segments.Foot.TibialisPosteriorViaNode7;
      AnyRefNode &Ins = ...Segments.Foot.TibialisPosteriorMedialis3Node;
      viewMuscle = {#include "../DrawSettings/MusDrawSettings.any"};
    };
  };

  MuscleGroup TibialisAnterior() = {
    AnyMuscleViaPoint TibialisAnterior1 = {
      AnyMuscleModel &MusMdl = ...MuscleModels.TibialisAnterior1Par;
      AnyRefNode &Org = ...Segments.Shank.TibialisAnterior1Node;
      AnyRefNode &Via1 = ...Segments.Shank.TibialisAnteriorViaNode1;
      AnyRefNode &Via3 = ...Segments.Foot.TibialisAnteriorViaNode3;
      AnyRefNode &Ins = ...Segments.Foot.TibialisAnterior1Node;
      viewMuscle = {#include "../DrawSettings/MusDrawSettings.any"};
    };

    AnyMuscleViaPoint TibialisAnterior2 = {
      AnyMuscleModel &MusMdl = ...MuscleModels.TibialisAnterior2Par;
      AnyRefNode &Org = ...Segments.Shank.TibialisAnterior2Node;
      AnyRefNode &Via1 = ...Segments.Shank.TibialisAnteriorViaNode1;
      AnyRefNode &Via3 = ...Segments.Foot.TibialisAnteriorViaNode3;
      AnyRefNode &Ins = ...Segments.Foot.TibialisAnterior2Node;
      viewMuscle = {#include "../DrawSettings/MusDrawSettings.any"};
    };

    AnyMuscleViaPoint TibialisAnterior3 = {
      AnyMuscleModel &MusMdl = ...MuscleModels.TibialisAnterior3Par;
      AnyRefNode &Org = ...Segments.Shank.TibialisAnterior3Node;
      AnyRefNode &Via1 = ...Segments.Shank.TibialisAnteriorViaNode1;
      AnyRefNode &Via3 = ...Segments.Foot.TibialisAnteriorViaNode3;
      AnyRefNode &Ins = ...Segments.Foot.TibialisAnterior1Node;
      viewMuscle = {#include "../DrawSettings/MusDrawSettings.any"};
    };
  };

  MuscleGroup PeroneusBrevis() = {
    AnyMuscleViaPoint PeroneusBrevis1 = {
      AnyMuscleModel &MusMdl = ...MuscleModels.PeroneusBrevis1Par;
      AnyRefNode &Org = ...Segments.Shank.PeroneusBrevis1Node;
      AnyRefNode &Via1 = ...Segments.Shank.PeroneusBrevisViaNode1;
      AnyRefNode &Via2 = ...Segments.Shank.PeroneusBrevisViaNode2;
      AnyRefNode &Via3 = ...Segments.Shank.PeroneusBrevisViaNode3;
      AnyRefNode &Via4 = ...Segments.Foot.PeroneusBrevisViaNode4;
      AnyRefNode &Via6 = ...Segments.Foot.PeroneusBrevisSplitPoint1Node;
      AnyRefNode &Ins = ...Segments.Foot.PeroneusBrevis1Node;
      viewMuscle = {#include "../DrawSettings/MusDrawSettings.any"};
    };

    AnyMuscleViaPoint PeroneusBrevis2 = {
      AnyMuscleModel &MusMdl = ...MuscleModels.PeroneusBrevis2Par;
      AnyRefNode &Org = ...Segments.Shank.PeroneusBrevis2Node;
      AnyRefNode &Via1 = ...Segments.Shank.PeroneusBrevisViaNode1;
      AnyRefNode &Via2 = ...Segments.Shank.PeroneusBrevisViaNode2;
      AnyRefNode &Via3 = ...Segments.Shank.PeroneusBrevisViaNode3;
      AnyRefNode &Via4 = ...Segments.Foot.PeroneusBrevisViaNode4;
      AnyRefNode &Via6 = ...Segments.Foot.PeroneusBrevisSplitPoint1Node;
      AnyRefNode &Ins = ...Segments.Foot.PeroneusBrevis2Node;
      viewMuscle = {#include "../DrawSettings/MusDrawSettings.any"};
    };

    AnyMuscleViaPoint PeroneusBrevis3 = {
      AnyMuscleModel &MusMdl = ...MuscleModels.PeroneusBrevis3Par;
      AnyRefNode &Org = ...Segments.Shank.PeroneusBrevis3Node;
      AnyRefNode &Via1 = ...Segments.Shank.PeroneusBrevisViaNode1;
      AnyRefNode &Via2 = ...Segments.Shank.PeroneusBrevisViaNode2;
      AnyRefNode &Via3 = ...Segments.Shank.PeroneusBrevisViaNode3;
      AnyRefNode &Via4 = ...Segments.Foot.PeroneusBrevisViaNode4;
      AnyRefNode &Via5 = ...Segments.Foot.PeroneusBrevisSplitPoint1Node;
      AnyRefNode &Ins = ...Segments.Foot.PeroneusBrevis2Node;
      viewMuscle = {#include "../DrawSettings/MusDrawSettings.any"};
    };
  };

  MuscleGroup PeroneusLongus() = {
    AnyMuscleViaPoint PeroneusLongus1 = {
      AnyMuscleModel &MusMdl = ...MuscleModels.PeroneusLongus1Par;
      AnyRefNode &Org = ...Segments.Shank.PeroneusLongus1Node;
      AnyRefNode &Via1 = ...Segments.Shank.PeroneusLongusViaNode1;
      AnyRefNode &Via2 = ...Segments.Shank.PeroneusLongusViaNode2;
      AnyRefNode &Via3 = ...Segments.Shank.PeroneusLongusViaNode3;
    //  AnyRefNode &Via4 = ...Segments.Shank.PeroneusLongusViaNode4;
      AnyRefNode &Via5 = ...Segments.Foot.PeroneusLongusViaNode5;
      AnyRefNode &Via6 = ...Segments.Foot.PeroneusLongusViaNode6;
      AnyRefNode &Via7 = ...Segments.Foot.PeroneusLongusViaNode7;
      AnyRefNode &Ins = ...Segments.Foot.PeroneusLongus1Node;
      viewMuscle = {#include "../DrawSettings/MusDrawSettings.any"};
    };

    AnyMuscleViaPoint PeroneusLongus2 = {
      AnyMuscleModel &MusMdl = ...MuscleModels.PeroneusLongus2Par;
      AnyRefNode &Org = ...Segments.Shank.PeroneusLongus2Node;
      AnyRefNode &Via1 = ...Segments.Shank.PeroneusLongusViaNode1;
      AnyRefNode &Via2 = ...Segments.Shank.PeroneusLongusViaNode2;
      AnyRefNode &Via3 = ...Segments.Shank.PeroneusLongusViaNode3;
    //  AnyRefNode &Via4 = ...Segments.Shank.PeroneusLongusViaNode4;
      AnyRefNode &Via5 = ...Segments.Foot.PeroneusLongusViaNode5;
      AnyRefNode &Via6 = ...Segments.Foot.PeroneusLongusViaNode6;
      AnyRefNode &Via7 = ...Segments.Foot.PeroneusLongusViaNode7;
      AnyRefNode &Ins = ...Segments.Foot.PeroneusLongus2Node;
      viewMuscle = {#include "../DrawSettings/MusDrawSettings.any"};
    };

    AnyMuscleViaPoint PeroneusLongus3 = {
      AnyMuscleModel &MusMdl = ...MuscleModels.PeroneusLongus3Par;
      AnyRefNode &Org = ...Segments.Shank.PeroneusLongus3Node;
      AnyRefNode &Via1 = ...Segments.Shank.PeroneusLongusViaNode1;
      AnyRefNode &Via2 = ...Segments.Shank.PeroneusLongusViaNode2;
      AnyRefNode &Via3 = ...Segments.Shank.PeroneusLongusViaNode3;
    //  AnyRefNode &Via4 = ...Segments.Shank.PeroneusLongusViaNode4;
      AnyRefNode &Via5 = ...Segments.Foot.PeroneusLongusViaNode5;
      AnyRefNode &Via6 = ...Segments.Foot.PeroneusLongusViaNode6;
      AnyRefNode &Via7 = ...Segments.Foot.PeroneusLongusViaNode7;
      AnyRefNode &Ins = ...Segments.Foot.PeroneusLongus3Node;
      viewMuscle = {#include "../DrawSettings/MusDrawSettings.any"};
    };
  };

  MuscleGroup ExtensorDigitorumLongus() = {
    AnyMuscleViaPoint ExtensorDigitorumLongus1 = {
      AnyMuscleModel &MusMdl = ...MuscleModels.ExtensorDigitorumLongus1Par;
      AnyRefNode &Org = ...Segments.Shank.ExtensorDigitorumLongus1Node;
      AnyRefNode &Via1 = ...Segments.Shank.ExtensorDigitorumLongusViaNode1;
      AnyRefNode &Via2 = ...Segments.Shank.ExtensorDigitorumLongusViaNode2;
      AnyRefNode &Via3 = ...Segments.Shank.ExtensorDigitorumLongusViaNode3;
    //  AnyRefNode &Via4 = ...Segments.Shank.ExtensorDigitorumLongusViaNode4;
      //AnyRefNode &Via5 = ...Segments.Foot.ExtensorDigitorumLongusViaNode5; //Commented out in TLEMsafe2.0-trunk as the node has been removed there. Needs review.
      AnyRefNode &Via7 = ...Segments.Foot.  ExtensorDigitorumSplitPoint1Node;
      AnyRefNode &Via6 = ...Segments.Foot.ExtensorDigitorumLongusViaNode1;
      AnyRefNode&Ins = ...Segments.Foot.ExtensorDigitorumLongus1Node;
      viewMuscle = {#include "../DrawSettings/MusDrawSettings.any"};
    };
    AnyMuscleViaPoint ExtensorDigitorumLongus2 = {
      AnyMuscleModel &MusMdl = ...MuscleModels.ExtensorDigitorumLongus2Par;
      AnyRefNode &Org = ...Segments.Shank.ExtensorDigitorumLongus2Node;
      AnyRefNode &Via1 = ...Segments.Shank.ExtensorDigitorumLongusViaNode1;
      AnyRefNode &Via2 = ...Segments.Shank.ExtensorDigitorumLongusViaNode2;
      AnyRefNode &Via3 = ...Segments.Shank.ExtensorDigitorumLongusViaNode3;
    //  AnyRefNode &Via4 = ...Segments.Shank.ExtensorDigitorumLongusViaNode4;
      //AnyRefNode &Via5 = ...Segments.Foot.ExtensorDigitorumLongusViaNode5; //Commented out in TLEMsafe2.0-trunk as the node has been removed there. Needs review.
      AnyRefNode &Via7 = ...Segments.Foot.  ExtensorDigitorumSplitPoint1Node;
      AnyRefNode &Via6 = ...Segments.Foot.ExtensorDigitorumLongusViaNode2;
      AnyRefNode &Ins = ...Segments.Foot.ExtensorDigitorumLongus2Node;
      viewMuscle = {#include "../DrawSettings/MusDrawSettings.any"};
    };
    AnyMuscleViaPoint ExtensorDigitorumLongus3 = {
      AnyMuscleModel &MusMdl = ...MuscleModels.ExtensorDigitorumLongus3Par;
      AnyRefNode &Org = ...Segments.Shank.ExtensorDigitorumLongus3Node;
      AnyRefNode &Via1 = ...Segments.Shank.ExtensorDigitorumLongusViaNode1;
      AnyRefNode &Via2 = ...Segments.Shank.ExtensorDigitorumLongusViaNode2;
      AnyRefNode &Via3 = ...Segments.Shank.ExtensorDigitorumLongusViaNode3;
    //  AnyRefNode &Via4 = ...Segments.Shank.ExtensorDigitorumLongusViaNode4;
      //AnyRefNode &Via5 = ...Segments.Foot.ExtensorDigitorumLongusViaNode5; //Commented out in TLEMsafe2.0-trunk as the node has been removed there. Needs review.
        AnyRefNode &Via7 = ...Segments.Foot.  ExtensorDigitorumSplitPoint1Node;
      AnyRefNode &Via6 = ...Segments.Foot.ExtensorDigitorumLongusViaNode3;
      AnyRefNode &Ins = ...Segments.Foot.ExtensorDigitorumLongus3Node;
      viewMuscle = {#include "../DrawSettings/MusDrawSettings.any"};
    };
    AnyMuscleViaPoint ExtensorDigitorumLongus4 = {
      AnyMuscleModel &MusMdl = ...MuscleModels.ExtensorDigitorumLongus4Par;
      AnyRefNode &Org = ...Segments.Shank.ExtensorDigitorumLongus4Node;
      AnyRefNode &Via1 = ...Segments.Shank.ExtensorDigitorumLongusViaNode1;
      AnyRefNode &Via2 = ...Segments.Shank.ExtensorDigitorumLongusViaNode2;
      AnyRefNode &Via3 = ...Segments.Shank.ExtensorDigitorumLongusViaNode3;
    //  AnyRefNode &Via4 = ...Segments.Shank.ExtensorDigitorumLongusViaNode4;
      //AnyRefNode &Via5 = ...Segments.Foot.ExtensorDigitorumLongusViaNode5;
      AnyRefNode &Via7 = ...Segments.Foot.  ExtensorDigitorumSplitPoint1Node;
      AnyRefNode &Via6 = ...Segments.Foot.ExtensorDigitorumLongusViaNode4;
      AnyRefNode &Ins = ...Segments.Foot.ExtensorDigitorumLongus4Node;
      viewMuscle = {#include "../DrawSettings/MusDrawSettings.any"};
    };
  };

  MuscleGroup ExtensorHallucisLongus() = {
    AnyMuscleViaPoint ExtensorHallucisLongus1 = {
      AnyMuscleModel &MusMdl = ...MuscleModels.ExtensorHallucisLongus1Par;
      AnyRefNode &Org = ...Segments.Shank.ExtensorHallucisLongus1Node;
      AnyRefNode &Via1 = ...Segments.Shank.ExtensorHallucisLongusViaNode1;
      AnyRefNode &Via2 = ...Segments.Shank.ExtensorHallucisLongusViaNode2;
    //  AnyRefNode &Via3 = ...Segments.Shank.ExtensorHallucisLongusViaNode3;
      AnyRefNode &Via4 = ...Segments.Foot.ExtensorHallucisLongusViaNode4;
    // AnyRefNode &Via5 = ...Segments.Foot.ExtensorHallucisLongusViaNode5;
      //  AnyRefNode &Via9 = ...Segments.Foot.ExtensorHallucisLongusViaNode9;
      //  AnyRefNode &Via10 = ...Segments.Foot.ExtensorHallucisLongusViaNode10;
      //  AnyRefNode &Via11 = ...Segments.Foot.ExtensorHallucisLongusViaNode11;
      //  AnyRefNode &Via12 = ...Segments.Foot.ExtensorHallucisLongusViaNode12;
      //  AnyRefNode &Via13 = ...Segments.Foot.ExtensorHallucisLongusViaNode13;
      AnyRefNode &Ins = ...Segments.Foot.ExtensorHallucisLongus1Node;
      viewMuscle = {#include "../DrawSettings/MusDrawSettings.any"};
    };

    AnyMuscleViaPoint ExtensorHallucisLongus2 = {
      AnyMuscleModel &MusMdl = ...MuscleModels.ExtensorHallucisLongus2Par;
      AnyRefNode &Org = ...Segments.Shank.ExtensorHallucisLongus2Node;
      AnyRefNode &Via1 = ...Segments.Shank.ExtensorHallucisLongusViaNode1;
      AnyRefNode &Via2 = ...Segments.Shank.ExtensorHallucisLongusViaNode2;
    //  AnyRefNode &Via3 = ...Segments.Shank.ExtensorHallucisLongusViaNode3;
      AnyRefNode &Via4 = ...Segments.Foot.ExtensorHallucisLongusViaNode4;
    // AnyRefNode &Via5 = ...Segments.Foot.ExtensorHallucisLongusViaNode5;
      AnyRefNode &Ins = ...Segments.Foot.ExtensorHallucisLongus2Node;
      viewMuscle = {#include "../DrawSettings/MusDrawSettings.any"};
    };

    AnyMuscleViaPoint ExtensorHallucisLongus3 = {
      AnyMuscleModel &MusMdl = ...MuscleModels.ExtensorHallucisLongus3Par;
      AnyRefNode &Org = ...Segments.Shank.ExtensorHallucisLongus3Node;
      AnyRefNode &Via1 = ...Segments.Shank.ExtensorHallucisLongusViaNode1;
      AnyRefNode &Via2 = ...Segments.Shank.ExtensorHallucisLongusViaNode2;
    //  AnyRefNode &Via3 = ...Segments.Shank.ExtensorHallucisLongusViaNode3;
      AnyRefNode &Via4 = ...Segments.Foot.ExtensorHallucisLongusViaNode4;
    // AnyRefNode &Via5 = ...Segments.Foot.ExtensorHallucisLongusViaNode5;
      AnyRefNode &Ins = ...Segments.Foot.ExtensorHallucisLongus3Node;
      viewMuscle = {#include "../DrawSettings/MusDrawSettings.any"};
    };
  };
  #endif // BM_FOOT_MODEL != _FOOT_MODEL_LEG_FOOT_
#endif // ((BM_FOOT_MODEL == _FOOT_MODEL_LEG_FOOT_) | (BM_FOOT_MODEL == _FOOT_MODEL_RIGID_GM_) | (BM_FOOT_MODEL == _FOOT_MODEL_TOE_FLEX_GM_) | (BM_FOOT_MODEL == _FOOT_MODEL_DETAILED_GM_))

// Start Quadriceps
// Note that all Vastus muscles have their insertion on the patella. The patella has
// been defined as a segment in the file seg.any.
// The Rectus Femoris has its origin on the Pelvis and its insertion on the patella.
// Also the Pelvis has been defined in the seg.any file.

//VASTUS LATERALIS INFERIOR WRAPPING
MuscleGroup VastusLateralisInferior() = {
  AnyMuscleShortestPath VastusLateralisInferior1 = {
    AnyMuscleModel &MusMdl = ...MuscleModels.VastusLateralisInferior1Par;
    AnyRefNode &Org = ...Segments.Thigh.VastusLateralisInferior1Node;
    AnySurface &srf = ...Segments.Thigh.RectusVastiiWrapSurf.cyl;
    AnyRefNode &Ins = ...Segments.Patella.VastusLateralisInferior1Node;
    SPLine = {
      StringMesh = 60;
      AnyMatrix InitWrapPos = {
          transf3D({0*.srf.Radius, ....Sign*1.4*.srf.Radius, 0.5*.srf.Length }, &.srf ) ,
          transf3D({1.4*.srf.Radius, ....Sign*0*.srf.Radius, 0.5*.srf.Length }, &.srf )
      };
      InitWrapPosVecArr = { &InitWrapPos};
    };


    viewMuscle = {#include "../DrawSettings/MusDrawSettings.any"};
  };

  AnyMuscleShortestPath VastusLateralisInferior2 = {
    AnyMuscleModel &MusMdl = ...MuscleModels.VastusLateralisInferior2Par;
    AnyRefNode &Org = ...Segments.Thigh.VastusLateralisInferior2Node;
    AnySurface &srf = ...Segments.Thigh.RectusVastiiWrapSurf.cyl;
    AnyRefNode &Ins = ...Segments.Patella.VastusLateralisInferior2Node;
    SPLine =   {
      StringMesh = 60;
      InitWrapPosVecArr =  ..VastusLateralisInferior1.SPLine.InitWrapPosVecArr;
    };
    viewMuscle = {#include "../DrawSettings/MusDrawSettings.any"};
  };

  AnyMuscleShortestPath VastusLateralisInferior3 = {
    AnyMuscleModel &MusMdl = ...MuscleModels.VastusLateralisInferior3Par;
    AnyRefNode &Org = ...Segments.Thigh.VastusLateralisInferior3Node;
    AnySurface &srf = ...Segments.Thigh.RectusVastiiWrapSurf.cyl;
    AnyRefNode &Ins = ...Segments.Patella.VastusLateralisInferior3Node;
    SPLine =   {
      StringMesh = 60;
      InitWrapPosVecArr =  ..VastusLateralisInferior1.SPLine.InitWrapPosVecArr;
    };
    viewMuscle = {#include "../DrawSettings/MusDrawSettings.any"};
  };

  AnyMuscleShortestPath VastusLateralisInferior4 = {
    AnyMuscleModel &MusMdl = ...MuscleModels.VastusLateralisInferior4Par;
    AnyRefNode &Org = ...Segments.Thigh.VastusLateralisInferior4Node;
    AnySurface &srf = ...Segments.Thigh.RectusVastiiWrapSurf.cyl;
    AnyRefNode &Ins = ...Segments.Patella.VastusLateralisInferior4Node;
    SPLine =   {
      StringMesh = 60;
      InitWrapPosVecArr =  ..VastusLateralisInferior1.SPLine.InitWrapPosVecArr;
    };
    viewMuscle = {#include "../DrawSettings/MusDrawSettings.any"};
  };

  AnyMuscleShortestPath VastusLateralisInferior5 = {
    AnyMuscleModel &MusMdl = ...MuscleModels.VastusLateralisInferior5Par;
    AnyRefNode &Org = ...Segments.Thigh.VastusLateralisInferior5Node;
    AnySurface &srf = ...Segments.Thigh.RectusVastiiWrapSurf.cyl;
    AnyRefNode &Ins = ...Segments.Patella.VastusLateralisInferior5Node;
    SPLine =   {
      StringMesh = 60;
      InitWrapPosVecArr =  ..VastusLateralisInferior1.SPLine.InitWrapPosVecArr;
    };
    viewMuscle = {#include "../DrawSettings/MusDrawSettings.any"};
  };

  AnyMuscleShortestPath VastusLateralisInferior6 = {
    AnyMuscleModel &MusMdl = ...MuscleModels.VastusLateralisInferior6Par;
    AnyRefNode &Org = ...Segments.Thigh.VastusLateralisInferior6Node;
    AnySurface &srf = ...Segments.Thigh.RectusVastiiWrapSurf.cyl;
    AnyRefNode &Ins = ...Segments.Patella.VastusLateralisInferior6Node;
    SPLine =   {
      StringMesh = 60;
      InitWrapPosVecArr =  ..VastusLateralisInferior1.SPLine.InitWrapPosVecArr;
    };
    viewMuscle = {#include "../DrawSettings/MusDrawSettings.any"};
  };
};
//VASTUS LATERALIS SUPERIOR WRAPPING

MuscleGroup VastusLateralisSuperior() = {
  AnyMuscleShortestPath VastusLateralisSuperior1 = {
    AnyMuscleModel &MusMdl = ...MuscleModels.VastusLateralisSuperior1Par;
    AnyRefNode &Org = ...Segments.Thigh.VastusLateralisSuperior1Node;
    AnySurface &srf = ...Segments.Thigh.RectusVastiiWrapSurf.cyl;
    AnyRefNode &Ins = ...Segments.Patella.VastusLateralisSuperior1Node;
    SPLine =   {
      StringMesh = 65;
      InitWrapPosVecArr =  ...VastusLateralisInferior.VastusLateralisInferior1.SPLine.InitWrapPosVecArr;
    };
    viewMuscle = {#include "../DrawSettings/MusDrawSettings.any"};
  };

  AnyMuscleShortestPath VastusLateralisSuperior2 = {
    AnyMuscleModel &MusMdl = ...MuscleModels.VastusLateralisSuperior2Par;
    AnyRefNode &Org = ...Segments.Thigh.VastusLateralisSuperior2Node;
    AnySurface &srf = ...Segments.Thigh.RectusVastiiWrapSurf.cyl;
    AnyRefNode &Ins = ...Segments.Patella.VastusLateralisSuperior2Node;
    SPLine =   {
      StringMesh = 65;
      InitWrapPosVecArr =  ...VastusLateralisInferior.VastusLateralisInferior1.SPLine.InitWrapPosVecArr;
    };
    viewMuscle = {#include "../DrawSettings/MusDrawSettings.any"};
  };
};
//VASTUS MEDIALIS INFERIOR WRAPPING
MuscleGroup VastusMedialisInferior() = {
  AnyMuscleShortestPath VastusMedialisInferior1 = {
    AnyMuscleModel &MusMdl = ...MuscleModels.VastusMedialisInferior1Par;
    AnyRefNode &Org = ...Segments.Thigh.VastusMedialisInferior1Node;
    AnySurface &srf = ...Segments.Thigh.RectusVastiiWrapSurf.cyl;
    AnyRefNode &Ins = ...Segments.Patella.VastusMedialisInferior1Node;
    SPLine =   {
      StringMesh = 65;
      InitWrapPosVecArr =  ...VastusLateralisInferior.VastusLateralisInferior1.SPLine.InitWrapPosVecArr;
    };
    viewMuscle = {#include "../DrawSettings/MusDrawSettings.any"};
  };

  AnyMuscleShortestPath VastusMedialisInferior2 = {
    AnyMuscleModel &MusMdl = ...MuscleModels.VastusMedialisInferior2Par;
    AnyRefNode &Org = ...Segments.Thigh.VastusMedialisInferior2Node;
    AnySurface &srf = ...Segments.Thigh.RectusVastiiWrapSurf.cyl;
    AnyRefNode &Ins = ...Segments.Patella.VastusMedialisInferior2Node;
    SPLine =   {
      StringMesh = 65;
      InitWrapPosVecArr =  ...VastusLateralisInferior.VastusLateralisInferior1.SPLine.InitWrapPosVecArr;
    };
    viewMuscle = {#include "../DrawSettings/MusDrawSettings.any"};
  };
};
//VASTUS MEDIALIS MID WRAPPING
MuscleGroup VastusMedialisMid() = {
  AnyMuscleShortestPath VastusMedialisMid1 = {
    AnyMuscleModel &MusMdl = ...MuscleModels.VastusMedialisMid1Par;
    AnyRefNode &Org = ...Segments.Thigh.VastusMedialisMid1Node;
    AnySurface &srf = ...Segments.Thigh.RectusVastiiWrapSurf.cyl;
    AnyRefNode &Ins = ...Segments.Patella.VastusMedialisMid1Node;
    SPLine =   {
      StringMesh = 65;
      InitWrapPosVecArr =  ...VastusLateralisInferior.VastusLateralisInferior1.SPLine.InitWrapPosVecArr;
    };
    viewMuscle = {#include "../DrawSettings/MusDrawSettings.any"};
  };

  AnyMuscleShortestPath VastusMedialisMid2 = {
    AnyMuscleModel &MusMdl = ...MuscleModels.VastusMedialisMid2Par;
    AnyRefNode &Org = ...Segments.Thigh.VastusMedialisMid2Node;
    AnySurface &srf = ...Segments.Thigh.RectusVastiiWrapSurf.cyl;
    AnyRefNode &Ins = ...Segments.Patella.VastusMedialisMid2Node;
    SPLine =   {
      StringMesh = 65;
      InitWrapPosVecArr =  ...VastusLateralisInferior.VastusLateralisInferior1.SPLine.InitWrapPosVecArr;
    };
    viewMuscle = {#include "../DrawSettings/MusDrawSettings.any"};
  };
};

//VASTUS MEDIALIS SUPERIOR WRAPPING
MuscleGroup VastusMedialisSuperior() = {
  AnyMuscleShortestPath VastusMedialisSuperior1 = {
    AnyMuscleModel &MusMdl = ...MuscleModels.VastusMedialisSuperior1Par;
    AnyRefNode &Org = ...Segments.Thigh.VastusMedialisSuperior1Node;
    AnySurface &srf = ...Segments.Thigh.RectusVastiiWrapSurf.cyl;
    AnyRefNode &Ins = ...Segments.Patella.VastusMedialisSuperior1Node;
    SPLine =   {
      StringMesh = 65;
      InitWrapPosVecArr =  ...VastusLateralisInferior.VastusLateralisInferior1.SPLine.InitWrapPosVecArr;
    };
    viewMuscle = {#include "../DrawSettings/MusDrawSettings.any"};
  };

  AnyMuscleShortestPath VastusMedialisSuperior2 = {
    AnyMuscleModel &MusMdl = ...MuscleModels.VastusMedialisSuperior2Par;
    AnyRefNode &Org = ...Segments.Thigh.VastusMedialisSuperior2Node;
    AnySurface &srf = ...Segments.Thigh.RectusVastiiWrapSurf.cyl;
    AnyRefNode &Ins = ...Segments.Patella.VastusMedialisSuperior2Node;
    SPLine =   {
      StringMesh = 65;
      InitWrapPosVecArr =  ...VastusLateralisInferior.VastusLateralisInferior1.SPLine.InitWrapPosVecArr;
    };
    viewMuscle = {#include "../DrawSettings/MusDrawSettings.any"};
  };

  AnyMuscleShortestPath VastusMedialisSuperior3 = {
    AnyMuscleModel &MusMdl = ...MuscleModels.VastusMedialisSuperior3Par;
    AnyRefNode &Org = ...Segments.Thigh.VastusMedialisSuperior3Node;
    AnySurface &srf = ...Segments.Thigh.RectusVastiiWrapSurf.cyl;
    AnyRefNode &Ins = ...Segments.Patella.VastusMedialisSuperior3Node;
    SPLine =   {
      StringMesh = 65;
      InitWrapPosVecArr =  ...VastusLateralisInferior.VastusLateralisInferior1.SPLine.InitWrapPosVecArr;
    };
    viewMuscle = {#include "../DrawSettings/MusDrawSettings.any"};
  };

  AnyMuscleShortestPath VastusMedialisSuperior4 = {
    AnyMuscleModel &MusMdl = ...MuscleModels.VastusMedialisSuperior4Par;
    AnyRefNode &Org = ...Segments.Thigh.VastusMedialisSuperior4Node;
    AnySurface &srf = ...Segments.Thigh.RectusVastiiWrapSurf.cyl;
    AnyRefNode &Ins = ...Segments.Patella.VastusMedialisSuperior4Node;
    SPLine =   {
      StringMesh = 65;
      InitWrapPosVecArr =  ...VastusLateralisInferior.VastusLateralisInferior1.SPLine.InitWrapPosVecArr;
    };
    viewMuscle = {#include "../DrawSettings/MusDrawSettings.any"};
  };
};

//VASTUS INTERMEDIUS WRAPPING
MuscleGroup VastusIntermedius() = {
  AnyMuscleShortestPath VastusIntermedius1 = {
    AnyMuscleModel &MusMdl = ...MuscleModels.VastusIntermedius1Par;
    AnyRefNode &Org = ...Segments.Thigh.VastusIntermedius1Node;
    AnySurface &srf = ...Segments.Thigh.RectusVastiiWrapSurf.cyl;
    AnyRefNode &Ins = ...Segments.Patella.VastusIntermedius1Node;
    SPLine =   {
      StringMesh = 65;
      InitWrapPosVecArr =  ...VastusLateralisInferior.VastusLateralisInferior1.SPLine.InitWrapPosVecArr;
    };
    viewMuscle = {#include "../DrawSettings/MusDrawSettings.any"};
  };

  AnyMuscleShortestPath VastusIntermedius2 = {
    AnyMuscleModel &MusMdl = ...MuscleModels.VastusIntermedius2Par;
    AnyRefNode &Org = ...Segments.Thigh.VastusIntermedius2Node;
    AnySurface &srf = ...Segments.Thigh.RectusVastiiWrapSurf.cyl;
    AnyRefNode &Ins = ...Segments.Patella.VastusIntermedius2Node;
    SPLine =   {
      StringMesh = 65;
      InitWrapPosVecArr =  ...VastusLateralisInferior.VastusLateralisInferior1.SPLine.InitWrapPosVecArr;
    };
    viewMuscle = {#include "../DrawSettings/MusDrawSettings.any"};
  };

  AnyMuscleShortestPath VastusIntermedius3 = {
    AnyMuscleModel &MusMdl = ...MuscleModels.VastusIntermedius3Par;
    AnyRefNode &Org = ...Segments.Thigh.VastusIntermedius3Node;
    AnySurface &srf = ...Segments.Thigh.RectusVastiiWrapSurf.cyl;
    AnyRefNode &Ins = ...Segments.Patella.VastusIntermedius3Node;
    SPLine =   {
      StringMesh = 65;
      InitWrapPosVecArr =  ...VastusLateralisInferior.VastusLateralisInferior1.SPLine.InitWrapPosVecArr;
    };
    viewMuscle = {#include "../DrawSettings/MusDrawSettings.any"};
  };

  AnyMuscleShortestPath VastusIntermedius4 = {
    AnyMuscleModel &MusMdl = ...MuscleModels.VastusIntermedius4Par;
    AnyRefNode &Org = ...Segments.Thigh.VastusIntermedius4Node;
    AnySurface &srf = ...Segments.Thigh.RectusVastiiWrapSurf.cyl;
    AnyRefNode &Ins = ...Segments.Patella.VastusIntermedius4Node;
    SPLine =   {
      StringMesh = 65;
      InitWrapPosVecArr =  ...VastusLateralisInferior.VastusLateralisInferior1.SPLine.InitWrapPosVecArr;
    };
    viewMuscle = {#include "../DrawSettings/MusDrawSettings.any"};
  };

  AnyMuscleShortestPath VastusIntermedius5 = {
    AnyMuscleModel &MusMdl = ...MuscleModels.VastusIntermedius5Par;
    AnyRefNode &Org = ...Segments.Thigh.VastusIntermedius5Node;
    AnySurface &srf = ...Segments.Thigh.RectusVastiiWrapSurf.cyl;
    AnyRefNode &Ins = ...Segments.Patella.VastusIntermedius5Node;
    SPLine =   {
      StringMesh = 65;
      InitWrapPosVecArr =  ...VastusLateralisInferior.VastusLateralisInferior1.SPLine.InitWrapPosVecArr;
    };
    viewMuscle = {#include "../DrawSettings/MusDrawSettings.any"};
  };

  AnyMuscleShortestPath VastusIntermedius6 = {
    AnyMuscleModel &MusMdl = ...MuscleModels.VastusIntermedius6Par;
    AnyRefNode &Org = ...Segments.Thigh.VastusIntermedius6Node;
    AnySurface &srf = ...Segments.Thigh.RectusVastiiWrapSurf.cyl;
    AnyRefNode &Ins = ...Segments.Patella.VastusIntermedius6Node;
    SPLine =   {
      StringMesh = 65;
      InitWrapPosVecArr =  ...VastusLateralisInferior.VastusLateralisInferior1.SPLine.InitWrapPosVecArr;
    };
    viewMuscle = {#include "../DrawSettings/MusDrawSettings.any"};
  };
};

//RECTUS FEMORIS WRAPPING
MuscleGroup RectusFemoris() = {
  AnyMuscleShortestPath RectusFemoris1 = {
    AnyMuscleModel &MusMdl = ...MuscleModels.RectusFemoris1Par;
    AnyRefNode &Org = ...Segments.Pelvis.Muscles.RectusFemoris1Node;
    AnySurface &srf1 = ...Segments.Thigh.RectusWrapSurf.cyl;
    AnySurface &srf2 = ...Segments.Thigh.RectusVastiiWrapSurf.cyl;
    AnyRefNode &Ins = ...Segments.Patella.RectusFemoris1Node;
    SPLine = {
      StringMesh = 75;
      AnyMatrix InitWrapPos = {
          transf3D({0.5*.srf1.Radius, 1.5*.srf1.Radius , ....Sign*0.5*.srf1.Radius}, &....Segments.Thigh.HipJoint),
          transf3D({1.5*.srf1.Radius, 0 , ....Sign*0.5*.srf1.Radius}, &....Segments.Thigh.HipJoint),
          transf3D({1*.srf2.Radius, ....Sign*1*.srf2.Radius, 0.5*.srf2.Length }, &.srf2 ) ,
          transf3D({1.4*.srf2.Radius, ....Sign*0*.srf2.Radius, 0.5*.srf2.Length }, &.srf2 )
      };
      InitWrapPosVecArr = { &InitWrapPos};
    };
    viewMuscle = {#include "../DrawSettings/MusDrawSettings.any"};
  };

  AnyMuscleShortestPath RectusFemoris2 = {
    AnyMuscleModel &MusMdl = ...MuscleModels.RectusFemoris2Par;
    AnyRefNode &Org = ...Segments.Pelvis.Muscles.RectusFemoris2Node;
    AnySurface &srf1 = ...Segments.Thigh.RectusWrapSurf.cyl;
    AnySurface &srf2 = ...Segments.Thigh.RectusVastiiWrapSurf.cyl;
    AnyRefNode &Ins = ...Segments.Patella.RectusFemoris2Node;

    SPLine = {
      StringMesh = 75;
      InitWrapPosVecArr = ..RectusFemoris1.SPLine.InitWrapPosVecArr;
    };

    viewMuscle = {#include "../DrawSettings/MusDrawSettings.any"};
  };
};
// End Quadriceps.

// Start of Hamstrings
MuscleGroup Semitendinosus() = {
  AnyMuscleShortestPath Semitendinosus1 = {
    AnyMuscleModel &MusMdl = ...MuscleModels.Semitendinosus1Par;
    AnyRefNode &Org = ...Segments.Pelvis.Muscles.Semitendinosus1Node;
    AnySurface &srf = ...Segments.Thigh.HamstringWrapSurf.cyl;
    AnyRefNode &Via1 = ...Segments.Shank.SemitendinosusViaNode1;
    AnyRefNode &Ins = ...Segments.Shank.Semitendinosus1Node;

    AnySurface &srf2 = ...Segments.Pelvis.Muscles.Semitendinosus1WrapSurf.cyl;
    SPLine.StringSurfaceMap = {{On,On},{Off,Off}};
    SPLine.StringMesh = {160,3};

    SPLine =
    {
      AnyMatrix InitWrapPos = {
        transf3D({1.1*.srf2.Radius,....Sign*0.5*.srf2.Radius, 0.5*.srf2.Length }, &.srf2 ),
        transf3D({0*.srf2.Radius, 1.3*....Sign*.srf2.Radius, 0.5*.srf2.Length }, &.srf2 ),
        transf3D({-0.02*.srf.Radius, ....Sign*1.2*.srf.Radius, 0.25*.srf.Length }, &.srf )

      };
      InitWrapPosVecArr = { &InitWrapPos, None};
    };
    viewMuscle = {#include "../DrawSettings/MusDrawSettings.any"};
  };
};

MuscleGroup Semimembranosus() = {
  AnyMuscleShortestPath Semimembranosus1 = {
    AnyMuscleModel &MusMdl = ...MuscleModels.Semimembranosus1Par;
    AnyRefNode &Org = ...Segments.Pelvis.Muscles.Semimembranosus1Node;
    AnySurface &srf = ...Segments.Thigh.HamstringWrapSurf.cyl;
    AnyRefNode &Ins = ...Segments.Shank.Semimembranosus1Node;
    SPLine.StringMesh = 160;
    SPLine =
    {
      AnyMatrix InitWrapPos = {
        transf3D({-0.8*.srf.Radius, ....Sign*1.1*.srf.Radius, 0.5*.srf.Length }, &.srf )
      };
      InitWrapPosVecArr = { &InitWrapPos};
    };
    viewMuscle = {#include "../DrawSettings/MusDrawSettings.any"};
  };
  AnyMuscleShortestPath Semimembranosus2 = {
    AnyMuscleModel &MusMdl = ...MuscleModels.Semimembranosus2Par;
    AnyRefNode &Org = ...Segments.Pelvis.Muscles.Semimembranosus2Node;
    AnySurface &srf = ...Segments.Thigh.HamstringWrapSurf.cyl;
    AnyRefNode &Ins = ...Segments.Shank.Semimembranosus2Node;
    SPLine.StringMesh = 160;
    SPLine.InitWrapPosVecArr = .Semimembranosus1.SPLine.InitWrapPosVecArr;
    viewMuscle = {#include "../DrawSettings/MusDrawSettings.any"};
  };

  AnyMuscleShortestPath Semimembranosus3 = {
    AnyMuscleModel &MusMdl = ...MuscleModels.Semimembranosus3Par;
    AnyRefNode &Org = ...Segments.Pelvis.Muscles.Semimembranosus3Node;
    AnySurface &srf = ...Segments.Thigh.HamstringWrapSurf.cyl;
    AnyRefNode &Ins = ...Segments.Shank.Semimembranosus3Node;
    SPLine.StringMesh = 100;
    SPLine.InitWrapPosVecArr = .Semimembranosus1.SPLine.InitWrapPosVecArr;
    viewMuscle = {#include "../DrawSettings/MusDrawSettings.any"};
  };
};

MuscleGroup BicepsFemorisCaputLongum() = {
  AnyMuscleShortestPath BicepsFemorisCaputLongum1 = {
    AnyMuscleModel &MusMdl = ...MuscleModels.BicepsFemorisCaputLongum1Par;
    AnyRefNode &Org = ...Segments.Pelvis.Muscles.BicepsFemorisCaputLongum1Node;
    AnyRefNode &Ins = ...Segments.Shank.BicepsFemorisCaputLongum1Node;

    AnySurface &srf = ...Segments.Pelvis.Muscles.BicepsFemorisCaputLongumWrapSurf.cyl;
    SPLine.StringMesh = 100;
    SPLine ={
      AnyMatrix InitWrapPos = {
        transf3D({1*.srf.Radius,....Sign*0.5*.srf.Radius, 0.5*.srf.Length }, &.srf ),
        transf3D({0*.srf.Radius, 1.3*....Sign*.srf.Radius, 0.5*.srf.Length }, &.srf )
      };
    InitWrapPosVecArr = { &InitWrapPos};
    };
    viewMuscle = {#include "../DrawSettings/MusDrawSettings.any"};
  };
};


MuscleGroup BicepsFemorisCaputBreve() = {
  AnyMuscleShortestPath BicepsFemorisCaputBreve1 = {
    AnyMuscleModel &MusMdl = ...MuscleModels.BicepsFemorisCaputBreve1Par;
    AnyRefNode &Org = ...Segments.Thigh.BicepsFemorisCaputBreve1Node;
    AnySurface &srf = ...Segments.Thigh.HamstringWrapSurf.cyl;
    AnyRefNode &Ins = ...Segments.Shank.BicepsFemorisCaputBreve1Node;
    SPLine.StringMesh = 75;
    SPLine =
    {
      AnyMatrix InitWrapPos = {
          transf3D({-0.2*.srf.Radius, ....Sign*1.2*.srf.Radius, 0.75*.srf.Length }, &.srf )
      };
      InitWrapPosVecArr = { &InitWrapPos};
    };
    viewMuscle = {#include "../DrawSettings/MusDrawSettings.any"};
  };

  AnyMuscleShortestPath BicepsFemorisCaputBreve2 = {
    AnyMuscleModel &MusMdl = ...MuscleModels.BicepsFemorisCaputBreve2Par;
    AnyRefNode &Org = ...Segments.Thigh.BicepsFemorisCaputBreve2Node;
    AnySurface &srf = ...Segments.Thigh.HamstringWrapSurf.cyl;
    AnyRefNode &Ins = ...Segments.Shank.BicepsFemorisCaputBreve2Node;
    SPLine.StringMesh = 60;
    SPLine.InitWrapPosVecArr = .BicepsFemorisCaputBreve1.SPLine.InitWrapPosVecArr;
    viewMuscle = {#include "../DrawSettings/MusDrawSettings.any"};
  };

  AnyMuscleShortestPath BicepsFemorisCaputBreve3 = {
    AnyMuscleModel &MusMdl = ...MuscleModels.BicepsFemorisCaputBreve3Par;
    AnyRefNode &Org = ...Segments.Thigh.BicepsFemorisCaputBreve3Node;
    AnySurface &srf = ...Segments.Thigh.HamstringWrapSurf.cyl;
    AnyRefNode &Ins = ...Segments.Shank.BicepsFemorisCaputBreve3Node;
    SPLine.StringMesh = 60;
    SPLine.InitWrapPosVecArr = .BicepsFemorisCaputBreve1.SPLine.InitWrapPosVecArr;
    viewMuscle = {#include "../DrawSettings/MusDrawSettings.any"};
  };
};
// End of Hamstrings

// Start hip muscles
MuscleGroup Sartorius() = {
  AnyMuscleViaPoint Sartorius1 = {
    AnyMuscleModel &MusMdl = ...MuscleModels.Sartorius1Par;
    AnyRefNode &Org = ...Segments.Pelvis.Muscles.Sartorius1Node;
    //AnyRefNode &Via1 = ...Segments.Thigh.SartoriusVia1Node;
    AnyRefNode &Via2 = ...Segments.Thigh.SartoriusVia2Node;
    AnyRefNode &Via3 = ...Segments.Thigh.SartoriusVia3Node;
    AnyRefNode &Via4 = ...Segments.Thigh.SartoriusVia4Node;
    AnyRefNode &Via5 = ...Segments.Thigh.SartoriusVia5Node;
    AnyRefNode &Via6 = ...Segments.Thigh.SartoriusVia6Node;
    AnyRefNode &Via7 = ...Segments.Shank.SartoriusVia1Node;
    AnyRefNode &Via8 = ...Segments.Shank.SartoriusVia2Node;
    AnyRefNode &Via9 = ...Segments.Shank.SartoriusVia3Node;
    AnyRefNode &Ins = ...Segments.Shank.Sartorius1Node;
    viewMuscle = {#include "../DrawSettings/MusDrawSettings.any"};
  };
};

MuscleGroup IliacusLateralis() = {
  AnyMuscleShortestPath IliacusLateralis1 = {
    AnyMuscleModel &MusMdl = ...MuscleModels.IliacusLateralis1Par;
    AnyRefNode &Org = ...Segments.Pelvis.Muscles.IliacusLateralis1Node;
    AnyRefNode &Via1 = ...Segments.Pelvis.Muscles.IliacusLateralisViaNode1;
    AnySurface &srf = ...Segments.Thigh.IliacusWrapSurf.cyl;
    AnyRefNode &Ins = ...Segments.Thigh.Iliopsoas3Node;
    SPLine = {
      StringSurfaceMap = {{Off},{On}};
      StringMesh = {3,80};
      AnyMatrix InitWrapPos = {
          transf3D({....Sign*0.8*.srf.Radius, 0.8*.srf.Radius, 1.2*.srf.Length }, &.srf ) ,
          transf3D({....Sign*0*.srf.Radius, 1.2*.srf.Radius, 1*.srf.Length }, &.srf ) ,
          transf3D({....Sign*(-1)*0.8*.srf.Radius, 0.8*.srf.Radius, 0.6*.srf.Length }, &.srf )
      };
      InitWrapPosVecArr = {None, &InitWrapPos};
    };
      viewMuscle = {#include "../DrawSettings/MusDrawSettings.any"};
  };

  AnyMuscleShortestPath IliacusLateralis2 = {
    AnyMuscleModel &MusMdl = ...MuscleModels.IliacusLateralis2Par;
    AnyRefNode &Org = ...Segments.Pelvis.Muscles.IliacusLateralis2Node;
    AnyRefNode &Via1 = ...Segments.Pelvis.Muscles.IliacusLateralisViaNode2;
    AnySurface &srf = ...Segments.Thigh.IliacusWrapSurf.cyl;
    AnyRefNode &Ins = ...Segments.Thigh.Iliopsoas3Node;
    SPLine.StringSurfaceMap = ..IliacusLateralis.IliacusLateralis1.SPLine.StringSurfaceMap ;
    SPLine.StringMesh = .IliacusLateralis1.SPLine.StringMesh ;
    SPLine.InitWrapPosVecArr = ..IliacusLateralis.IliacusLateralis1.SPLine.InitWrapPosVecArr;
    viewMuscle = {#include "../DrawSettings/MusDrawSettings.any"};
  };
};

MuscleGroup IliacusMid() = {
  AnyMuscleShortestPath IliacusMid1 = {
    AnyMuscleModel &MusMdl = ...MuscleModels.IliacusMid1Par;
    AnyRefNode &Org = ...Segments.Pelvis.Muscles.IliacusMid1Node;
    AnyRefNode &Via1 = ...Segments.Pelvis.Muscles.IliacusMidViaNode1;
    AnySurface &srf = ...Segments.Thigh.IliacusWrapSurf.cyl;
    AnyRefNode &Ins = ...Segments.Thigh.Iliopsoas2Node;
    SPLine.StringSurfaceMap = ..IliacusLateralis.IliacusLateralis1.SPLine.StringSurfaceMap ;
    SPLine.StringMesh = ..IliacusLateralis.IliacusLateralis1.SPLine.StringMesh ;
    SPLine.InitWrapPosVecArr = ..IliacusLateralis.IliacusLateralis1.SPLine.InitWrapPosVecArr;
    viewMuscle = {#include "../DrawSettings/MusDrawSettings.any"};
  };

  AnyMuscleShortestPath IliacusMid2 = {
    AnyMuscleModel &MusMdl = ...MuscleModels.IliacusMid2Par;
    AnyRefNode &Org = ...Segments.Pelvis.Muscles.IliacusMid2Node;
    AnyRefNode &Via1 = ...Segments.Pelvis.Muscles.IliacusMidViaNode2;
    AnySurface &srf = ...Segments.Thigh.IliacusWrapSurf.cyl;
    AnyRefNode &Ins = ...Segments.Thigh.Iliopsoas2Node;
    SPLine.StringSurfaceMap ={{Off},{On}};
    SPLine.StringMesh = {3,90};
    SPLine.InitWrapPosVecArr = ..IliacusLateralis.IliacusLateralis1.SPLine.InitWrapPosVecArr;
    viewMuscle = {#include "../DrawSettings/MusDrawSettings.any"};
  };
};

MuscleGroup IliacusMedialis() = {
  AnyMuscleShortestPath IliacusMedialis1 = {
    AnyMuscleModel &MusMdl = ...MuscleModels.IliacusMedialis1Par;
    AnyRefNode &Org = ...Segments.Pelvis.Muscles.IliacusMedialis1Node;
    AnyRefNode &Via1 = ...Segments.Pelvis.Muscles.IliacusMedialisViaNode2;
    AnySurface &srf = ...Segments.Thigh.IliacusWrapSurf.cyl;
    AnyRefNode &Ins = ...Segments.Thigh.Iliopsoas1Node;
    SPLine.StringSurfaceMap = ..IliacusLateralis.IliacusLateralis1.SPLine.StringSurfaceMap ;
    SPLine.StringMesh = ..IliacusLateralis.IliacusLateralis1.SPLine.StringMesh ;
    SPLine.InitWrapPosVecArr = ..IliacusLateralis.IliacusLateralis1.SPLine.InitWrapPosVecArr;
    viewMuscle = {#include "../DrawSettings/MusDrawSettings.any"};
  };

  AnyMuscleShortestPath IliacusMedialis2 = {
    AnyMuscleModel &MusMdl = ...MuscleModels.IliacusMedialis2Par;
    AnyRefNode &Org = ...Segments.Pelvis.Muscles.IliacusMedialis2Node;
    AnyRefNode &Via1 = ...Segments.Pelvis.Muscles.IliacusMedialisViaNode1;
    AnySurface &srf = ...Segments.Thigh.IliacusWrapSurf.cyl;
    AnyRefNode &Ins = ...Segments.Thigh.Iliopsoas1Node;
    SPLine.StringSurfaceMap ={{Off},{On}};
    SPLine.StringMesh = {3,90};
    SPLine.InitWrapPosVecArr = ..IliacusLateralis.IliacusLateralis1.SPLine.InitWrapPosVecArr;
    viewMuscle = {#include "../DrawSettings/MusDrawSettings.any"};
  };
};

MuscleGroup PsoasMajor(searchString="..TrunkMuscles.PsoasMajor.*") = {
  AnyMuscle &PsoasMajorT12 = ..TrunkMuscles.PsoasMajor.PsoasMajorT12;//< Psoas muscles are created by the Trunk model
  AnyMuscle &PsoasMajorL1_1 = ..TrunkMuscles.PsoasMajor.PsoasMajorL1_1;//< Psoas muscles are created by the Trunk model
  AnyMuscle &PsoasMajorL1_2 = ..TrunkMuscles.PsoasMajor.PsoasMajorL1_2;//< Psoas muscles are created by the Trunk model
  AnyMuscle &PsoasMajorL2_1= ..TrunkMuscles.PsoasMajor.PsoasMajorL2_1;//< Psoas muscles are created by the Trunk model
  AnyMuscle &PsoasMajorL2_2 = ..TrunkMuscles.PsoasMajor.PsoasMajorL2_2;//< Psoas muscles are created by the Trunk model
  AnyMuscle &PsoasMajorL3_1 = ..TrunkMuscles.PsoasMajor.PsoasMajorL3_1;//< Psoas muscles are created by the Trunk model
  AnyMuscle &PsoasMajorL3_2 = ..TrunkMuscles.PsoasMajor.PsoasMajorL3_2;//< Psoas muscles are created by the Trunk model
  AnyMuscle &PsoasMajorL4_1 = ..TrunkMuscles.PsoasMajor.PsoasMajorL4_1;//< Psoas muscles are created by the Trunk model
  AnyMuscle &PsoasMajorL4_2 = ..TrunkMuscles.PsoasMajor.PsoasMajorL4_2;//< Psoas muscles are created by the Trunk model
  AnyMuscle &PsoasMajorL5_1 = ..TrunkMuscles.PsoasMajor.PsoasMajorL5_1;//< Psoas muscles are created by the Trunk model
  AnyMuscle &PsoasMajorL5_2 = ..TrunkMuscles.PsoasMajor.PsoasMajorL5_2;//< Psoas muscles are created by the Trunk model
};

MuscleGroup GluteusMinimus = {
  AnyMuscleViaPoint GluteusMinimusAnterior1 = {
    AnyMuscleModel &MusMdl = ...MuscleModels.GluteusMinimusAnterior1Par;
    AnyRefNode &Org = ...Segments.Pelvis.Muscles.GluteusMinimusAnterior1Node;
    AnyRefNode &Via1 = ...Segments.Thigh.GluteusMinimusAnterior1Via;
    AnyRefNode &Ins = ...Segments.Thigh.GluteusMinimusAnterior1Node;
    viewMuscle = {#include "../DrawSettings/MusDrawSettings.any"};
  };

  AnyMuscleViaPoint GluteusMinimusMid1 = {
    AnyMuscleModel &MusMdl = ...MuscleModels.GluteusMinimusMid1Par;
    AnyRefNode &Org = ...Segments.Pelvis.Muscles.GluteusMinimusMid1Node;
    AnyRefNode &Via1 = ...Segments.Thigh.GluteusMinimusMid1Via;
    AnyRefNode &Ins = ...Segments.Thigh.GluteusMinimusMid1Node;
    viewMuscle = {#include "../DrawSettings/MusDrawSettings.any"};
  };

  AnyMuscleViaPoint GluteusMinimusPosterior1 = {
    AnyMuscleModel &MusMdl = ...MuscleModels.GluteusMinimusPosterior1Par;
    AnyRefNode &Org = ...Segments.Pelvis.Muscles.GluteusMinimusPosterior1Node;
    AnyRefNode &Via1 = ...Segments.Thigh.GluteusMinimusPosterior1Via;
    AnyRefNode &Ins = ...Segments.Thigh.GluteusMinimusPosterior1Node;
    viewMuscle = {#include "../DrawSettings/MusDrawSettings.any"};
  };
};

MuscleGroup GluteusMediusAnterior = {
  AnyMuscleViaPoint GluteusMediusAnterior1 = {
    AnyMuscleModel &MusMdl = ...MuscleModels.GluteusMediusAnterior1Par;
    AnyRefNode &Org = ...Segments.Pelvis.Muscles.GluteusMediusAnterior1Node;
    AnyRefNode &Ins = ...Segments.Thigh.GluteusMediusAnterior1Node;
    viewMuscle = {#include "../DrawSettings/MusDrawSettings.any"};
  };

  AnyMuscleViaPoint GluteusMediusAnterior2 = {
    AnyMuscleModel &MusMdl = ...MuscleModels.GluteusMediusAnterior2Par;
    AnyRefNode &Org = ...Segments.Pelvis.Muscles.GluteusMediusAnterior2Node;
    AnyRefNode &Ins = ...Segments.Thigh.GluteusMediusAnterior2Node;
    viewMuscle = {#include "../DrawSettings/MusDrawSettings.any"};
  };

  AnyMuscleViaPoint GluteusMediusAnterior3 = {
    AnyMuscleModel &MusMdl = ...MuscleModels.GluteusMediusAnterior3Par;
    AnyRefNode &Org = ...Segments.Pelvis.Muscles.GluteusMediusAnterior3Node;
    AnyRefNode &Ins = ...Segments.Thigh.GluteusMediusAnterior3Node;
    viewMuscle = {#include "../DrawSettings/MusDrawSettings.any"};
  };

  AnyMuscleViaPoint GluteusMediusAnterior4 = {
    AnyMuscleModel &MusMdl = ...MuscleModels.GluteusMediusAnterior4Par;
    AnyRefNode &Org = ...Segments.Pelvis.Muscles.GluteusMediusAnterior4Node;
    AnyRefNode &Ins = ...Segments.Thigh.GluteusMediusAnterior4Node;
    viewMuscle = {#include "../DrawSettings/MusDrawSettings.any"};
  };

  AnyMuscleViaPoint GluteusMediusAnterior5 = {
    AnyMuscleModel &MusMdl = ...MuscleModels.GluteusMediusAnterior5Par;
    AnyRefNode &Org = ...Segments.Pelvis.Muscles.GluteusMediusAnterior5Node;
    AnyRefNode &Ins = ...Segments.Thigh.GluteusMediusAnterior5Node;
    viewMuscle = {#include "../DrawSettings/MusDrawSettings.any"};
  };

  AnyMuscleViaPoint GluteusMediusAnterior6 = {
    AnyMuscleModel &MusMdl = ...MuscleModels.GluteusMediusAnterior6Par;
    AnyRefNode &Org = ...Segments.Pelvis.Muscles.GluteusMediusAnterior6Node;
    AnyRefNode &Ins = ...Segments.Thigh.GluteusMediusAnterior6Node;
    viewMuscle = {#include "../DrawSettings/MusDrawSettings.any"};
  };
};

MuscleGroup GluteusMediusPosterior = {
  AnyMuscleViaPoint GluteusMediusPosterior1 = {
    AnyMuscleModel &MusMdl = ...MuscleModels.GluteusMediusPosterior1Par;
    AnyRefNode &Org = ...Segments.Pelvis.Muscles.GluteusMediusPosterior1Node;
    AnyRefNode &Ins = ...Segments.Thigh.GluteusMediusPosterior1Node;
    viewMuscle = {#include "../DrawSettings/MusDrawSettings.any"};
  };

  AnyMuscleViaPoint GluteusMediusPosterior2 = {
    AnyMuscleModel &MusMdl = ...MuscleModels.GluteusMediusPosterior2Par;
    AnyRefNode &Org = ...Segments.Pelvis.Muscles.GluteusMediusPosterior2Node;
    AnyRefNode &Ins = ...Segments.Thigh.GluteusMediusPosterior2Node;
    viewMuscle = {#include "../DrawSettings/MusDrawSettings.any"};
  };

  AnyMuscleViaPoint GluteusMediusPosterior3 = {
    AnyMuscleModel &MusMdl = ...MuscleModels.GluteusMediusPosterior3Par;
    AnyRefNode &Org = ...Segments.Pelvis.Muscles.GluteusMediusPosterior3Node;
    AnyRefNode &Ins = ...Segments.Thigh.GluteusMediusPosterior3Node;
    viewMuscle = {#include "../DrawSettings/MusDrawSettings.any"};
  };

  AnyMuscleViaPoint GluteusMediusPosterior4 = {
    AnyMuscleModel &MusMdl = ...MuscleModels.GluteusMediusPosterior4Par;
    AnyRefNode &Org = ...Segments.Pelvis.Muscles.GluteusMediusPosterior4Node;
    AnyRefNode &Ins = ...Segments.Thigh.GluteusMediusPosterior4Node;
    viewMuscle = {#include "../DrawSettings/MusDrawSettings.any"};
  };

  AnyMuscleViaPoint GluteusMediusPosterior5 = {
    AnyMuscleModel &MusMdl = ...MuscleModels.GluteusMediusPosterior5Par;
    AnyRefNode &Org = ...Segments.Pelvis.Muscles.GluteusMediusPosterior5Node;
    AnyRefNode &Ins = ...Segments.Thigh.GluteusMediusPosterior5Node;
    viewMuscle = {#include "../DrawSettings/MusDrawSettings.any"};
  };

  AnyMuscleViaPoint GluteusMediusPosterior6 = {
    AnyMuscleModel &MusMdl = ...MuscleModels.GluteusMediusPosterior6Par;
    AnyRefNode &Org = ...Segments.Pelvis.Muscles.GluteusMediusPosterior6Node;
    AnyRefNode &Ins = ...Segments.Thigh.GluteusMediusPosterior6Node;
    viewMuscle = {#include "../DrawSettings/MusDrawSettings.any"};
  };
};

MuscleGroup GluteusMaximusSuperior = {
  AnyMuscleShortestPath GluteusMaximusSuperior1 = {
    AnyMuscleModel &MusMdl = ...MuscleModels.GluteusMaximusSuperior1Par;
    AnyRefNode &Org = ...Segments.Pelvis.Muscles.GluteusMaximusSuperior1Node;
    AnySurface &srf = ...Segments.Pelvis.Muscles.GlueteusMaximusWrapSurfaces.Superior1.cyl;
    AnyRefNode &Ins = ...Segments.Thigh.GluteusMaximusSuperior1Node;
    SPLine = {
      StringMesh = 15;
      AnyMatrix InitWrapPos = {
          transf3D({ .srf.Radius, ....Sign*0.38*.srf.Radius, 0.6*.srf.Length }, &.srf ) ,
          transf3D({ 0.78*.srf.Radius, ....Sign*0.78*.srf.Radius, 0.6*.srf.Length }, &.srf ) ,
          transf3D({ 0.37*.srf.Radius, ....Sign*1.04*.srf.Radius, 0.6*.srf.Length }, &.srf )  ,
          transf3D({ -0.37*.srf.Radius, ....Sign*1.04*.srf.Radius, 0.6*.srf.Length }, &.srf ),
          transf3D({ -0.78*.srf.Radius, ....Sign*0.78*.srf.Radius, 0.6*.srf.Length }, &.srf ),
          transf3D({ -.srf.Radius, ....Sign*0.38*.srf.Radius, 0.6*.srf.Length }, &.srf )


      };
      InitWrapPosVecArr = { &InitWrapPos};
    };
    viewMuscle = {#include "../DrawSettings/MusDrawSettings.any"};
  };

  AnyMuscleShortestPath GluteusMaximusSuperior2 = {
    AnyMuscleModel &MusMdl = ...MuscleModels.GluteusMaximusSuperior2Par;
    AnyRefNode &Org = ...Segments.Pelvis.Muscles.GluteusMaximusSuperior2Node;
    AnySurface &srf = ...Segments.Pelvis.Muscles.GlueteusMaximusWrapSurfaces.Superior2.cyl;
    AnyRefNode &Ins = ...Segments.Thigh.GluteusMaximusSuperior2Node;
    SPLine = {
      StringMesh = 15;

      AnyMatrix InitWrapPos = {
          transf3D({ .srf.Radius, ....Sign*0.38*.srf.Radius, 0.6*.srf.Length }, &.srf ) ,
          transf3D({ 0.78*.srf.Radius, ....Sign*0.78*.srf.Radius, 0.6*.srf.Length }, &.srf ) ,
          transf3D({ 0.37*.srf.Radius, ....Sign*1.04*.srf.Radius, 0.6*.srf.Length }, &.srf ) ,
          transf3D({ -0.37*.srf.Radius, ....Sign*1.04*.srf.Radius, 0.6*.srf.Length }, &.srf ),
          transf3D({ -0.78*.srf.Radius, ....Sign*0.78*.srf.Radius, 0.6*.srf.Length }, &.srf ),
          transf3D({ -.srf.Radius, ....Sign*0.38*.srf.Radius, 0.6*.srf.Length }, &.srf )
      };
      InitWrapPosVecArr = { &InitWrapPos};
    };
    viewMuscle = {#include "../DrawSettings/MusDrawSettings.any"};
  };

  AnyMuscleShortestPath GluteusMaximusSuperior3 = {
    AnyMuscleModel &MusMdl = ...MuscleModels.GluteusMaximusSuperior3Par;
    AnyRefNode &Org = ...Segments.Pelvis.Muscles.GluteusMaximusSuperior3Node;
    AnySurface &srf = ...Segments.Pelvis.Muscles.GlueteusMaximusWrapSurfaces.Superior3.cyl;
    AnyRefNode &Ins = ...Segments.Thigh.GluteusMaximusSuperior3Node;
    SPLine = {
      StringMesh = 15;
      AnyMatrix InitWrapPos = {
          transf3D({ .srf.Radius, ....Sign* 0.38*.srf.Radius, 0.6*.srf.Length }, &.srf ) ,
          transf3D({ 0.78*.srf.Radius, ....Sign*0.78*.srf.Radius, 0.6*.srf.Length }, &.srf ),
          transf3D({ 0.37*.srf.Radius, ....Sign*1.04*.srf.Radius, 0.6*.srf.Length }, &.srf ),
          transf3D({ -0.37*.srf.Radius, ....Sign*1.04*.srf.Radius, 0.6*.srf.Length }, &.srf ),
          transf3D({ -0.78*.srf.Radius, ....Sign*0.78*.srf.Radius, 0.6*.srf.Length }, &.srf ),
          transf3D({ -.srf.Radius, ....Sign*0.38*.srf.Radius, 0.6*.srf.Length }, &.srf )
      };
      InitWrapPosVecArr = { &InitWrapPos};
    };
    viewMuscle = {#include "../DrawSettings/MusDrawSettings.any"};
  };

  AnyMuscleShortestPath GluteusMaximusSuperior4 = {
    AnyMuscleModel &MusMdl = ...MuscleModels.GluteusMaximusSuperior4Par;
    AnyRefNode &Org = ...Segments.Pelvis.Muscles.GluteusMaximusSuperior4Node;
    AnySurface &srf = ...Segments.Pelvis.Muscles.GlueteusMaximusWrapSurfaces.Superior4.cyl;
    AnyRefNode &Ins = ...Segments.Thigh.GluteusMaximusSuperior4Node;
    SPLine = {
      StringMesh = 15;
      AnyMatrix InitWrapPos = {
          transf3D({ .srf.Radius, ....Sign*0.38*.srf.Radius, 0.6*.srf.Length }, &.srf ) ,
          transf3D({ 0.78*.srf.Radius, ....Sign*0.78*.srf.Radius, 0.6*.srf.Length }, &.srf ) ,
          transf3D({ 0.37*.srf.Radius, ....Sign*1.04*.srf.Radius, 0.6*.srf.Length }, &.srf ) ,
          transf3D({ -0.37*.srf.Radius, ....Sign*1.04*.srf.Radius, 0.6*.srf.Length }, &.srf ),
          transf3D({ -0.78*.srf.Radius, ....Sign*0.78*.srf.Radius, 0.6*.srf.Length }, &.srf ),
          transf3D({ -.srf.Radius, ....Sign*0.38*.srf.Radius, 0.6*.srf.Length }, &.srf )
      };
      InitWrapPosVecArr = { &InitWrapPos};
    };
    viewMuscle = {#include "../DrawSettings/MusDrawSettings.any"};
  };

  AnyMuscleShortestPath GluteusMaximusSuperior5 = {
    AnyMuscleModel &MusMdl = ...MuscleModels.GluteusMaximusSuperior5Par;
    AnyRefNode &Org = ...Segments.Pelvis.Muscles.GluteusMaximusSuperior5Node;
    AnySurface &srf = ...Segments.Pelvis.Muscles.GlueteusMaximusWrapSurfaces.Superior5.cyl;
    AnyRefNode &Ins = ...Segments.Thigh.GluteusMaximusSuperior5Node;
    SPLine = {
      StringMesh = 15;
      AnyMatrix InitWrapPos = {
          transf3D({ 1.1*.srf.Radius, ....Sign*0*.srf.Radius, 0.6*.srf.Length }, &.srf ) ,
          transf3D({ .srf.Radius, ....Sign*0.38*.srf.Radius, 0.6*.srf.Length }, &.srf ) ,
          transf3D({ 0.78*.srf.Radius, ....Sign*0.78*.srf.Radius, 0.6*.srf.Length }, &.srf ) ,
          transf3D({ 0.37*.srf.Radius, ....Sign*1.04*.srf.Radius, 0.6*.srf.Length }, &.srf ) ,
          transf3D({ -0.37*.srf.Radius, ....Sign*1.04*.srf.Radius, 0.6*.srf.Length }, &.srf ),
          transf3D({ -0.78*.srf.Radius, ....Sign*0.78*.srf.Radius, 0.6*.srf.Length }, &.srf ),
          transf3D({ -.srf.Radius, ....Sign*0.38*.srf.Radius, 0.6*.srf.Length }, &.srf )
      };
      InitWrapPosVecArr = { &InitWrapPos};
    };
    viewMuscle = {#include "../DrawSettings/MusDrawSettings.any"};
  };

  AnyMuscleShortestPath GluteusMaximusSuperior6 = {
    AnyMuscleModel &MusMdl = ...MuscleModels.GluteusMaximusSuperior6Par;
    AnyRefNode &Org = ...Segments.Pelvis.Muscles.GluteusMaximusSuperior6Node;
    AnySurface &srf = ...Segments.Pelvis.Muscles.GlueteusMaximusWrapSurfaces.Superior6.cyl;
    AnyRefNode &Ins = ...Segments.Thigh.GluteusMaximusSuperior6Node;
    SPLine = {
      StringMesh = 15;
      AnyMatrix InitWrapPos = {
          transf3D({ 1.1*.srf.Radius, ....Sign*0*.srf.Radius, 0.6*.srf.Length }, &.srf ) ,
          transf3D({ .srf.Radius, ....Sign*0.38*.srf.Radius, 0.6*.srf.Length }, &.srf ) ,
          transf3D({ 0.78*.srf.Radius, ....Sign*0.78*.srf.Radius, 0.6*.srf.Length }, &.srf ) ,
          transf3D({ 0.37*.srf.Radius, ....Sign*1.04*.srf.Radius, 0.6*.srf.Length }, &.srf ) ,
          transf3D({ -0.37*.srf.Radius, ....Sign*1.04*.srf.Radius, 0.6*.srf.Length }, &.srf ),
          transf3D({ -0.78*.srf.Radius, ....Sign*0.78*.srf.Radius, 0.6*.srf.Length }, &.srf ),
          transf3D({ -.srf.Radius, ....Sign*0.38*.srf.Radius, 0.6*.srf.Length }, &.srf )
      };
      InitWrapPosVecArr = { &InitWrapPos};
    };
    viewMuscle = {#include "../DrawSettings/MusDrawSettings.any"};
  };
};

MuscleGroup GluteusMaximusInferior = {
  AnyMuscleShortestPath GluteusMaximusInferior1 = {
    AnyMuscleModel &MusMdl = ...MuscleModels.GluteusMaximusInferior1Par;
    AnyRefNode &Org = ...Segments.Sacrum.LegAttachmentNodes.GluteusMaximusInferior1Node;
    AnySurface &srf = ...Segments.Pelvis.Muscles.GlueteusMaximusWrapSurfaces.Inferior1.cyl;
    AnyRefNode &Ins = ...Segments.Thigh.GluteusMaximusInferior1Node;
    SPLine = {
      StringMesh = 15;
      AnyMatrix InitWrapPos = {
          transf3D({ .srf.Radius, ....Sign*0.38*.srf.Radius, 0.6*.srf.Length }, &.srf ) ,
          transf3D({ 0.78*.srf.Radius, ....Sign*0.78*.srf.Radius, 0.6*.srf.Length }, &.srf ) ,
          transf3D({ 0.37*.srf.Radius, ....Sign*1.04*.srf.Radius, 0.6*.srf.Length }, &.srf ) ,
          transf3D({ -0.37*.srf.Radius, ....Sign*1.04*.srf.Radius, 0.6*.srf.Length }, &.srf ),
          transf3D({ -0.78*.srf.Radius, ....Sign*0.78*.srf.Radius, 0.6*.srf.Length }, &.srf ),
          transf3D({ -.srf.Radius, ....Sign*0.38*.srf.Radius, 0.6*.srf.Length }, &.srf )
      };
      InitWrapPosVecArr = { &InitWrapPos};
    };
    viewMuscle = {#include "../DrawSettings/MusDrawSettings.any"
    };
  };

  AnyMuscleShortestPath GluteusMaximusInferior2 = {
    AnyMuscleModel &MusMdl = ...MuscleModels.GluteusMaximusInferior2Par;
    AnyRefNode &Org = ...Segments.Sacrum.LegAttachmentNodes.GluteusMaximusInferior2Node;
    AnySurface &srf = ...Segments.Pelvis.Muscles.GlueteusMaximusWrapSurfaces.Inferior2.cyl;
    AnyRefNode &Ins = ...Segments.Thigh.GluteusMaximusInferior2Node;
    SPLine = {
      StringMesh = 25;
      AnyMatrix InitWrapPos = {
          transf3D({ .srf.Radius, ....Sign*0.38*.srf.Radius, 0.6*.srf.Length }, &.srf ) ,
          transf3D({ 0.78*.srf.Radius, ....Sign*0.78*.srf.Radius, 0.6*.srf.Length }, &.srf ),
          transf3D({ 0.37*.srf.Radius, ....Sign*1.04*.srf.Radius, 0.6*.srf.Length }, &.srf ) ,
          transf3D({ -0.37*.srf.Radius, ....Sign*1.04*.srf.Radius, 0.6*.srf.Length }, &.srf ),
          transf3D({ -0.78*.srf.Radius, ....Sign*0.78*.srf.Radius, 0.6*.srf.Length }, &.srf ),
          transf3D({ -.srf.Radius, ....Sign*0.38*.srf.Radius, 0.6*.srf.Length }, &.srf )
      };
      InitWrapPosVecArr = { &InitWrapPos};
    };
    viewMuscle = {#include "../DrawSettings/MusDrawSettings.any"
    };
  };

  AnyMuscleShortestPath GluteusMaximusInferior3 = {
    AnyMuscleModel &MusMdl = ...MuscleModels.GluteusMaximusInferior3Par;
    AnyRefNode &Org = ...Segments.Sacrum.LegAttachmentNodes.GluteusMaximusInferior3Node;
    AnySurface &srf = ...Segments.Pelvis.Muscles.GlueteusMaximusWrapSurfaces.Inferior3.cyl;
    AnyRefNode &Ins = ...Segments.Thigh.GluteusMaximusInferior3Node;
    SPLine = {
      StringMesh = 25;
      AnyMatrix InitWrapPos = {
          transf3D({ .srf.Radius, ....Sign*0.38*.srf.Radius, 0.6*.srf.Length }, &.srf ) ,
          transf3D({ 0.78*.srf.Radius, ....Sign*0.78*.srf.Radius, 0.6*.srf.Length }, &.srf ) ,
          transf3D({ 0.37*.srf.Radius, ....Sign*1.04*.srf.Radius, 0.6*.srf.Length }, &.srf ) ,
          transf3D({ -0.37*.srf.Radius, ....Sign*1.04*.srf.Radius, 0.6*.srf.Length }, &.srf ),
          transf3D({ -0.78*.srf.Radius, ....Sign*0.78*.srf.Radius, 0.6*.srf.Length }, &.srf ),
          transf3D({ -.srf.Radius, ....Sign*0.38*.srf.Radius, 0.6*.srf.Length }, &.srf )
      };
      InitWrapPosVecArr = { &InitWrapPos};
    };
    viewMuscle = {#include "../DrawSettings/MusDrawSettings.any"
    };
  };

  AnyMuscleShortestPath GluteusMaximusInferior4 = {
    AnyMuscleModel &MusMdl = ...MuscleModels.GluteusMaximusInferior4Par;
    AnyRefNode &Org = ...Segments.Sacrum.LegAttachmentNodes.GluteusMaximusInferior4Node;
    AnySurface &srf = ...Segments.Pelvis.Muscles.GlueteusMaximusWrapSurfaces.Inferior4.cyl;
    AnyRefNode &Ins = ...Segments.Thigh.GluteusMaximusInferior4Node;
    SPLine = {
      StringMesh = 30;
      AnyMatrix InitWrapPos = {
          transf3D({ .srf.Radius, ....Sign*0.38*.srf.Radius, 0.6*.srf.Length }, &.srf ) ,
          transf3D({ 0.78*.srf.Radius, ....Sign*0.78*.srf.Radius, 0.6*.srf.Length }, &.srf ) ,
          transf3D({ 0.37*.srf.Radius, ....Sign*1.04*.srf.Radius, 0.6*.srf.Length }, &.srf ) ,
          transf3D({ -0.37*.srf.Radius, ....Sign*1.04*.srf.Radius, 0.6*.srf.Length }, &.srf ),
          transf3D({ -0.78*.srf.Radius, ....Sign*0.78*.srf.Radius, 0.6*.srf.Length }, &.srf ),
          transf3D({ -.srf.Radius, ....Sign*0.38*.srf.Radius, 0.6*.srf.Length }, &.srf )
      };
      InitWrapPosVecArr = { &InitWrapPos};
    };
    viewMuscle = {#include "../DrawSettings/MusDrawSettings.any"
    };
  };

  AnyMuscleShortestPath GluteusMaximusInferior5 = {
    AnyMuscleModel &MusMdl = ...MuscleModels.GluteusMaximusInferior5Par;
    AnyRefNode &Org = ...Segments.Sacrum.LegAttachmentNodes.GluteusMaximusInferior5Node;
    AnySurface &srf = ...Segments.Pelvis.Muscles.GlueteusMaximusWrapSurfaces.Inferior5.cyl;
    AnyRefNode &Ins = ...Segments.Thigh.GluteusMaximusInferior5Node;
    SPLine = {
      StringMesh = 30;
      AnyMatrix InitWrapPos = {
          transf3D({ .srf.Radius, ....Sign*0.38*.srf.Radius, 0.6*.srf.Length }, &.srf ) ,
          transf3D({ 0.78*.srf.Radius, ....Sign*0.78*.srf.Radius, 0.6*.srf.Length }, &.srf ) ,
          transf3D({ 0.37*.srf.Radius, ....Sign*1.04*.srf.Radius, 0.6*.srf.Length }, &.srf ) ,
          transf3D({ -0.37*.srf.Radius, ....Sign*1.04*.srf.Radius, 0.6*.srf.Length }, &.srf ),
          transf3D({ -0.78*.srf.Radius, ....Sign*0.78*.srf.Radius, 0.6*.srf.Length }, &.srf ),
          transf3D({ -.srf.Radius, ....Sign*0.38*.srf.Radius, 0.6*.srf.Length }, &.srf )
      };
      InitWrapPosVecArr = { &InitWrapPos};
    };
    viewMuscle = {#include "../DrawSettings/MusDrawSettings.any"
    };
  };

  AnyMuscleShortestPath GluteusMaximusInferior6 = {
    AnyMuscleModel &MusMdl = ...MuscleModels.GluteusMaximusInferior6Par;
    AnyRefNode &Org = ...Segments.Sacrum.LegAttachmentNodes.GluteusMaximusInferior6Node;
    AnySurface &srf = ...Segments.Pelvis.Muscles.GlueteusMaximusWrapSurfaces.Inferior6.cyl;
    AnyRefNode &Ins = ...Segments.Thigh.GluteusMaximusInferior6Node;
    SPLine = {
      StringMesh = 30;
      AnyMatrix InitWrapPos = {
          transf3D({ .srf.Radius, ....Sign*0.38*.srf.Radius, 0.6*.srf.Length }, &.srf ) ,
          transf3D({ 0.78*.srf.Radius, ....Sign*0.78*.srf.Radius, 0.6*.srf.Length }, &.srf ),
          transf3D({ 0.37*.srf.Radius, ....Sign*1.04*.srf.Radius, 0.6*.srf.Length }, &.srf ) ,
      };
      InitWrapPosVecArr = { &InitWrapPos};
    };
    viewMuscle = {#include "../DrawSettings/MusDrawSettings.any" };
  };
};

MuscleGroup TensorFasciaeLatae = {
  AnyMuscleViaPoint TensorFasciaeLatae1 = {
    AnyMuscleModel &MusMdl = ...MuscleModels.TensorFasciaeLatae1Par;
    AnyRefNode &Org = ...Segments.Pelvis.Muscles.TensorFasciaeLatae1Node;
    AnyRefNode &Via = ...Segments.Thigh.TensorFasciaeLatae1ViaNode;
    AnyRefNode &Ins = ...Segments.Shank.TensorFasciaeLatae1Node;
    viewMuscle = {#include "../DrawSettings/MusDrawSettings.any"};
  };

  AnyMuscleViaPoint TensorFasciaeLatae2 = {
    AnyMuscleModel &MusMdl = ...MuscleModels.TensorFasciaeLatae2Par;
    AnyRefNode &Org = ...Segments.Pelvis.Muscles.TensorFasciaeLatae2Node;
    AnyRefNode &Via = ...Segments.Thigh.TensorFasciaeLatae2ViaNode;
    AnyRefNode &Ins = ...Segments.Shank.TensorFasciaeLatae2Node;
    viewMuscle = {#include "../DrawSettings/MusDrawSettings.any"};
  };
};

MuscleGroup Piriformis = {
  AnyMuscleViaPoint Piriformis1 = {
    AnyMuscleModel &MusMdl = ...MuscleModels.Piriformis1Par;
    AnyRefNode &Org = ...Segments.Sacrum.LegAttachmentNodes.Piriformis1Node;
    AnyRefNode &Ins = ...Segments.Thigh.Piriformis1Node;
    viewMuscle = {#include "../DrawSettings/MusDrawSettings.any"};
  };
};

MuscleGroup Gracilis = {
  AnyMuscleViaPoint Gracilis1 = {
    AnyMuscleModel &MusMdl = ...MuscleModels.Gracilis1Par;
    AnyRefNode &Org = ...Segments.Pelvis.Muscles.Gracilis1Node;
    AnyRefNode &Via1 = ...Segments.Shank.GracilisViaNode1;
    AnyRefNode &Via2 = ...Segments.Shank.GracilisViaNode2;
    AnyRefNode &Via3 = ...Segments.Shank.GracilisViaNode3;
    viewMuscle = {#include "../DrawSettings/MusDrawSettings.any"};
  };

  AnyMuscleViaPoint Gracilis2 = {
    AnyMuscleModel &MusMdl = ...MuscleModels.Gracilis2Par;
    AnyRefNode &Org = ...Segments.Pelvis.Muscles.Gracilis2Node;
    AnyRefNode &Via1 = ...Segments.Shank.GracilisViaNode1;
    AnyRefNode &Via2 = ...Segments.Shank.GracilisViaNode2;
    AnyRefNode &Via3 = ...Segments.Shank.GracilisViaNode3;
    AnyRefNode &Ins = ...Segments.Shank.Gracilis2Node;
    viewMuscle = {#include "../DrawSettings/MusDrawSettings.any"};
  };
};

MuscleGroup AdductorLongus = {
  AnyMuscleViaPoint AdductorLongus1 = {
    AnyMuscleModel &MusMdl = ...MuscleModels.AdductorLongus1Par;
    AnyRefNode &Org = ...Segments.Pelvis.Muscles.AdductorLongus1Node;
    AnyRefNode &Ins = ...Segments.Thigh.AdductorLongus1Node;
    viewMuscle = {#include "../DrawSettings/MusDrawSettings.any"};
  };

  AnyMuscleViaPoint AdductorLongus2 = {
    AnyMuscleModel &MusMdl = ...MuscleModels.AdductorLongus2Par;
    AnyRefNode &Org = ...Segments.Pelvis.Muscles.AdductorLongus2Node;
    AnyRefNode &Ins = ...Segments.Thigh.AdductorLongus2Node;
    viewMuscle = {#include "../DrawSettings/MusDrawSettings.any"};
  };

  AnyMuscleViaPoint AdductorLongus3 = {
    AnyMuscleModel &MusMdl = ...MuscleModels.AdductorLongus3Par;
    AnyRefNode &Org = ...Segments.Pelvis.Muscles.AdductorLongus3Node;
    AnyRefNode &Ins = ...Segments.Thigh.AdductorLongus3Node;
    viewMuscle = {#include "../DrawSettings/MusDrawSettings.any"};
  };

  AnyMuscleViaPoint AdductorLongus4 = {
    AnyMuscleModel &MusMdl = ...MuscleModels.AdductorLongus4Par;
    AnyRefNode &Org = ...Segments.Pelvis.Muscles.AdductorLongus4Node;
    AnyRefNode &Ins = ...Segments.Thigh.AdductorLongus4Node;
    viewMuscle = {#include "../DrawSettings/MusDrawSettings.any"};
  };

  AnyMuscleViaPoint AdductorLongus5 = {
    AnyMuscleModel &MusMdl = ...MuscleModels.AdductorLongus5Par;
    AnyRefNode &Org = ...Segments.Pelvis.Muscles.AdductorLongus5Node;
    AnyRefNode &Ins = ...Segments.Thigh.AdductorLongus5Node;
    viewMuscle = {#include "../DrawSettings/MusDrawSettings.any"};
  };

  AnyMuscleViaPoint AdductorLongus6 = {
    AnyMuscleModel &MusMdl = ...MuscleModels.AdductorLongus6Par;
    AnyRefNode &Org = ...Segments.Pelvis.Muscles.AdductorLongus6Node;
    AnyRefNode &Ins = ...Segments.Thigh.AdductorLongus6Node;
    viewMuscle = {#include "../DrawSettings/MusDrawSettings.any"};
  };
};

MuscleGroup AdductorMagnusDistal = {
  //muscle changed to insert on thigh
  AnyMuscleViaPoint AdductorMagnusDistal1 = {
    AnyMuscleModel &MusMdl = ...MuscleModels.AdductorMagnusDistal1Par;
    AnyRefNode &Org = ...Segments.Pelvis.Muscles.AdductorMagnusDistal1Node;
    AnyRefNode &Ins = ...Segments.Thigh.AdductorMagnusDistal1Node;
    viewMuscle = {#include "../DrawSettings/MusDrawSettings.any"};
  };

  //muscle changed to insert on thigh
  AnyMuscleViaPoint AdductorMagnusDistal2 = {
    AnyMuscleModel &MusMdl = ...MuscleModels.AdductorMagnusDistal2Par;
    AnyRefNode &Org = ...Segments.Pelvis.Muscles.AdductorMagnusDistal2Node;
    AnyRefNode &Ins = ...Segments.Thigh.AdductorMagnusDistal2Node;
    viewMuscle = {#include "../DrawSettings/MusDrawSettings.any"};
  };
  //muscle changed to insert on thigh
  AnyMuscleViaPoint AdductorMagnusDistal3 = {
    AnyMuscleModel &MusMdl = ...MuscleModels.AdductorMagnusDistal3Par;
    AnyRefNode &Org = ...Segments.Pelvis.Muscles.AdductorMagnusDistal3Node;
    AnyRefNode &Ins = ...Segments.Thigh.AdductorMagnusDistal3Node;
    viewMuscle = {#include "../DrawSettings/MusDrawSettings.any"};
  };
};

MuscleGroup AdductorMagnusMid = {
  AnyMuscleViaPoint AdductorMagnusMid1 = {
    AnyMuscleModel &MusMdl = ...MuscleModels.AdductorMagnusMid1Par;
    AnyRefNode &Org = ...Segments.Pelvis.Muscles.AdductorMagnusMid1Node;
    AnyRefNode &Ins = ...Segments.Thigh.AdductorMagnusMid1Node;
    viewMuscle = {#include "../DrawSettings/MusDrawSettings.any"};
  };

  AnyMuscleViaPoint AdductorMagnusMid2 = {
    AnyMuscleModel &MusMdl = ...MuscleModels.AdductorMagnusMid2Par;
    AnyRefNode &Org = ...Segments.Pelvis.Muscles.AdductorMagnusMid2Node;
    AnyRefNode &Ins = ...Segments.Thigh.AdductorMagnusMid2Node;
    viewMuscle = {#include "../DrawSettings/MusDrawSettings.any"};
  };

  AnyMuscleViaPoint AdductorMagnusMid3 = {
    AnyMuscleModel &MusMdl = ...MuscleModels.AdductorMagnusMid3Par;
    AnyRefNode &Org = ...Segments.Pelvis.Muscles.AdductorMagnusMid3Node;
    AnyRefNode &Ins = ...Segments.Thigh.AdductorMagnusMid3Node;
    viewMuscle = {#include "../DrawSettings/MusDrawSettings.any"};
  };

  AnyMuscleViaPoint AdductorMagnusMid4 = {
    AnyMuscleModel &MusMdl = ...MuscleModels.AdductorMagnusMid4Par;
    AnyRefNode &Org = ...Segments.Pelvis.Muscles.AdductorMagnusMid4Node;
    AnyRefNode &Ins = ...Segments.Thigh.AdductorMagnusMid4Node;
    viewMuscle = {#include "../DrawSettings/MusDrawSettings.any"};
  };

  AnyMuscleViaPoint AdductorMagnusMid5 = {
    AnyMuscleModel &MusMdl = ...MuscleModels.AdductorMagnusMid5Par;
    AnyRefNode &Org = ...Segments.Pelvis.Muscles.AdductorMagnusMid5Node;
    AnyRefNode &Ins = ...Segments.Thigh.AdductorMagnusMid5Node;
    viewMuscle = {#include "../DrawSettings/MusDrawSettings.any"};
  };

  AnyMuscleViaPoint AdductorMagnusMid6 = {
    AnyMuscleModel &MusMdl = ...MuscleModels.AdductorMagnusMid6Par;
    AnyRefNode &Org = ...Segments.Pelvis.Muscles.AdductorMagnusMid6Node;
    AnyRefNode &Ins = ...Segments.Thigh.AdductorMagnusMid6Node;
    viewMuscle = {#include "../DrawSettings/MusDrawSettings.any"};
  };
};

MuscleGroup AdductorMagnusProximal = {
  AnyMuscleViaPoint AdductorMagnusProximal1 = {
    AnyMuscleModel &MusMdl = ...MuscleModels.AdductorMagnusProximal1Par;
    AnyRefNode &Org = ...Segments.Pelvis.Muscles.AdductorMagnusProximal1Node;
    AnyRefNode &Ins = ...Segments.Thigh.AdductorMagnusProximal1Node;
    viewMuscle = {#include "../DrawSettings/MusDrawSettings.any"};
  };

  AnyMuscleViaPoint AdductorMagnusProximal2 = {
    AnyMuscleModel &MusMdl = ...MuscleModels.AdductorMagnusProximal2Par;
    AnyRefNode &Org = ...Segments.Pelvis.Muscles.AdductorMagnusProximal2Node;
    AnyRefNode &Ins = ...Segments.Thigh.AdductorMagnusProximal2Node;
    viewMuscle = {#include "../DrawSettings/MusDrawSettings.any"};
  };

  AnyMuscleViaPoint AdductorMagnusProximal3 = {
    AnyMuscleModel &MusMdl = ...MuscleModels.AdductorMagnusProximal3Par;
    AnyRefNode &Org = ...Segments.Pelvis.Muscles.AdductorMagnusProximal3Node;
    AnyRefNode &Ins = ...Segments.Thigh.AdductorMagnusProximal3Node;
    viewMuscle = {#include "../DrawSettings/MusDrawSettings.any"};
  };

  AnyMuscleViaPoint AdductorMagnusProximal4 = {
    AnyMuscleModel &MusMdl = ...MuscleModels.AdductorMagnusProximal4Par;
    AnyRefNode &Org = ...Segments.Pelvis.Muscles.AdductorMagnusProximal4Node;
    AnyRefNode &Ins = ...Segments.Thigh.AdductorMagnusProximal4Node;
    viewMuscle = {#include "../DrawSettings/MusDrawSettings.any"};
  };
};

MuscleGroup AdductorBrevisProximal = {
  AnyMuscleViaPoint AdductorBrevisProximal1 = {
    AnyMuscleModel &MusMdl = ...MuscleModels.AdductorBrevisProximal1Par;
    AnyRefNode &Org = ...Segments.Pelvis.Muscles.AdductorBrevisProximal1Node;
    AnyRefNode &Ins = ...Segments.Thigh.AdductorBrevisProximal1Node;
    viewMuscle = {#include "../DrawSettings/MusDrawSettings.any"};
  };

  AnyMuscleViaPoint AdductorBrevisProximal2 = {
    AnyMuscleModel &MusMdl = ...MuscleModels.AdductorBrevisProximal2Par;
    AnyRefNode &Org = ...Segments.Pelvis.Muscles.AdductorBrevisProximal2Node;
    AnyRefNode &Ins = ...Segments.Thigh.AdductorBrevisProximal2Node;
    viewMuscle = {#include "../DrawSettings/MusDrawSettings.any"};
  };
};

MuscleGroup AdductorBrevisMid = {
  AnyMuscleViaPoint AdductorBrevisMid1 = {
    AnyMuscleModel &MusMdl = ...MuscleModels.AdductorBrevisMid1Par;
    AnyRefNode &Org = ...Segments.Pelvis.Muscles.AdductorBrevisMid1Node;
    AnyRefNode &Ins = ...Segments.Thigh.AdductorBrevisMid1Node;
    viewMuscle = {#include "../DrawSettings/MusDrawSettings.any"};
  };

  AnyMuscleViaPoint AdductorBrevisMid2 = {
    AnyMuscleModel &MusMdl = ...MuscleModels.AdductorBrevisMid2Par;
    AnyRefNode &Org = ...Segments.Pelvis.Muscles.AdductorBrevisMid2Node;
    AnyRefNode &Ins = ...Segments.Thigh.AdductorBrevisMid2Node;
    viewMuscle = {#include "../DrawSettings/MusDrawSettings.any"};
  };
};

MuscleGroup AdductorBrevisDistal = {
  AnyMuscleViaPoint AdductorBrevisDistal1 = {
    AnyMuscleModel &MusMdl = ...MuscleModels.AdductorBrevisDistal1Par;
    AnyRefNode &Org = ...Segments.Pelvis.Muscles.AdductorBrevisDistal1Node;
    AnyRefNode &Ins = ...Segments.Thigh.AdductorBrevisDistal1Node;
    viewMuscle = {#include "../DrawSettings/MusDrawSettings.any"};
  };

  AnyMuscleViaPoint AdductorBrevisDistal2 = {
    AnyMuscleModel &MusMdl = ...MuscleModels.AdductorBrevisDistal2Par;
    AnyRefNode &Org = ...Segments.Pelvis.Muscles.AdductorBrevisDistal2Node;
    AnyRefNode &Ins = ...Segments.Thigh.AdductorBrevisDistal2Node;
    viewMuscle = {#include "../DrawSettings/MusDrawSettings.any"};
  };
};

MuscleGroup Gemellus = {
  AnyMuscleViaPoint GemellusInferior1 = {
    AnyMuscleModel &MusMdl = ...MuscleModels.GemellusInferior1Par;
    AnyRefNode &Org = ...Segments.Pelvis.Muscles.GemellusInferior1Node;
    AnyRefNode &Ins = ...Segments.Thigh.GemellusInferior1Node;
    viewMuscle = {#include "../DrawSettings/MusDrawSettings.any"};
  };

  AnyMuscleViaPoint GemellusSuperior1 = {
    AnyMuscleModel &MusMdl = ...MuscleModels.GemellusSuperior1Par;
    AnyRefNode &Org = ...Segments.Pelvis.Muscles.GemellusSuperior1Node;
    AnyRefNode &Ins = ...Segments.Thigh.GemellusSuperior1Node;
    viewMuscle = {#include "../DrawSettings/MusDrawSettings.any"};
  };
};

MuscleGroup ObturatorExternusSuperior = {
  AnyMuscleViaPoint ObturatorExternusSuperior1 = {
    AnyMuscleModel &MusMdl = ...MuscleModels.ObturatorExternusSuperior1Par;
    AnyRefNode &Org = ...Segments.Pelvis.Muscles.ObturatorExternusSuperior1Node;
    AnyRefNode &Via1 = ...Segments.Thigh.ObturatorExternusVia1Node;
    AnyRefNode &Ins = ...Segments.Thigh.ObturatorExternus1Node;
    viewMuscle = {#include "../DrawSettings/MusDrawSettings.any"};
  };

  AnyMuscleViaPoint ObturatorExternusSuperior2 = {
    AnyMuscleModel &MusMdl = ...MuscleModels.ObturatorExternusSuperior2Par;
    AnyRefNode &Org = ...Segments.Pelvis.Muscles.ObturatorExternusSuperior2Node;
    AnyRefNode &Via1 = ...Segments.Thigh.ObturatorExternusVia1Node;
    AnyRefNode &Ins = ...Segments.Thigh.ObturatorExternus1Node;
    viewMuscle = {#include "../DrawSettings/MusDrawSettings.any"};
  };

  AnyMuscleViaPoint ObturatorExternusSuperior3 = {
    AnyMuscleModel &MusMdl = ...MuscleModels.ObturatorExternusSuperior3Par;
    AnyRefNode &Org = ...Segments.Pelvis.Muscles.ObturatorExternusSuperior3Node;
    AnyRefNode &Via1 = ...Segments.Thigh.ObturatorExternusVia1Node;
    AnyRefNode &Ins = ...Segments.Thigh.ObturatorExternus1Node;
    viewMuscle = {#include "../DrawSettings/MusDrawSettings.any"};
  };
};

MuscleGroup ObturatorExternusInferior = {
  AnyMuscleViaPoint ObturatorExternusInferior1 = {
    AnyMuscleModel &MusMdl = ...MuscleModels.ObturatorExternusInferior1Par;
    AnyRefNode &Org = ...Segments.Pelvis.Muscles.ObturatorExternusInferior1Node;
    AnyRefNode &Via1 = ...Segments.Thigh.ObturatorExternusVia1Node;
    AnyRefNode &Ins = ...Segments.Thigh.ObturatorExternus1Node;
    viewMuscle = {#include "../DrawSettings/MusDrawSettings.any"};
  };

  AnyMuscleViaPoint ObturatorExternusInferior2 = {
    AnyMuscleModel &MusMdl = ...MuscleModels.ObturatorExternusInferior2Par;
    AnyRefNode &Org = ...Segments.Pelvis.Muscles.ObturatorExternusInferior2Node;
    AnyRefNode &Via1 = ...Segments.Thigh.ObturatorExternusVia1Node;
    AnyRefNode &Ins = ...Segments.Thigh.ObturatorExternus1Node;
    viewMuscle = {#include "../DrawSettings/MusDrawSettings.any"};
  };
};

MuscleGroup ObturatorInternus = {
  AnyMuscleViaPoint ObturatorInternus1 = {
    AnyMuscleModel &MusMdl = ...MuscleModels.ObturatorInternus1Par;
    AnyRefNode &Org = ...Segments.Pelvis.Muscles.ObturatorInternus1Node;
    AnyRefNode &Via1 = ...Segments.Pelvis.Muscles.ObturatorInternusViaNode1;
    AnyRefNode &Ins = ...Segments.Thigh.ObturatorInternus1Node;
    viewMuscle = {#include "../DrawSettings/MusDrawSettings.any"};
  };

  AnyMuscleViaPoint ObturatorInternus2 = {
    AnyMuscleModel &MusMdl = ...MuscleModels.ObturatorInternus2Par;
    AnyRefNode &Org = ...Segments.Pelvis.Muscles.ObturatorInternus2Node;
    AnyRefNode &Via1 = ...Segments.Pelvis.Muscles.ObturatorInternusViaNode1;
    AnyRefNode &Ins = ...Segments.Thigh.ObturatorInternus1Node;
    viewMuscle = {#include "../DrawSettings/MusDrawSettings.any"};
  };

  AnyMuscleViaPoint ObturatorInternus3 = {
    AnyMuscleModel &MusMdl = ...MuscleModels.ObturatorInternus3Par;
    AnyRefNode &Org = ...Segments.Pelvis.Muscles.ObturatorInternus3Node;
    AnyRefNode &Via1 = ...Segments.Pelvis.Muscles.ObturatorInternusViaNode1;
    AnyRefNode &Ins = ...Segments.Thigh.ObturatorInternus1Node;
    viewMuscle = {#include "../DrawSettings/MusDrawSettings.any"};
  };

  AnyMuscleViaPoint ObturatorInternus4 = {
    AnyMuscleModel &MusMdl = ...MuscleModels.ObturatorInternus4Par;
    AnyRefNode &Org = ...Segments.Pelvis.Muscles.ObturatorInternus4Node;
    AnyRefNode &Via1 = ...Segments.Pelvis.Muscles.ObturatorInternusViaNode1;
    AnyRefNode &Ins = ...Segments.Thigh.ObturatorInternus1Node;
    viewMuscle = {#include "../DrawSettings/MusDrawSettings.any"};
  };

  AnyMuscleViaPoint ObturatorInternus5 = {
    AnyMuscleModel &MusMdl = ...MuscleModels.ObturatorInternus5Par;
    AnyRefNode &Org = ...Segments.Pelvis.Muscles.ObturatorInternus5Node;
    AnyRefNode &Via1 = ...Segments.Pelvis.Muscles.ObturatorInternusViaNode1;
    AnyRefNode &Ins = ...Segments.Thigh.ObturatorInternus1Node;
    viewMuscle = {#include "../DrawSettings/MusDrawSettings.any"};
  };

  AnyMuscleViaPoint ObturatorInternus6 = {
    AnyMuscleModel &MusMdl = ...MuscleModels.ObturatorInternus6Par;
    AnyRefNode &Org = ...Segments.Pelvis.Muscles.ObturatorInternus6Node;
    AnyRefNode &Via1 = ...Segments.Pelvis.Muscles.ObturatorInternusViaNode1;
    AnyRefNode &Ins = ...Segments.Thigh.ObturatorInternus1Node;
    viewMuscle = {#include "../DrawSettings/MusDrawSettings.any"};
  };
};

MuscleGroup Pectineus = {
  AnyMuscleViaPoint Pectineus1 = {
    AnyMuscleModel &MusMdl = ...MuscleModels.Pectineus1Par;
    AnyRefNode &Org = ...Segments.Pelvis.Muscles.Pectineus1Node;
    AnyRefNode &Via = ...Segments.Pelvis.Muscles.Pectineus1ViaNode;
    AnyRefNode &Ins = ...Segments.Thigh.Pectineus1Node;
    viewMuscle = {#include "../DrawSettings/MusDrawSettings.any"};
  };

  AnyMuscleViaPoint Pectineus2 = {
    AnyMuscleModel &MusMdl = ...MuscleModels.Pectineus2Par;
    AnyRefNode &Org = ...Segments.Pelvis.Muscles.Pectineus2Node;
    AnyRefNode &Ins = ...Segments.Thigh.Pectineus2Node;
    viewMuscle = {#include "../DrawSettings/MusDrawSettings.any"};
  };

  AnyMuscleViaPoint Pectineus3 = {
    AnyMuscleModel &MusMdl = ...MuscleModels.Pectineus3Par;
    AnyRefNode &Org = ...Segments.Pelvis.Muscles.Pectineus3Node;
    AnyRefNode &Ins = ...Segments.Thigh.Pectineus3Node;
    viewMuscle = {#include "../DrawSettings/MusDrawSettings.any"};
  };

  AnyMuscleViaPoint Pectineus4 = {
    AnyMuscleModel &MusMdl = ...MuscleModels.Pectineus4Par;
    AnyRefNode &Org = ...Segments.Pelvis.Muscles.Pectineus4Node;
    AnyRefNode &Ins = ...Segments.Thigh.Pectineus4Node;
    viewMuscle = {#include "../DrawSettings/MusDrawSettings.any"};
  };
};

MuscleGroup Popliteus = {
  AnyMuscleViaPoint Popliteus1 = {
    AnyMuscleModel &MusMdl = ...MuscleModels.Popliteus1Par;
    AnyRefNode &Org = ...Segments.Thigh.Popliteus1Node;
    AnyRefNode &Via1 = ...Segments.Shank.PopliteusViaNode1;
    AnyRefNode &Via2 = ...Segments.Shank.PopliteusViaNode2;
    AnyRefNode &Ins = ...Segments.Shank.Popliteus1Node;
    viewMuscle = {#include "../DrawSettings/MusDrawSettings.any"};
  };

  AnyMuscleViaPoint Popliteus2 = {
    AnyMuscleModel &MusMdl = ...MuscleModels.Popliteus2Par;
    AnyRefNode &Org = ...Segments.Thigh.Popliteus2Node;
    AnyRefNode &Via1 = ...Segments.Shank.PopliteusViaNode1;
    AnyRefNode &Via2 = ...Segments.Shank.PopliteusViaNode2;
    AnyRefNode &Ins = ...Segments.Shank.Popliteus2Node;
    viewMuscle = {#include "../DrawSettings/MusDrawSettings.any"};
  };

  AnyMuscleViaPoint Popliteus3 = {
    AnyMuscleModel &MusMdl = ...MuscleModels.Popliteus3Par;
    AnyRefNode &Org = ...Segments.Thigh.Popliteus3Node;
    AnyRefNode &Via1 = ...Segments.Shank.PopliteusViaNode1;
    AnyRefNode &Via2 = ...Segments.Shank.PopliteusViaNode2;
    AnyRefNode &Ins = ...Segments.Shank.Popliteus3Node;
    viewMuscle = {#include "../DrawSettings/MusDrawSettings.any"};
  };
};

MuscleGroup QuadratusFemoris = {
  AnyMuscleViaPoint QuadratusFemoris1 = {
    AnyMuscleModel &MusMdl = ...MuscleModels.QuadratusFemoris1Par;
    AnyRefNode &Org = ...Segments.Pelvis.Muscles.QuadratusFemoris1Node;
    AnyRefNode &Ins = ...Segments.Thigh.QuadratusFemoris1Node;
    viewMuscle = {#include "../DrawSettings/MusDrawSettings.any"};
  };

  AnyMuscleViaPoint QuadratusFemoris2 = {
    AnyMuscleModel &MusMdl = ...MuscleModels.QuadratusFemoris2Par;
    AnyRefNode &Org = ...Segments.Pelvis.Muscles.QuadratusFemoris2Node;
    AnyRefNode &Ins = ...Segments.Thigh.QuadratusFemoris2Node;
    viewMuscle = {#include "../DrawSettings/MusDrawSettings.any"};
  };

  AnyMuscleViaPoint QuadratusFemoris3 = {
    AnyMuscleModel &MusMdl = ...MuscleModels.QuadratusFemoris3Par;
    AnyRefNode &Org = ...Segments.Pelvis.Muscles.QuadratusFemoris3Node;
    AnyRefNode &Ins = ...Segments.Thigh.QuadratusFemoris3Node;
    viewMuscle = {#include "../DrawSettings/MusDrawSettings.any"};
  };

  AnyMuscleViaPoint QuadratusFemoris4 = {
    AnyMuscleModel &MusMdl = ...MuscleModels.QuadratusFemoris4Par;
    AnyRefNode &Org = ...Segments.Pelvis.Muscles.QuadratusFemoris4Node;
    AnyRefNode &Ins = ...Segments.Thigh.QuadratusFemoris4Node;
    viewMuscle = {#include "../DrawSettings/MusDrawSettings.any"};
  };
};
