AnyFolder &SoleusMedialis1 = SoleusMedialis.SoleusMedialis1;
AnyFolder &SoleusMedialis2 = SoleusMedialis.SoleusMedialis2;
AnyFolder &SoleusMedialis3 = SoleusMedialis.SoleusMedialis3;
AnyFolder &SoleusLateralis1 = SoleusLateralis.SoleusLateralis1;
AnyFolder &SoleusLateralis2 = SoleusLateralis.SoleusLateralis2;
AnyFolder &SoleusLateralis3 = SoleusLateralis.SoleusLateralis3;
AnyFolder &GastrocnemiusLateralis1 = GastrocnemiusLateralis.GastrocnemiusLateralis1;
AnyFolder &GastrocnemiusMedialis1 = GastrocnemiusMedialis.GastrocnemiusMedialis1;
AnyFolder &VastusLateralisInferior1 = VastusLateralisInferior.VastusLateralisInferior1;
AnyFolder &VastusLateralisInferior2 = VastusLateralisInferior.VastusLateralisInferior2;
AnyFolder &VastusLateralisInferior3 = VastusLateralisInferior.VastusLateralisInferior3;
AnyFolder &VastusLateralisInferior4 = VastusLateralisInferior.VastusLateralisInferior4;
AnyFolder &VastusLateralisInferior5 = VastusLateralisInferior.VastusLateralisInferior5;
AnyFolder &VastusLateralisInferior6 = VastusLateralisInferior.VastusLateralisInferior6;
AnyFolder &VastusLateralisSuperior1 = VastusLateralisSuperior.VastusLateralisSuperior1;
AnyFolder &VastusLateralisSuperior2 = VastusLateralisSuperior.VastusLateralisSuperior2;
AnyFolder &VastusMedialisInferior1 = VastusMedialisInferior.VastusMedialisInferior1;
AnyFolder &VastusMedialisInferior2 = VastusMedialisInferior.VastusMedialisInferior2;
AnyFolder &VastusMedialisMid1 = VastusMedialisMid.VastusMedialisMid1;
AnyFolder &VastusMedialisMid2 = VastusMedialisMid.VastusMedialisMid2;
AnyFolder &VastusMedialisSuperior1 = VastusMedialisSuperior.VastusMedialisSuperior1;
AnyFolder &VastusMedialisSuperior2 = VastusMedialisSuperior.VastusMedialisSuperior2;
AnyFolder &VastusMedialisSuperior3 = VastusMedialisSuperior.VastusMedialisSuperior3;
AnyFolder &VastusMedialisSuperior4 = VastusMedialisSuperior.VastusMedialisSuperior4;
AnyFolder &VastusIntermedius1 = VastusIntermedius.VastusIntermedius1;
AnyFolder &VastusIntermedius2 = VastusIntermedius.VastusIntermedius2;
AnyFolder &VastusIntermedius3 = VastusIntermedius.VastusIntermedius3;
AnyFolder &VastusIntermedius4 = VastusIntermedius.VastusIntermedius4;
AnyFolder &VastusIntermedius5 = VastusIntermedius.VastusIntermedius5;
AnyFolder &VastusIntermedius6 = VastusIntermedius.VastusIntermedius6;
AnyFolder &RectusFemoris1 = RectusFemoris.RectusFemoris1;
AnyFolder &RectusFemoris2 = RectusFemoris.RectusFemoris2;
AnyFolder &Semitendinosus1 = Semitendinosus.Semitendinosus1;
AnyFolder &Semimembranosus1 = Semimembranosus.Semimembranosus1;
AnyFolder &Semimembranosus2 = Semimembranosus.Semimembranosus2;
AnyFolder &Semimembranosus3 = Semimembranosus.Semimembranosus3;
AnyFolder &BicepsFemorisCaputLongum1 = BicepsFemorisCaputLongum.BicepsFemorisCaputLongum1;
AnyFolder &BicepsFemorisCaputBreve1 = BicepsFemorisCaputBreve.BicepsFemorisCaputBreve1;
AnyFolder &BicepsFemorisCaputBreve2 = BicepsFemorisCaputBreve.BicepsFemorisCaputBreve2;
AnyFolder &BicepsFemorisCaputBreve3 = BicepsFemorisCaputBreve.BicepsFemorisCaputBreve3;
AnyFolder &IliacusLateralis1 = IliacusLateralis.IliacusLateralis1;
AnyFolder &IliacusLateralis2 = IliacusLateralis.IliacusLateralis2;
AnyFolder &IliacusMid1 = IliacusMid.IliacusMid1;
AnyFolder &IliacusMid2 = IliacusMid.IliacusMid2;
AnyFolder &IliacusMedialis1 = IliacusMedialis.IliacusMedialis1;
AnyFolder &IliacusMedialis2 = IliacusMedialis.IliacusMedialis2;
AnyFolder &GluteusMaximusSuperior1 = GluteusMaximusSuperior.GluteusMaximusSuperior1;
AnyFolder &GluteusMaximusSuperior2 = GluteusMaximusSuperior.GluteusMaximusSuperior2;
AnyFolder &GluteusMaximusSuperior3 = GluteusMaximusSuperior.GluteusMaximusSuperior3;
AnyFolder &GluteusMaximusSuperior4 = GluteusMaximusSuperior.GluteusMaximusSuperior4;
AnyFolder &GluteusMaximusSuperior5 = GluteusMaximusSuperior.GluteusMaximusSuperior5;
AnyFolder &GluteusMaximusSuperior6 = GluteusMaximusSuperior.GluteusMaximusSuperior6;
AnyFolder &GluteusMaximusInferior1 = GluteusMaximusInferior.GluteusMaximusInferior1;
AnyFolder &GluteusMaximusInferior2 = GluteusMaximusInferior.GluteusMaximusInferior2;
AnyFolder &GluteusMaximusInferior3 = GluteusMaximusInferior.GluteusMaximusInferior3;
AnyFolder &GluteusMaximusInferior4 = GluteusMaximusInferior.GluteusMaximusInferior4;
AnyFolder &GluteusMaximusInferior5 = GluteusMaximusInferior.GluteusMaximusInferior5;
AnyFolder &GluteusMaximusInferior6 = GluteusMaximusInferior.GluteusMaximusInferior6;
AnyFolder &Plantaris1 = Plantaris.Plantaris1;
