#if BM_TRUNK_MUSCLES

#if BM_TRUNK_CAVITY_MODEL == _CAVITY_MODEL_VOLUME_
MuscleGroup Diaphragm = {

  AnyMuscleShortestPath L1_Diaphragm1 = {
    AnyMuscleModel &MusMdl = ....MuscleModels.Left.Diaphragm.L1_Diaphragm1;
    AnyRefNode &Org = ....Segments.L1Seg.L1_DiaphragmNode1L;
    AnyRefNode &Ins = ....Abdominal.Diaphragm.CavitySegSuperoanterior.Layer_T10.Left.L1_Diaphragm1Node;
    viewMuscle = {#include "../DrawSettings/MusDrawSettings.any"};
    viewForce.Visible ??= Off;
    AnyParamSurf &Srf = ....Abdominal.Diaphragm.CavitySegSuperoposterior.Layer_T10.Left.L1_Diaphragm1;
    SPLine = {
      StringMesh=35;
      AnyMatrix InitWrapPos = {transf3D({0,-.Srf.Radius[0],0}, &.Srf)};
      InitWrapPosVecArr = {&InitWrapPos};
    };
  };

  AnyMuscleShortestPath L1_Diaphragm2 = {
    AnyMuscleModel &MusMdl = ....MuscleModels.Left.Diaphragm.L1_Diaphragm2;
    AnyRefNode &Org = ....Segments.L1Seg.L1_DiaphragmNode2L;
    AnyRefNode &Ins = ....Abdominal.Diaphragm.CavitySegSuperoanterior.Layer_T10.Left.L1_Diaphragm2Node;
    viewMuscle = {#include "../DrawSettings/MusDrawSettings.any"};
    viewForce.Visible ??= Off;
    AnyParamSurf &Srf = ....Abdominal.Diaphragm.CavitySegSuperoposterior.Layer_T10.Left.L1_Diaphragm2;
    SPLine = {
      StringMesh=35;
      AnyMatrix InitWrapPos = {transf3D({0,-.Srf.Radius[0],0}, &.Srf)};
      InitWrapPosVecArr = {&InitWrapPos};
    };
  };

  AnyMuscleShortestPath L2_Diaphragm1 = {
    AnyMuscleModel &MusMdl = ....MuscleModels.Left.Diaphragm.L2_Diaphragm1;
    AnyRefNode &Org = ....Segments.L2Seg.L2_DiaphragmNode1L;
    AnyRefNode &Ins = ....Abdominal.Diaphragm.CavitySegSuperoanterior.Layer_T10.Left.L2_Diaphragm1Node;
    viewMuscle = {#include "../DrawSettings/MusDrawSettings.any"};
    viewForce.Visible ??= Off;
    AnyParamSurf &Srf = ....Abdominal.Diaphragm.CavitySegSuperoposterior.Layer_T10.Left.L2_Diaphragm1;
    SPLine = {
      StringMesh=35;
      AnyMatrix InitWrapPos = {transf3D({0,-.Srf.Radius[0],0}, &.Srf)};
      InitWrapPosVecArr = {&InitWrapPos};
    };
  };

  AnyMuscleShortestPath L2_Diaphragm2 = {
    AnyMuscleModel &MusMdl = ....MuscleModels.Left.Diaphragm.L2_Diaphragm2;
    AnyRefNode &Org = ....Segments.L2Seg.L2_DiaphragmNode2L;
    AnyRefNode &Ins = ....Abdominal.Diaphragm.CavitySegSuperoanterior.Layer_T10.Left.L2_Diaphragm2Node;
    viewMuscle = {#include "../DrawSettings/MusDrawSettings.any"};
    viewForce.Visible ??= Off;
    AnyParamSurf &Srf = ....Abdominal.Diaphragm.CavitySegSuperoposterior.Layer_T10.Left.L2_Diaphragm2;
    SPLine = {
      StringMesh=35;
      AnyMatrix InitWrapPos = {transf3D({0,-.Srf.Radius[0],0}, &.Srf)};
      InitWrapPosVecArr = {&InitWrapPos};
    };
  };

  AnyMuscleShortestPath L1TransverseProcess_Diaphragm = {
    AnyMuscleModel &MusMdl = ....MuscleModels.Left.Diaphragm.L1TransverseProcess_Diaphragm;
    AnyRefNode &Org = ....Segments.L1Seg.L1TransversProcess_DiaphragmL;
    AnyRefNode &Ins = ....Abdominal.Diaphragm.CavitySegSuperoanterior.Layer_T10.Left.L1TransversProcess_DiaphragmNode;
    viewMuscle = {#include "../DrawSettings/MusDrawSettings.any"};
    viewForce.Visible ??= Off;
    AnyParamSurf &Srf = ....Abdominal.Diaphragm.CavitySegSuperoposterior.Layer_T10.Left.L1TransverseProcess_Diaphragm;
    SPLine = {
      StringMesh=35;
      AnyMatrix InitWrapPos = {transf3D({0,-.Srf.Radius[0],0}, &.Srf)};
      InitWrapPosVecArr = {&InitWrapPos};
    };
  };
  AnyMuscleShortestPath R12_Diaphragm2 = {
    AnyMuscleModel &MusMdl = ....MuscleModels.Left.Diaphragm.R12_Diaphragm2;
    AnyRefNode &Org = ....Segments.Left.R12Seg.R12_DiaphragmNode2L;
    AnyRefNode &Ins = ....Abdominal.Diaphragm.CavitySegSuperoanterior.Layer_T10.Left.R12_Diaphragm2Node;
    viewMuscle = {#include "../DrawSettings/MusDrawSettings.any"};
    viewForce.Visible ??= Off;
    AnyParamSurf &Srf = ....Abdominal.Diaphragm.CavitySegSuperoposterior.Layer_T10.Left.R12_Diaphragm2;
    SPLine = {
      StringMesh=35;
      AnyMatrix InitWrapPos = {transf3D({0,-.Srf.Radius[0],0}, &.Srf)};
      InitWrapPosVecArr = {&InitWrapPos};
    };
  };
  AnyMuscleShortestPath R12_Diaphragm1 = {
    AnyMuscleModel &MusMdl = ....MuscleModels.Left.Diaphragm.R12_Diaphragm1;
    AnyRefNode &Org = ....Segments.Left.R12Seg.R12_DiaphragmNode1L;
    AnyRefNode &Ins = ....Abdominal.Diaphragm.CavitySegSuperoanterior.Layer_T10.Left.R12_Diaphragm1Node;
    viewMuscle = {#include "../DrawSettings/MusDrawSettings.any"};
    viewForce.Visible ??= Off;
    AnyParamSurf &Srf = ....Abdominal.Diaphragm.CavitySegSuperoposterior.Layer_T10.Left.R12_Diaphragm1;
    SPLine = {
      StringMesh=35;
      AnyMatrix InitWrapPos = {transf3D({0,-.Srf.Radius[0],0}, &.Srf)};
      InitWrapPosVecArr = {&InitWrapPos};
    };
  };
  AnyMuscleShortestPath R11_Diaphragm3 = {
    AnyMuscleModel &MusMdl = ....MuscleModels.Left.Diaphragm.R11_Diaphragm3;
    AnyRefNode &Org = ....Segments.Left.R11Seg.R11_DiaphragmNode3L;
    AnyRefNode &Ins = ....Abdominal.Diaphragm.CavitySegSuperoanterior.Layer_T10.Left.R11_Diaphragm3Node;
    viewMuscle = {#include "../DrawSettings/MusDrawSettings.any"};
    viewForce.Visible ??= Off;
    AnyParamSurf &Srf = ....Abdominal.Diaphragm.CavitySegSuperoanterior.Layer_T10.Left.R11_Diaphragm3;
    SPLine = {
      StringMesh=35;
      AnyMatrix InitWrapPos = {transf3D({0,-.Srf.Radius[0],0}, &.Srf)};
      InitWrapPosVecArr = {&InitWrapPos};
    };
  };
  AnyMuscleShortestPath R11_Diaphragm2 = {
    AnyMuscleModel &MusMdl = ....MuscleModels.Left.Diaphragm.R11_Diaphragm2;
    AnyRefNode &Org = ....Segments.Left.R11Seg.R11_DiaphragmNode2L;
    AnyRefNode &Ins = ....Abdominal.Diaphragm.CavitySegSuperoanterior.Layer_T10.Left.R11_Diaphragm2Node;
    viewMuscle = {#include "../DrawSettings/MusDrawSettings.any"};
    viewForce.Visible ??= Off;
    AnyParamSurf &Srf = ....Abdominal.Diaphragm.CavitySegSuperoanterior.Layer_T10.Left.R11_Diaphragm2;
    SPLine = {
      StringMesh=35;
      AnyMatrix InitWrapPos = {transf3D({0,-.Srf.Radius[0],0}, &.Srf)};
      InitWrapPosVecArr = {&InitWrapPos};
    };
  };
  AnyMuscleShortestPath R11_Diaphragm1 = {
    AnyMuscleModel &MusMdl = ....MuscleModels.Left.Diaphragm.R11_Diaphragm1;
    AnyRefNode &Org = ....Segments.Left.R11Seg.R11_DiaphragmNode1L;
    AnyRefNode &Ins = ....Abdominal.Diaphragm.CavitySegSuperoanterior.Layer_T10.Left.R11_Diaphragm1Node;
    viewMuscle = {#include "../DrawSettings/MusDrawSettings.any"};
    viewForce.Visible ??= Off;
    AnyParamSurf &Srf = ....Abdominal.Diaphragm.CavitySegSuperoanterior.Layer_T10.Left.R11_Diaphragm1;
    SPLine = {
      StringMesh=35;
      AnyMatrix InitWrapPos = {transf3D({0,-.Srf.Radius[0],0}, &.Srf)};
      InitWrapPosVecArr = {&InitWrapPos};
    };
  };
  AnyMuscleShortestPath R10_Diaphragm1 = {
    AnyMuscleModel &MusMdl = ....MuscleModels.Left.Diaphragm.R10_Diaphragm1;
    AnyRefNode &Org = ....Segments.Left.R10Seg.R10_DiaphragmNode1L;
    AnyRefNode &Ins = ....Abdominal.Diaphragm.CavitySegSuperoanterior.Layer_T10.Left.R10_Diaphragm1Node;
    viewMuscle = {#include "../DrawSettings/MusDrawSettings.any"};
    viewForce.Visible ??= Off;
    AnyParamSurf &Srf = ....Abdominal.Diaphragm.CavitySegSuperoanterior.Layer_T10.Left.R10_Diaphragm1;
    SPLine = {
      StringMesh=35;
      AnyMatrix InitWrapPos = {transf3D({0,-.Srf.Radius[0],0}, &.Srf)};
      InitWrapPosVecArr = {&InitWrapPos};
    };
  };
  AnyMuscleShortestPath R10_Diaphragm2 = {
    AnyMuscleModel &MusMdl = ....MuscleModels.Left.Diaphragm.R10_Diaphragm2;
    AnyRefNode &Org = ....Segments.Left.R10Seg.R10_DiaphragmNode2L;
    AnyRefNode &Ins = ....Abdominal.Diaphragm.CavitySegSuperoanterior.Layer_T10.Left.R10_Diaphragm2Node;
    viewMuscle = {#include "../DrawSettings/MusDrawSettings.any"};
    viewForce.Visible ??= Off;
    AnyParamSurf &Srf = ....Abdominal.Diaphragm.CavitySegSuperoanterior.Layer_T10.Left.R10_Diaphragm2;
    SPLine = {
      StringMesh=35;
      AnyMatrix InitWrapPos = {transf3D({0,-.Srf.Radius[0],0}, &.Srf)};
      InitWrapPosVecArr = {&InitWrapPos};
    };
  };
  AnyMuscleShortestPath R10_Diaphragm3 = {
    AnyMuscleModel &MusMdl = ....MuscleModels.Left.Diaphragm.R10_Diaphragm3;
    AnyRefNode &Org = ....Segments.Left.R10Seg.R10_DiaphragmNode3L;
    AnyRefNode &Ins = ....Abdominal.Diaphragm.CavitySegSuperoanterior.Layer_T10.Left.R10_Diaphragm3Node;
    viewMuscle = {#include "../DrawSettings/MusDrawSettings.any"};
    viewForce.Visible ??= Off;
    AnyParamSurf &Srf = ....Abdominal.Diaphragm.CavitySegSuperoanterior.Layer_T10.Left.R10_Diaphragm3;
    SPLine = {
      StringMesh=35;
      AnyMatrix InitWrapPos = {transf3D({0,-.Srf.Radius[0],0}, &.Srf)};
      InitWrapPosVecArr = {&InitWrapPos};
    };
  };
  AnyMuscleShortestPath CC_DiaphragmNode7 = {
    AnyMuscleModel &MusMdl = ....MuscleModels.Left.Diaphragm.CC_DiaphragmNode7;
    #if BM_TRUNK_THORACIC_STERNUM_TOPOLOGY == 4
    AnyRefNode &Org = ....Segments.Left.CostalCartilageSeg.CC_DiaphragmNode7L;
    #else
    AnyRefNode &Org = ....Segments.SternalBodySeg.CC_DiaphragmNode7L;
    #endif
    AnyRefNode &Ins = ....Abdominal.Diaphragm.CavitySegSuperoanterior.Layer_T10.Left.CC_Diaphragm7Node;
    viewMuscle = {#include "../DrawSettings/MusDrawSettings.any"};
    viewForce.Visible ??= Off;
    AnyParamSurf &Srf = ....Abdominal.Diaphragm.CavitySegSuperoanterior.Layer_T10.Left.CC_Diaphragm7;
    SPLine = {
      StringMesh=35;
      AnyMatrix InitWrapPos = {transf3D({0,-.Srf.Radius[0],0}, &.Srf)};
      InitWrapPosVecArr = {&InitWrapPos};
    };
  };
  AnyMuscleShortestPath CC_DiaphragmNode6 = {
    AnyMuscleModel &MusMdl = ....MuscleModels.Left.Diaphragm.CC_DiaphragmNode6;
    #if BM_TRUNK_THORACIC_STERNUM_TOPOLOGY == 4
    AnyRefNode &Org = ....Segments.Left.CostalCartilageSeg.CC_DiaphragmNode6L;
    #else
    AnyRefNode &Org = ....Segments.SternalBodySeg.CC_DiaphragmNode6L;
    #endif
    AnyRefNode &Ins = ....Abdominal.Diaphragm.CavitySegSuperoanterior.Layer_T10.Left.CC_Diaphragm6Node;
    viewMuscle = {#include "../DrawSettings/MusDrawSettings.any"};
    viewForce.Visible ??= Off;
    AnyParamSurf &Srf = ....Abdominal.Diaphragm.CavitySegSuperoanterior.Layer_T10.Left.CC_Diaphragm6;
    SPLine = {
      StringMesh=35;
      AnyMatrix InitWrapPos = {transf3D({0,-.Srf.Radius[0],0}, &.Srf)};
      InitWrapPosVecArr = {&InitWrapPos};
    };
  };
  AnyMuscleShortestPath CC_DiaphragmNode5 = {
    AnyMuscleModel &MusMdl = ....MuscleModels.Left.Diaphragm.CC_DiaphragmNode5;
    #if BM_TRUNK_THORACIC_STERNUM_TOPOLOGY == 4
    AnyRefNode &Org = ....Segments.Left.CostalCartilageSeg.CC_DiaphragmNode5L;
    #else
    AnyRefNode &Org = ....Segments.SternalBodySeg.CC_DiaphragmNode5L;
    #endif
    AnyRefNode &Ins = ....Abdominal.Diaphragm.CavitySegSuperoanterior.Layer_T10.Left.CC_Diaphragm5Node;
    viewMuscle = {#include "../DrawSettings/MusDrawSettings.any"};
    viewForce.Visible ??= Off;
    AnyParamSurf &Srf = ....Abdominal.Diaphragm.CavitySegSuperoanterior.Layer_T10.Left.CC_Diaphragm5;
    SPLine = {
      StringMesh=35;
      AnyMatrix InitWrapPos = {transf3D({0,-.Srf.Radius[0],0}, &.Srf)};
      InitWrapPosVecArr = {&InitWrapPos};
    };
  };
  AnyMuscleShortestPath CC_DiaphragmNode4 = {
    AnyMuscleModel &MusMdl = ....MuscleModels.Left.Diaphragm.CC_DiaphragmNode4;
    #if BM_TRUNK_THORACIC_STERNUM_TOPOLOGY == 4
    AnyRefNode &Org = ....Segments.Left.CostalCartilageSeg.CC_DiaphragmNode4L;
    #else
    AnyRefNode &Org = ....Segments.SternalBodySeg.CC_DiaphragmNode4L;
    #endif
    AnyRefNode &Ins = ....Abdominal.Diaphragm.CavitySegSuperoanterior.Layer_T10.Left.CC_Diaphragm4Node;
    viewMuscle = {#include "../DrawSettings/MusDrawSettings.any"};
    viewForce.Visible ??= Off;
    AnyParamSurf &Srf = ....Abdominal.Diaphragm.CavitySegSuperoanterior.Layer_T10.Left.CC_Diaphragm4;
    SPLine = {
      StringMesh=35;
      AnyMatrix InitWrapPos = {transf3D({0,-.Srf.Radius[0],0}, &.Srf)};
      InitWrapPosVecArr = {&InitWrapPos};
    };
  };
  AnyMuscleShortestPath CC_DiaphragmNode3 = {
    AnyMuscleModel &MusMdl = ....MuscleModels.Left.Diaphragm.CC_DiaphragmNode3;
    #if BM_TRUNK_THORACIC_STERNUM_TOPOLOGY == 4
    AnyRefNode &Org = ....Segments.Left.CostalCartilageSeg.CC_DiaphragmNode3L;
    #else
    AnyRefNode &Org = ....Segments.SternalBodySeg.CC_DiaphragmNode3L;
    #endif
    AnyRefNode &Ins = ....Abdominal.Diaphragm.CavitySegSuperoanterior.Layer_T10.Left.CC_Diaphragm3Node;
    viewMuscle = {#include "../DrawSettings/MusDrawSettings.any"};
    viewForce.Visible ??= Off;
    AnyParamSurf &Srf = ....Abdominal.Diaphragm.CavitySegSuperoanterior.Layer_T10.Left.CC_Diaphragm3;
    SPLine = {
      StringMesh=35;
      AnyMatrix InitWrapPos = {transf3D({0,-.Srf.Radius[0],0}, &.Srf)};
      InitWrapPosVecArr = {&InitWrapPos};
    };
  };
  AnyMuscleShortestPath CC_DiaphragmNode2 = {
    AnyMuscleModel &MusMdl = ....MuscleModels.Left.Diaphragm.CC_DiaphragmNode2;
    #if BM_TRUNK_THORACIC_STERNUM_TOPOLOGY == 4
    AnyRefNode &Org = ....Segments.Left.CostalCartilageSeg.CC_DiaphragmNode2L;
    #else
    AnyRefNode &Org = ....Segments.SternalBodySeg.CC_DiaphragmNode2L;
    #endif
    AnyRefNode &Ins = ....Abdominal.Diaphragm.CavitySegSuperoanterior.Layer_T10.Left.CC_Diaphragm2Node;
    viewMuscle = {#include "../DrawSettings/MusDrawSettings.any"};
    viewForce.Visible ??= Off;
    AnyParamSurf &Srf = ....Abdominal.Diaphragm.CavitySegSuperoanterior.Layer_T10.Left.CC_Diaphragm2;
    SPLine = {
      StringMesh=35;
      AnyMatrix InitWrapPos = {transf3D({0,-.Srf.Radius[0],0}, &.Srf)};
      InitWrapPosVecArr = {&InitWrapPos};
    };
  };
  AnyMuscleShortestPath CC_DiaphragmNode1 = {
    AnyMuscleModel &MusMdl = ....MuscleModels.Left.Diaphragm.CC_DiaphragmNode1;
    #if BM_TRUNK_THORACIC_STERNUM_TOPOLOGY == 4
    AnyRefNode &Org = ....Segments.Left.CostalCartilageSeg.CC_DiaphragmNode1L;
    #else
    AnyRefNode &Org = ....Segments.SternalBodySeg.CC_DiaphragmNode1L;
    #endif
    AnyRefNode &Ins = ....Abdominal.Diaphragm.CavitySegSuperoanterior.Layer_T10.Left.CC_Diaphragm1Node;
    viewMuscle = {#include "../DrawSettings/MusDrawSettings.any"};
    viewForce.Visible ??= Off;
    AnyParamSurf &Srf = ....Abdominal.Diaphragm.CavitySegSuperoanterior.Layer_T10.Left.CC_Diaphragm1;
    SPLine = {
      StringMesh=35;
      AnyMatrix InitWrapPos = {transf3D({0,-.Srf.Radius[0],0}, &.Srf)};
      InitWrapPosVecArr = {&InitWrapPos};
    };
  };

  AnyMuscleShortestPath Xiphoid_Diaphragm = {
    AnyMuscleModel &MusMdl = ....MuscleModels.Left.Diaphragm.Xiphoid_Diaphragm;
    AnyRefNode &Org = ....Segments.SternalBodySeg.Xiphoid_DiaphragmNodeL;
    AnyRefNode &Ins = ....Abdominal.Diaphragm.CavitySegSuperoanterior.Layer_T10.Left.Xiphoid_DiaphragmNode;
    viewMuscle = {#include "../DrawSettings/MusDrawSettings.any"};
    viewForce.Visible ??= Off;
    AnyParamSurf &Srf = ....Abdominal.Diaphragm.CavitySegSuperoanterior.Layer_T10.Left.Xiphoid_Diaphragm;
    SPLine = {
      StringMesh=35;
      AnyMatrix InitWrapPos = {transf3D({0,-.Srf.Radius[0],0}, &.Srf)};
      InitWrapPosVecArr = {&InitWrapPos};
    };
  };
};
#endif

// Model needs the Hyoid bone. The hyoid muscles try to stabilize the trachea and play a
// vital part in swallowing and speech.
MuscleGroup Hyoid = {
  AnyMuscleViaPoint LumpedHyoidStC0 = {
    AnyMuscleModel &MusMdl = ....MuscleModels.Left.LumpedHyoid.LumpedHyoidStC0;
    AnyRefNode &Org = ....Segments.SkullSeg.LumpedHyoidT1C0NodeL;
    AnyRefNode &Ins = ....Segments.SternumSeg.LumpedHyoidStC0NodeLIns;
    viewMuscle = {#include "../DrawSettings/MusDrawSettings.any"};
    viewForce.Visible ??= Off;
  };
};

// Iliocostalis Cervicis
AnyFolder IliocostalisCervicis = {
  AnyMuscleViaPoint ICptR3C4 = {
    AnyMuscleModel &MusMdl = ....MuscleModels.Left.IliocostalisCervicis.ICptR3C4;
    AnyRefNode &Org = ....Segments.C4Seg.Left.ICptR3C4Node;
    AnyRefNode &Via1 = ....Segments.C7Seg.Left.ICptR3C4Via1Node;
    AnyRefNode &Via2 = ....Segments.Left.R1Seg.ICptR3C4Via2Node;
    AnyRefNode &Ins = ....Segments.Left.R3Seg.ICptR3C4Node;
    viewMuscle = {#include "../DrawSettings/MusDrawSettings.any"};
    viewForce.Visible ??= Off;
  };
  AnyMuscleViaPoint ICptR4C5 = {
    AnyMuscleModel &MusMdl = ....MuscleModels.Left.IliocostalisCervicis.ICptR4C5;
    AnyRefNode &Org = ....Segments.C5Seg.Left.ICptR4C5Node;
    AnyRefNode &Via1 = ....Segments.C7Seg.Left.ICptR4C5Via1Node;
    AnyRefNode &Via2 = ....Segments.Left.R1Seg.ICptR4C5Via2Node;
    AnyRefNode &Via3 = ....Segments.Left.R3Seg.ICptR4C5Via3Node;
    AnyRefNode &Ins = ....Segments.Left.R4Seg.ICptR4C5Node;
    viewMuscle = {#include "../DrawSettings/MusDrawSettings.any"};
    viewForce.Visible ??= Off;
  };
  AnyMuscleViaPoint ICptR5C6 = {
    AnyMuscleModel &MusMdl = ....MuscleModels.Left.IliocostalisCervicis.ICptR5C6;
    AnyRefNode &Org = ....Segments.C6Seg.Left.ICptR5C6Node;
    AnyRefNode &Via1 = ....Segments.C7Seg.Left.ICptR5C6Via1Node;
    AnyRefNode &Via2 = ....Segments.Left.R1Seg.ICptR5C6Via2Node;
    AnyRefNode &Via3 = ....Segments.Left.R3Seg.ICptR5C6Via3Node;
    AnyRefNode &Via4 = ....Segments.Left.R4Seg.ICptR5C6Via4Node;
    AnyRefNode &Ins = ....Segments.Left.R5Seg.ICptR5C6Node;
    viewMuscle = {#include "../DrawSettings/MusDrawSettings.any"};
    viewForce.Visible ??= Off;
  };
  AnyMuscleViaPoint ICptR6C4 = {
    AnyMuscleModel &MusMdl = ....MuscleModels.Left.IliocostalisCervicis.ICptR6C4;
    AnyRefNode &Org = ....Segments.C4Seg.Left.ICptR6C4Node;
    AnyRefNode &Via1 = ....Segments.C7Seg.Left.ICptR6C4Via1Node;
    AnyRefNode &Via2 = ....Segments.Left.R1Seg.ICptR6C4Via2Node;
    AnyRefNode &Via3 = ....Segments.Left.R3Seg.ICptR6C4Via3Node;
    AnyRefNode &Via4 = ....Segments.Left.R4Seg.ICptR6C4Via4Node;
    AnyRefNode &Via5 = ....Segments.Left.R5Seg.ICptR6C4Via5Node;
    AnyRefNode &Ins = ....Segments.Left.R6Seg.ICptR6C4Node;
    viewMuscle = {#include "../DrawSettings/MusDrawSettings.any"};
    viewForce.Visible ??= Off;
  };
}; // End of Iliocostalis cervicis

AnyFolder IliocostalisLumborum = {
  // Iliocostalis lumborum
    AnyMuscleViaPoint ILplL1CI = {
    AnyMuscleModel &MusMdl = ....MuscleModels.Left.IliocostalisLumborum.ILplL1CI;
    AnyRefNode &Org = ....Segments.L1Seg.ILplL1CINodeL;
    #if BM_TRUNK_CAVITY_MODEL == _CAVITY_MODEL_VOLUME_
    AnyRefNode &Via1 = ....Abdominal.Layer_L3.BaseSegPosterior.ILplL1CIViaNodeL;
    #else
    AnyRefNode &Via1 = ....Segments.L2Seg.ILplL1CIViaNodeL;
    #endif
    AnyRefNode &Ins = ....Segments.PelvisSeg.ILplL1CINodeL;
    viewMuscle = {#include "../DrawSettings/MusDrawSettings.any"};
    viewForce.Visible ??= Off;
  };
  AnyMuscleViaPoint ILplL2CI = {
    AnyMuscleModel &MusMdl = ....MuscleModels.Left.IliocostalisLumborum.ILplL2CI;
    AnyRefNode &Org = ....Segments.L2Seg.ILplL2CINodeL;
    AnyRefNode &Ins = ....Segments.PelvisSeg.ILplL2CINodeL;
    viewMuscle = {#include "../DrawSettings/MusDrawSettings.any"};
    viewForce.Visible ??= Off;
  };
  AnyMuscleViaPoint ILplL3CI = {
    AnyMuscleModel &MusMdl = ....MuscleModels.Left.IliocostalisLumborum.ILplL3CI;
    AnyRefNode &Org = ....Segments.L3Seg.ILplL3CINodeL;
    AnyRefNode &Ins = ....Segments.PelvisSeg.ILplL3CINodeL;
    viewMuscle = {#include "../DrawSettings/MusDrawSettings.any"};
    viewForce.Visible ??= Off;
  };
  AnyMuscleViaPoint ILplL4CI = {
    AnyMuscleModel &MusMdl = ....MuscleModels.Left.IliocostalisLumborum.ILplL4CI;
    AnyRefNode &Org = ....Segments.L4Seg.ILplL4CINodeL;
    AnyRefNode &Ins = ....Segments.PelvisSeg.ILplL4CINodeL;
    viewMuscle = {#include "../DrawSettings/MusDrawSettings.any"};
    viewForce.Visible ??= Off;
  };
    AnyMuscleViaPoint ILptC5SIPS = {
    AnyMuscleModel &MusMdl = ....MuscleModels.Left.IliocostalisLumborum.ILptC5SIPS;
    AnyRefNode &Org = ....Segments.Left.R5Seg.ILptC5SIPSNodeL;
    AnyRefNode &Via1 = ....Segments.Left.R6Seg.ILptC5SIPSVia1NodeL;
    AnyRefNode &Via2 = ....Segments.Left.R7Seg.ILptC5SIPSVia2NodeL;
    AnyRefNode &Via3 = ....Segments.Left.R8Seg.ILptC5SIPSVia3NodeL;
    AnyRefNode &Via4 = ....Segments.Left.R9Seg.ILptC5SIPSVia4NodeL;
    AnyRefNode &Via5 = ....Segments.Left.R10Seg.ILptC5SIPSVia5NodeL;
    #if BM_TRUNK_CAVITY_MODEL == _CAVITY_MODEL_VOLUME_
    AnyRefNode &Via6 = ....Abdominal.Layer_L1.BaseSegPosterior.ILptC5SIPSVia6NodeL;
    AnyRefNode &Via7 = ....Abdominal.Layer_L2.BaseSegPosterior.ILptC5SIPSVia7NodeL;
    AnyRefNode &Via8 = ....Abdominal.Layer_L3.BaseSegPosterior.ILptC5SIPSVia8NodeL;
    #else
    AnyRefNode &Via6 = ....Segments.Left.R12Seg.ILptC5SIPSVia6NodeL;
    AnyRefNode &Via7 = ....Segments.L1Seg.ILptC5SIPSVia7NodeL;
    AnyRefNode &Via8 = ....Segments.L2Seg.ILptC5SIPSVia8NodeL;
    #endif
    AnyRefNode &Ins = ....Segments.PelvisSeg.ILptC5SIPSNodeL;
    viewMuscle = {#include "../DrawSettings/MusDrawSettings.any"};
    viewForce.Visible ??= Off;
  };
  AnyMuscleViaPoint ILptC6SIPS = {
    AnyMuscleModel &MusMdl = ....MuscleModels.Left.IliocostalisLumborum.ILptC6SIPS;
    AnyRefNode &Org = ....Segments.Left.R6Seg.ILptC6SIPSNodeL;
    AnyRefNode &Via1 = ....Segments.Left.R7Seg.ILptC6SIPSVia1NodeL;
    AnyRefNode &Via2 = ....Segments.Left.R8Seg.ILptC6SIPSVia2NodeL;
    AnyRefNode &Via3 = ....Segments.Left.R9Seg.ILptC6SIPSVia3NodeL;
    AnyRefNode &Via4 = ....Segments.Left.R10Seg.ILptC6SIPSVia4NodeL;
    #if BM_TRUNK_CAVITY_MODEL == _CAVITY_MODEL_VOLUME_
    AnyRefNode &Via5 = ....Abdominal.Layer_L1.BaseSegPosterior.ILptC6SIPSVia5NodeL;
    AnyRefNode &Via6 = ....Abdominal.Layer_L2.BaseSegPosterior.ILptC6SIPSVia6NodeL;
    AnyRefNode &Via7 = ....Abdominal.Layer_L3.BaseSegPosterior.ILptC6SIPSVia7NodeL;
    #else
    AnyRefNode &Via5 = ....Segments.Left.R12Seg.ILptC6SIPSVia5NodeL;
    AnyRefNode &Via6 = ....Segments.L1Seg.ILptC6SIPSVia6NodeL;
    AnyRefNode &Via7 = ....Segments.L2Seg.ILptC6SIPSVia7NodeL;
    #endif
    AnyRefNode &Ins = ....Segments.PelvisSeg.ILptC6SIPSNodeL;
    viewMuscle = {#include "../DrawSettings/MusDrawSettings.any"};
    viewForce.Visible ??= Off;
  };
  AnyMuscleViaPoint ILptC7CI = {
    AnyMuscleModel &MusMdl = ....MuscleModels.Left.IliocostalisLumborum.ILptC7CI;
    AnyRefNode &Org = ....Segments.Left.R7Seg.ILptC7CINodeL;
    AnyRefNode &Via1 = ....Segments.Left.R8Seg.ILptC7CIVia1NodeL;
    AnyRefNode &Via2 = ....Segments.Left.R9Seg.ILptC7CIVia2NodeL;
    AnyRefNode &Via3 = ....Segments.Left.R10Seg.ILptC7CIVia3NodeL;
    #if BM_TRUNK_CAVITY_MODEL == _CAVITY_MODEL_VOLUME_
    AnyRefNode &Via4 = ....Abdominal.Layer_L1.BaseSegPosterior.ILptC7CIVia4NodeL;
    AnyRefNode &Via5 = ....Abdominal.Layer_L2.BaseSegPosterior.ILptC7CIVia5NodeL;
    AnyRefNode &Via6 = ....Abdominal.Layer_L3.BaseSegPosterior.ILptC7CIVia6NodeL;
    #else
    AnyRefNode &Via4 = ....Segments.Left.R12Seg.ILptC7CIVia4NodeL;
    AnyRefNode &Via5 = ....Segments.L1Seg.ILptC7CIVia5NodeL;
    AnyRefNode &Via6 = ....Segments.L2Seg.ILptC7CIVia6NodeL;
    #endif
    AnyRefNode &Ins = ....Segments.PelvisSeg.ILptC7CINodeL;
    viewMuscle = {#include "../DrawSettings/MusDrawSettings.any"};
    viewForce.Visible ??= Off;
  };
  AnyMuscleViaPoint ILptC8CI = {
    AnyMuscleModel &MusMdl = ....MuscleModels.Left.IliocostalisLumborum.ILptC8CI;
    AnyRefNode &Org = ....Segments.Left.R8Seg.ILptC8CINodeL;
    AnyRefNode &Via1 = ....Segments.Left.R9Seg.ILptC8CIVia1NodeL;
    AnyRefNode &Via2 = ....Segments.Left.R10Seg.ILptC8CIVia2NodeL;
    #if BM_TRUNK_CAVITY_MODEL == _CAVITY_MODEL_VOLUME_
    AnyRefNode &Via3 = ....Abdominal.Layer_L1.BaseSegPosterior.ILptC8CIVia3NodeL;
    AnyRefNode &Via4 = ....Abdominal.Layer_L2.BaseSegPosterior.ILptC8CIVia4NodeL;
    AnyRefNode &Via5 = ....Abdominal.Layer_L3.BaseSegPosterior.ILptC8CIVia5NodeL;
    #else
    AnyRefNode &Via3 = ....Segments.Left.R12Seg.ILptC8CIVia3NodeL;
    AnyRefNode &Via4 = ....Segments.L1Seg.ILptC8CIVia4NodeL;
    AnyRefNode &Via5 = ....Segments.L2Seg.ILptC8CIVia5NodeL;
    #endif
    AnyRefNode &Ins = ....Segments.PelvisSeg.ILptC8CINodeL;
    viewMuscle = {#include "../DrawSettings/MusDrawSettings.any"};
    viewForce.Visible ??= Off;
  };
  AnyMuscleViaPoint ILptC9CI = {
    AnyMuscleModel &MusMdl = ....MuscleModels.Left.IliocostalisLumborum.ILptC9CI;
    AnyRefNode &Org = ....Segments.Left.R9Seg.ILptC9CINodeL;
    AnyRefNode &Via1 = ....Segments.Left.R10Seg.ILptC9CIVia1NodeL;
    #if BM_TRUNK_CAVITY_MODEL == _CAVITY_MODEL_VOLUME_
    AnyRefNode &Via2 = ....Abdominal.Layer_L1.BaseSegPosterior.ILptC9CIVia2NodeL;
    AnyRefNode &Via3 = ....Abdominal.Layer_L2.BaseSegPosterior.ILptC9CIVia3NodeL;
    AnyRefNode &Via4 = ....Abdominal.Layer_L3.BaseSegPosterior.ILptC9CIVia4NodeL;
    #else
    AnyRefNode &Via2 = ....Segments.Left.R12Seg.ILptC9CIVia2NodeL;
    AnyRefNode &Via3 = ....Segments.L1Seg.ILptC9CIVia3NodeL;
    AnyRefNode &Via4 = ....Segments.L2Seg.ILptC9CIVia4NodeL;
    #endif
    AnyRefNode &Ins = ....Segments.PelvisSeg.ILptC9CINodeL;
    viewMuscle = {#include "../DrawSettings/MusDrawSettings.any"};
    viewForce.Visible ??= Off;
  };
  AnyMuscleViaPoint ILptC10CI = {
    AnyMuscleModel &MusMdl = ....MuscleModels.Left.IliocostalisLumborum.ILptC10CI;
    AnyRefNode &Org = ....Segments.Left.R10Seg.ILptC10CINodeL;
    #if BM_TRUNK_CAVITY_MODEL == _CAVITY_MODEL_VOLUME_
    AnyRefNode &Via1 = ....Abdominal.Layer_L1.BaseSegPosterior.ILptC10CIVia1NodeL;
    AnyRefNode &Via2 = ....Abdominal.Layer_L2.BaseSegPosterior.ILptC10CIVia2NodeL;
    AnyRefNode &Via3 = ....Abdominal.Layer_L3.BaseSegPosterior.ILptC10CIVia3NodeL;
    #else
    AnyRefNode &Via1 = ....Segments.Left.R12Seg.ILptC10CIVia1NodeL;
    AnyRefNode &Via2 = ....Segments.L1Seg.ILptC10CIVia2NodeL;
    AnyRefNode &Via3 = ....Segments.L2Seg.ILptC10CIVia3NodeL;
    #endif
    AnyRefNode &Ins = ....Segments.PelvisSeg.ILptC10CINodeL;
    viewMuscle = {#include "../DrawSettings/MusDrawSettings.any"};
    viewForce.Visible ??= Off;
  };
  AnyMuscleViaPoint ILptC11CI = {
    AnyMuscleModel &MusMdl = ....MuscleModels.Left.IliocostalisLumborum.ILptC11CI;
    AnyRefNode &Org = ....Segments.Left.R11Seg.ILptC11CINodeL;
    #if BM_TRUNK_CAVITY_MODEL == _CAVITY_MODEL_VOLUME_
//    AnyRefNode &Via1 = ....Abdominal.Layer_L2.BaseSegPosterior.ILptC11CIVia1NodeL;
//    AnyRefNode &Via2 = ....Abdominal.Layer_L3.BaseSegPosterior.ILptC11CIVia2NodeL;
    #else
    AnyRefNode &Via1 = ....Segments.L1Seg.ILptC11CIVia1NodeL;
    AnyRefNode &Via2 = ....Segments.L2Seg.ILptC11CIVia2NodeL;
    #endif
    AnyRefNode &Ins = ....Segments.PelvisSeg.ILptC11CINodeL;
    viewMuscle = {#include "../DrawSettings/MusDrawSettings.any"};
    viewForce.Visible ??= Off;
  };
  AnyMuscleViaPoint ILptC12CI = {
    AnyMuscleModel &MusMdl = ....MuscleModels.Left.IliocostalisLumborum.ILptC12CI;
    AnyRefNode &Org = ....Segments.Left.R12Seg.ILptC12CINodeL;
    #if BM_TRUNK_CAVITY_MODEL == _CAVITY_MODEL_VOLUME_
//    AnyRefNode &Via1 = ....Abdominal.Layer_L2.BaseSegPosterior.ILptC12CIVia1NodeL;
//    AnyRefNode &Via2 = ....Abdominal.Layer_L3.BaseSegPosterior.ILptC12CIVia2NodeL;
    #else
    AnyRefNode &Via1 = ....Segments.L1Seg.ILptC12CIVia1NodeL;
    AnyRefNode &Via2 = ....Segments.L2Seg.ILptC12CIVia2NodeL;
    #endif
    AnyRefNode &Ins = ....Segments.PelvisSeg.ILptC12CINodeL;
    viewMuscle = {#include "../DrawSettings/MusDrawSettings.any"};
    viewForce.Visible ??= Off;
  };
}; // End of Iliocostalis lumborum

// Iliocostalis Thoracis
AnyFolder IliocostalisThoracis = {
  AnyMuscleViaPoint ITC7R7 = {
    AnyMuscleModel &MusMdl = ....MuscleModels.Left.IliocostalisThoracis.ITC7R7;
    AnyRefNode &Org = ....Segments.C7Seg.Left.ITC7R7NodeOrg;
    AnyRefNode &Via1 = ....Segments.Left.R1Seg.ITC7R7Via1NodeL;
    AnyRefNode &Via2 = ....Segments.Left.R2Seg.ITC7R7Via2NodeL;
    AnyRefNode &Via3 = ....Segments.Left.R3Seg.ITC7R7Via3NodeL;
    AnyRefNode &Via4 = ....Segments.Left.R4Seg.ITC7R7Via4NodeL;
    AnyRefNode &Via5 = ....Segments.Left.R5Seg.ITC7R7Via5NodeL;
    AnyRefNode &Via6 = ....Segments.Left.R6Seg.ITC7R7Via6NodeL;
    AnyRefNode &Ins = ....Segments.Left.R7Seg.ITC7R7NodeLIns;
    viewMuscle = {#include "../DrawSettings/MusDrawSettings.any"};
    viewForce.Visible ??= Off;
  };
  #if BM_TRUNK_THORACIC_MODEL == _THORACIC_MODEL_FLEXIBLE_
  AnyMuscleViaPoint ITR1R7 = {
    AnyMuscleModel &MusMdl = ....MuscleModels.Left.IliocostalisThoracis.ITR1R7;
    AnyRefNode &Org = ....Segments.Left.R1Seg.ITR1R7NodeLOrg;
    AnyRefNode &Via2 = ....Segments.Left.R2Seg.ITR1R7Via1NodeL;
    AnyRefNode &Via3 = ....Segments.Left.R3Seg.ITR1R7Via2NodeL;
    AnyRefNode &Via4 = ....Segments.Left.R4Seg.ITR1R7Via3NodeL;
    AnyRefNode &Via5 = ....Segments.Left.R5Seg.ITR1R7Via4NodeL;
    AnyRefNode &Via6 = ....Segments.Left.R6Seg.ITR1R7Via5NodeL;
    AnyRefNode &Ins = ....Segments.Left.R7Seg.ITR1R7NodeLIns;
    viewMuscle = {#include "../DrawSettings/MusDrawSettings.any"};
    viewForce.Visible ??= Off;
  };
  AnyMuscleViaPoint ITR2R8 = {
    AnyMuscleModel &MusMdl = ....MuscleModels.Left.IliocostalisThoracis.ITR2R8;
    AnyRefNode &Org = ....Segments.Left.R2Seg.ITR2R8NodeLOrg;
    AnyRefNode &Via2 = ....Segments.Left.R3Seg.ITR2R8Via1NodeL;
    AnyRefNode &Via3 = ....Segments.Left.R4Seg.ITR2R8Via2NodeL;
    AnyRefNode &Via4 = ....Segments.Left.R5Seg.ITR2R8Via3NodeL;
    AnyRefNode &Via5 = ....Segments.Left.R6Seg.ITR2R8Via4NodeL;
    AnyRefNode &Via6 = ....Segments.Left.R7Seg.ITR2R8Via5NodeL;
    AnyRefNode &Ins = ....Segments.Left.R8Seg.ITR2R8NodeLIns;
    viewMuscle = {#include "../DrawSettings/MusDrawSettings.any"};
    viewForce.Visible ??= Off;
  };
  AnyMuscleViaPoint ITR3R9 = {
    AnyMuscleModel &MusMdl = ....MuscleModels.Left.IliocostalisThoracis.ITR3R9;
    AnyRefNode &Org = ....Segments.Left.R3Seg.ITR3R9NodeLOrg;
    AnyRefNode &Via2 = ....Segments.Left.R4Seg.ITR3R9Via1NodeL;
    AnyRefNode &Via3 = ....Segments.Left.R5Seg.ITR3R9Via2NodeL;
    AnyRefNode &Via4 = ....Segments.Left.R6Seg.ITR3R9Via3NodeL;
    AnyRefNode &Via5 = ....Segments.Left.R7Seg.ITR3R9Via4NodeL;
    AnyRefNode &Via6 = ....Segments.Left.R8Seg.ITR3R9Via5NodeL;
    AnyRefNode &Ins = ....Segments.Left.R9Seg.ITR3R9NodeLIns;
    viewMuscle = {#include "../DrawSettings/MusDrawSettings.any"};
    viewForce.Visible ??= Off;
  };
  AnyMuscleViaPoint ITR4R10 = {
    AnyMuscleModel &MusMdl = ....MuscleModels.Left.IliocostalisThoracis.ITR4R10;
    AnyRefNode &Org = ....Segments.Left.R4Seg.ITR4R10NodeLOrg;
    AnyRefNode &Via2 = ....Segments.Left.R5Seg.ITR4R10Via1NodeL;
    AnyRefNode &Via3 = ....Segments.Left.R6Seg.ITR4R10Via2NodeL;
    AnyRefNode &Via4 = ....Segments.Left.R7Seg.ITR4R10Via3NodeL;
    AnyRefNode &Via5 = ....Segments.Left.R8Seg.ITR4R10Via4NodeL;
    AnyRefNode &Via6 = ....Segments.Left.R9Seg.ITR4R10Via5NodeL;
    AnyRefNode &Ins = ....Segments.Left.R10Seg.ITR4R10NodeLIns;
    viewMuscle = {#include "../DrawSettings/MusDrawSettings.any"};
    viewForce.Visible ??= Off;
  };
  AnyMuscleViaPoint ITR5R11 = {
    AnyMuscleModel &MusMdl = ....MuscleModels.Left.IliocostalisThoracis.ITR5T11;
    AnyRefNode &Org = ....Segments.Left.R5Seg.ITR5R11NodeLOrg;
    AnyRefNode &Via2 = ....Segments.Left.R6Seg.ITR5R11Via1NodeL;
    AnyRefNode &Via3 = ....Segments.Left.R7Seg.ITR5R11Via2NodeL;
    AnyRefNode &Via4 = ....Segments.Left.R8Seg.ITR5R11Via3NodeL;
    AnyRefNode &Via5 = ....Segments.Left.R9Seg.ITR5R11Via4NodeL;
    AnyRefNode &Via6 = ....Segments.Left.R10Seg.ITR5R11Via5NodeL;
    AnyRefNode &Ins = ....Segments.Left.R11Seg.ITR5R11NodeLIns;
    viewMuscle = {#include "../DrawSettings/MusDrawSettings.any"};
    viewForce.Visible ??= Off;
  };
  AnyMuscleViaPoint ITR6R12 = {
    AnyMuscleModel &MusMdl = ....MuscleModels.Left.IliocostalisThoracis.ITR6T12;
    AnyRefNode &Org = ....Segments.Left.R6Seg.ITR6R12NodeL;
    AnyRefNode &Via2 = ....Segments.Left.R7Seg.ITR6R12Via1NodeL;
    AnyRefNode &Via3 = ....Segments.Left.R8Seg.ITR6R12Via2NodeL;
    AnyRefNode &Via4 = ....Segments.Left.R9Seg.ITR6R12Via3NodeL;
    AnyRefNode &Via5 = ....Segments.Left.R10Seg.ITR6R12Via4NodeL;
    AnyRefNode &Via6 = ....Segments.Left.R11Seg.ITR6R12Via5NodeL;
    AnyRefNode &Ins = ....Segments.Left.R12Seg.ITR6R12NodeLIns;
    viewMuscle = {#include "../DrawSettings/MusDrawSettings.any"};
    viewForce.Visible ??= Off;
  };
  #endif
}; // End of Iliocostalis thoracis

#if BM_TRUNK_THORACIC_MODEL == _THORACIC_MODEL_FLEXIBLE_

#if IC_TYPE == OLD

MuscleGroup InterCostalisExternus(searchString="*.*") = {
  SplineMuscle_CreateMuscle IC_Ext_R1R2(
  CREATE_ELEMENTS=IC_MULTIPLIER*(IC_SIZE),
  OriginSegment=....Segments.Left.R1Seg,
  ORIGIN_POINTS=....Data.unscaled.ModelParameters.R1.Left.IC_R1_Ext_Inf.Points,
  InsertionSegment=....Segments.Left.R2Seg,
  INSERTION_POINTS=....Data.unscaled.ModelParameters.R2.Left.IC_R2_Ext_Sup.Points,
  MUSCLE_MODEL_PARAMETERS=....MuscleModels.Left.InterCostalisExternal.IC_Ext_R1R2,
  )= {};

  SplineMuscle_CreateMuscle IC_Ext_R2R3 (
  CREATE_ELEMENTS=IC_MULTIPLIER*(IC_SIZE+1),
  OriginSegment=....Segments.Left.R2Seg,
  ORIGIN_POINTS=....Data.unscaled.ModelParameters.R2.Left.IC_R2_Ext_Inf.Points,
  InsertionSegment=....Segments.Left.R5Seg,
  INSERTION_POINTS=....Data.unscaled.ModelParameters.R3.Left.IC_R3_Ext_Sup.Points,
  MUSCLE_MODEL_PARAMETERS=....MuscleModels.Left.InterCostalisExternal.IC_Ext_R2R3,
  )= {};

  SplineMuscle_CreateMuscle IC_Ext_R3R4 (
  CREATE_ELEMENTS=IC_MULTIPLIER*(IC_SIZE+1),
  OriginSegment=....Segments.Left.R3Seg,
  ORIGIN_POINTS=....Data.unscaled.ModelParameters.R3.Left.IC_R3_Ext_Inf.Points,
  InsertionSegment=....Segments.Left.R4Seg,
  INSERTION_POINTS=....Data.unscaled.ModelParameters.R4.Left.IC_R4_Ext_Sup.Points,
  MUSCLE_MODEL_PARAMETERS=....MuscleModels.Left.InterCostalisExternal.IC_Ext_R3R4,
  )= {};

  SplineMuscle_CreateMuscle IC_Ext_R4R5 (
  CREATE_ELEMENTS=IC_MULTIPLIER*(IC_SIZE+1),
  OriginSegment=....Segments.Left.R4Seg,
  ORIGIN_POINTS=....Data.unscaled.ModelParameters.R4.Left.IC_R4_Ext_Inf.Points,
  InsertionSegment=....Segments.Left.R5Seg,
  INSERTION_POINTS=....Data.unscaled.ModelParameters.R5.Left.IC_R5_Ext_Sup.Points,
  MUSCLE_MODEL_PARAMETERS=....MuscleModels.Left.InterCostalisExternal.IC_Ext_R4R5,
  )= {};

  SplineMuscle_CreateMuscle IC_Ext_R5R6 (
  CREATE_ELEMENTS=IC_MULTIPLIER*(IC_SIZE+1),
  OriginSegment=....Segments.Left.R5Seg,
  ORIGIN_POINTS=....Data.unscaled.ModelParameters.R5.Left.IC_R5_Ext_Inf.Points,
  InsertionSegment=....Segments.Left.R6Seg,
  INSERTION_POINTS=....Data.unscaled.ModelParameters.R6.Left.IC_R6_Ext_Sup.Points,
  MUSCLE_MODEL_PARAMETERS=....MuscleModels.Left.InterCostalisExternal.IC_Ext_R5R6,
  )= {};

  SplineMuscle_CreateMuscle IC_Ext_R6R7 (
  CREATE_ELEMENTS=IC_MULTIPLIER*(IC_SIZE+1),
  OriginSegment=....Segments.Left.R6Seg,
  ORIGIN_POINTS=....Data.unscaled.ModelParameters.R6.Left.IC_R6_Ext_Inf.Points,
  InsertionSegment=....Segments.Left.R7Seg,
  INSERTION_POINTS=....Data.unscaled.ModelParameters.R7.Left.IC_R7_Ext_Sup.Points,
  MUSCLE_MODEL_PARAMETERS=....MuscleModels.Left.InterCostalisExternal.IC_Ext_R6R7,
  )= {};

  SplineMuscle_CreateMuscle IC_Ext_R7R8 (
  CREATE_ELEMENTS=IC_MULTIPLIER*(IC_SIZE+1),
  OriginSegment=....Segments.Left.R7Seg,
  ORIGIN_POINTS=....Data.unscaled.ModelParameters.R7.Left.IC_R7_Ext_Inf.Points,
  InsertionSegment=....Segments.Left.R8Seg,
  INSERTION_POINTS=....Data.unscaled.ModelParameters.R8.Left.IC_R8_Ext_Sup.Points,
  MUSCLE_MODEL_PARAMETERS=....MuscleModels.Left.InterCostalisExternal.IC_Ext_R7R8,
  )= {};

  SplineMuscle_CreateMuscle IC_Ext_R8R9 (
  CREATE_ELEMENTS=IC_MULTIPLIER*(IC_SIZE+1),
  OriginSegment=....Segments.Left.R8Seg,
  ORIGIN_POINTS=....Data.unscaled.ModelParameters.R8.Left.IC_R8_Ext_Inf.Points,
  InsertionSegment=....Segments.Left.R9Seg,
  INSERTION_POINTS=....Data.unscaled.ModelParameters.R9.Left.IC_R9_Ext_Sup.Points,
  MUSCLE_MODEL_PARAMETERS=....MuscleModels.Left.InterCostalisExternal.IC_Ext_R8R9,
  )= {};

  SplineMuscle_CreateMuscle IC_Ext_R9R10 (
  CREATE_ELEMENTS=IC_MULTIPLIER*(IC_SIZE+1),
  OriginSegment=....Segments.Left.R9Seg,
  ORIGIN_POINTS=....Data.unscaled.ModelParameters.R9.Left.IC_R9_Ext_Inf.Points,
  InsertionSegment=....Segments.Left.R10Seg,
  INSERTION_POINTS=....Data.unscaled.ModelParameters.R10.Left.IC_R10_Ext_Sup.Points,
  MUSCLE_MODEL_PARAMETERS=....MuscleModels.Left.InterCostalisExternal.IC_Ext_R9R10,
  )= {};

  SplineMuscle_CreateMuscle IC_Ext_R10R11 (
  CREATE_ELEMENTS=IC_MULTIPLIER*(IC_SIZE),
  OriginSegment=....Segments.Left.R10Seg,
  ORIGIN_POINTS=....Data.unscaled.ModelParameters.R10.Left.IC_R10_Ext_Inf.Points,
  InsertionSegment=....Segments.Left.R11Seg,
  INSERTION_POINTS=....Data.unscaled.ModelParameters.R11.Left.IC_R11_Ext_Sup.Points,
  MUSCLE_MODEL_PARAMETERS=....MuscleModels.Left.InterCostalisExternal.IC_Ext_R10R11,
  )= {};

  SplineMuscle_CreateMuscle IC_Ext_R11R12 (
  CREATE_ELEMENTS=IC_MULTIPLIER*(IC_SIZE-2),
  OriginSegment=....Segments.Left.R11Seg,
  ORIGIN_POINTS=....Data.unscaled.ModelParameters.R11.Left.IC_R11_Ext_Inf.Points,
  InsertionSegment=....Segments.Left.R12Seg,
  INSERTION_POINTS=....Data.unscaled.ModelParameters.R12.Left.IC_R12_Ext_Sup.Points,
  MUSCLE_MODEL_PARAMETERS=....MuscleModels.Left.InterCostalisExternal.IC_Ext_R11R12,
  )= {};
};

MuscleGroup InterCostalisInternus(searchString="*.*") = {

  SplineMuscle_CreateMuscle IC_Int_R1R2 (
  CREATE_ELEMENTS=IC_MULTIPLIER*(IC_SIZE),
  OriginSegment=....Segments.Left.R1Seg,
  ORIGIN_POINTS=....Data.unscaled.ModelParameters.R1.Left.IC_R1_Int_Inf.Points,
  InsertionSegment=....Segments.Left.R2Seg,
  INSERTION_POINTS=....Data.unscaled.ModelParameters.R2.Left.IC_R2_Int_Sup.Points,
  MUSCLE_MODEL_PARAMETERS=....MuscleModels.Left.InterCostalisInternal.IC_Int_R1R2,
  )= {
    NumberOfElements = IC_MULTIPLIER*(IC_SIZE)+1;
    //The Last element is defined manually
    AnyMuscleViaPoint elem_sternum = {
      AnyRefNode &Org = .....Segments.SternumSeg.Left_IC_Int_R1R2_elem_sternum;
      AnyRefNode &Ins = .InsertionSegment.IC_Int_R1R2_elem_sternum;
      AnyMuscleModel MusMdl = {
        F0=..MuscleModel.F0/..NumberOfElements;
        Lf0=..MuscleModel.F0;
        Vol0=..MuscleModel.Vol0/..NumberOfElements;
      };
      viewMuscle = {#include "../DrawSettings/MusDrawSettings.any"};
      // AnyDrawPLine drwLine = {AnyFloat RGB_Red= {1,0,0};AnyFloat RGB_Green= {0,1,0};RGB=iffun(gtfun(.LmtDot,0),RGB_Red,RGB_Green);Thickness=0.005;};

    };
  };

  SplineMuscle_CreateMuscle IC_Int_R2R3 (
  CREATE_ELEMENTS=IC_MULTIPLIER*(IC_SIZE+1),
  OriginSegment=....Segments.Left.R2Seg,
  ORIGIN_POINTS=....Data.unscaled.ModelParameters.R2.Left.IC_R2_Int_Inf.Points,
  InsertionSegment=....Segments.Left.R3Seg,
  INSERTION_POINTS=....Data.unscaled.ModelParameters.R3.Left.IC_R3_Int_Sup.Points,
  MUSCLE_MODEL_PARAMETERS=....MuscleModels.Left.InterCostalisInternal.IC_Int_R2R3,
  )= {
    NumberOfElements =  IC_MULTIPLIER*(IC_SIZE+1)+1;
    AnyMuscleViaPoint elem_sternum= {
      AnyRefNode &Org = .....Segments.SternalBodySeg.Left_IC_Int_R2R3_elem_sternum;
      AnyRefNode &Ins = .InsertionSegment.IC_Int_R2R3_elem_sternum;
      AnyMuscleModel MusMdl = {
        F0=..MuscleModel.F0/..NumberOfElements;
        Lf0=..MuscleModel.F0;
        Vol0=..MuscleModel.Vol0/..NumberOfElements;
      };
      viewMuscle = {#include "../DrawSettings/MusDrawSettings.any"};
      // AnyDrawPLine drwLine = {AnyFloat RGB_Red= {1,0,0};AnyFloat RGB_Green= {0,1,0};RGB=iffun(gtfun(.LmtDot,0),RGB_Red,RGB_Green);Thickness=0.005;};

    };
  };

  SplineMuscle_CreateMuscle IC_Int_R3R4 (
  CREATE_ELEMENTS=IC_MULTIPLIER*(IC_SIZE+1),
  OriginSegment=....Segments.Left.R3Seg,
  ORIGIN_POINTS=....Data.unscaled.ModelParameters.R3.Left.IC_R3_Int_Inf.Points,
  InsertionSegment=....Segments.Left.R4Seg,
  INSERTION_POINTS=....Data.unscaled.ModelParameters.R4.Left.IC_R4_Int_Sup.Points,
  MUSCLE_MODEL_PARAMETERS=....MuscleModels.Left.InterCostalisInternal.IC_Int_R3R4,
  )= {
    NumberOfElements =  IC_MULTIPLIER*(IC_SIZE+1)+1;
    AnyMuscleViaPoint elem_sternum= {
      AnyRefNode &Org = .....Segments.SternalBodySeg.Left_IC_Int_R3R4_elem_sternum;
      AnyRefNode &Ins = .InsertionSegment.IC_Int_R3R4_elem_sternum;
      AnyMuscleModel MusMdl = {
        F0=..MuscleModel.F0/..NumberOfElements;
        Lf0=..MuscleModel.F0;
        Vol0=..MuscleModel.Vol0/..NumberOfElements;
      };
      viewMuscle = {#include "../DrawSettings/MusDrawSettings.any"};
      // AnyDrawPLine drwLine = {AnyFloat RGB_Red= {1,0,0};AnyFloat RGB_Green= {0,1,0};RGB=iffun(gtfun(.LmtDot,0),RGB_Red,RGB_Green);Thickness=0.005;};

    };
  };

  SplineMuscle_CreateMuscle IC_Int_R4R5 (
  CREATE_ELEMENTS=IC_MULTIPLIER*(IC_SIZE+1),
  OriginSegment=....Segments.Left.R4Seg,
  ORIGIN_POINTS=....Data.unscaled.ModelParameters.R4.Left.IC_R4_Int_Inf.Points,
  InsertionSegment=....Segments.Left.R5Seg,
  INSERTION_POINTS=....Data.unscaled.ModelParameters.R5.Left.IC_R5_Int_Sup.Points,
  MUSCLE_MODEL_PARAMETERS=....MuscleModels.Left.InterCostalisInternal.IC_Int_R4R5,
  )= {
    NumberOfElements =  IC_MULTIPLIER*(IC_SIZE+1)+1;
    AnyMuscleViaPoint elem_sternum= {
      AnyRefNode &Org = .....Segments.SternalBodySeg.Left_IC_Int_R4R5_elem_sternum;
      AnyRefNode &Ins = .InsertionSegment.IC_Int_R4R5_elem_sternum;
      AnyMuscleModel MusMdl = {
        F0=..MuscleModel.F0/..NumberOfElements;
        Lf0=..MuscleModel.F0;
        Vol0=..MuscleModel.Vol0/..NumberOfElements;
      };
      viewMuscle = {#include "../DrawSettings/MusDrawSettings.any"};
      // AnyDrawPLine drwLine = {AnyFloat RGB_Red= {1,0,0};AnyFloat RGB_Green= {0,1,0};RGB=iffun(gtfun(.LmtDot,0),RGB_Red,RGB_Green);Thickness=0.005;};

    };
  };

  SplineMuscle_CreateMuscle IC_Int_R5R6 (
  CREATE_ELEMENTS=IC_MULTIPLIER*(IC_SIZE+1),
  OriginSegment=....Segments.Left.R5Seg,
  ORIGIN_POINTS=....Data.unscaled.ModelParameters.R5.Left.IC_R5_Int_Inf.Points,
  InsertionSegment=....Segments.Left.R6Seg,
  INSERTION_POINTS=....Data.unscaled.ModelParameters.R6.Left.IC_R6_Int_Sup.Points,
  MUSCLE_MODEL_PARAMETERS=....MuscleModels.Left.InterCostalisInternal.IC_Int_R5R6,
  )= {
    NumberOfElements =  IC_MULTIPLIER*(IC_SIZE+1)+1;
    AnyMuscleViaPoint elem_sternum= {
      AnyRefNode &Org = .....Segments.SternalBodySeg.Left_IC_Int_R5R6_elem_sternum;
      AnyRefNode &Ins = .InsertionSegment.IC_Int_R5R6_elem_sternum;
      AnyMuscleModel MusMdl = {
        F0=..MuscleModel.F0/..NumberOfElements;
        Lf0=..MuscleModel.F0;
        Vol0=..MuscleModel.Vol0/..NumberOfElements;
      };
      viewMuscle = {#include "../DrawSettings/MusDrawSettings.any"};
      // AnyDrawPLine drwLine = {AnyFloat RGB_Red= {1,0,0};AnyFloat RGB_Green= {0,1,0};RGB=iffun(gtfun(.LmtDot,0),RGB_Red,RGB_Green);Thickness=0.005;};

    };
  };

  SplineMuscle_CreateMuscle IC_Int_R6R7 (
  CREATE_ELEMENTS=IC_MULTIPLIER*(IC_SIZE+1),
  OriginSegment=....Segments.Left.R6Seg,
  ORIGIN_POINTS=....Data.unscaled.ModelParameters.R6.Left.IC_R6_Int_Inf.Points,
  InsertionSegment=....Segments.Left.R7Seg,
  INSERTION_POINTS=....Data.unscaled.ModelParameters.R7.Left.IC_R7_Int_Sup.Points,
  MUSCLE_MODEL_PARAMETERS=....MuscleModels.Left.InterCostalisInternal.IC_Int_R6R7,
  )= {
    NumberOfElements =  IC_MULTIPLIER*(IC_SIZE+1)+1;
    AnyMuscleViaPoint elem_sternum= {
      AnyRefNode &Org = .....Segments.SternalBodySeg.Left_IC_Int_R6R7_elem_sternum;
      AnyRefNode &Ins = .InsertionSegment.IC_Int_R6R7_elem_sternum;
      AnyMuscleModel MusMdl = {
        F0=..MuscleModel.F0/..NumberOfElements;
        Lf0=..MuscleModel.F0;
        Vol0=..MuscleModel.Vol0/..NumberOfElements;
      };
      viewMuscle = {#include "../DrawSettings/MusDrawSettings.any"};
      // AnyDrawPLine drwLine = {AnyFloat RGB_Red= {1,0,0};AnyFloat RGB_Green= {0,1,0};RGB=iffun(gtfun(.LmtDot,0),RGB_Red,RGB_Green);Thickness=0.005;};

    };
  };

  SplineMuscle_CreateMuscle IC_Int_R7R8 (
  CREATE_ELEMENTS=IC_MULTIPLIER*(IC_SIZE+1),
  OriginSegment=....Segments.Left.R7Seg,
  ORIGIN_POINTS=....Data.unscaled.ModelParameters.R7.Left.IC_R7_Int_Inf.Points,
  InsertionSegment=....Segments.Left.R8Seg,
  INSERTION_POINTS=....Data.unscaled.ModelParameters.R8.Left.IC_R8_Int_Sup.Points,
  MUSCLE_MODEL_PARAMETERS=....MuscleModels.Left.InterCostalisInternal.IC_Int_R7R8,
  )= {
    NumberOfElements =  IC_MULTIPLIER*(IC_SIZE+1)+1;
    AnyMuscleViaPoint elem_sternum= {
      #if BM_TRUNK_THORACIC_STERNUM_TOPOLOGY == 4
      AnyRefNode &Org = .....Segments.Left.CostalCartilageSeg.Left_IC_Int_R7R8_elem_sternum;
      #else
      AnyRefNode &Org = .....Segments.SternalBodySeg.Left_IC_Int_R7R8_elem_sternum;
      #endif
      AnyRefNode &Ins = .InsertionSegment.IC_Int_R7R8_elem_sternum;
      AnyMuscleModel MusMdl = {
        F0=..MuscleModel.F0/..NumberOfElements;
        Lf0=..MuscleModel.F0;
        Vol0=..MuscleModel.Vol0/..NumberOfElements;
      };
      viewMuscle = {#include "../DrawSettings/MusDrawSettings.any"};
      // AnyDrawPLine drwLine = {AnyFloat RGB_Red= {1,0,0};AnyFloat RGB_Green= {0,1,0};RGB=iffun(gtfun(.LmtDot,0),RGB_Red,RGB_Green);Thickness=0.005;};

    };
  };

  SplineMuscle_CreateMuscle IC_Int_R8R9 (
  CREATE_ELEMENTS=IC_MULTIPLIER*(IC_SIZE+1),
  OriginSegment=....Segments.Left.R8Seg,
  ORIGIN_POINTS=....Data.unscaled.ModelParameters.R8.Left.IC_R8_Int_Inf.Points,
  InsertionSegment=....Segments.Left.R9Seg,
  INSERTION_POINTS=....Data.unscaled.ModelParameters.R9.Left.IC_R9_Int_Sup.Points,
  MUSCLE_MODEL_PARAMETERS=....MuscleModels.Left.InterCostalisInternal.IC_Int_R8R9,
  )= {
    NumberOfElements =  IC_MULTIPLIER*(IC_SIZE+1)+1;
    AnyMuscleViaPoint elem_sternum= {
      #if BM_TRUNK_THORACIC_STERNUM_TOPOLOGY == 4
      AnyRefNode &Org = .....Segments.Left.CostalCartilageSeg.Left_IC_Int_R8R9_elem_sternum;
      #else
      AnyRefNode &Org = .....Segments.SternalBodySeg.Left_IC_Int_R8R9_elem_sternum;
      #endif
      AnyRefNode &Ins = .InsertionSegment.IC_Int_R8R9_elem_sternum;
      AnyMuscleModel MusMdl = {
        F0=..MuscleModel.F0/..NumberOfElements;
        Lf0=..MuscleModel.F0;
        Vol0=..MuscleModel.Vol0/..NumberOfElements;
      };
      viewMuscle = {#include "../DrawSettings/MusDrawSettings.any"};
    };
  };

  SplineMuscle_CreateMuscle IC_Int_R9R10 (
  CREATE_ELEMENTS=IC_MULTIPLIER*(IC_SIZE+1),
  OriginSegment=....Segments.Left.R9Seg,
  ORIGIN_POINTS=....Data.unscaled.ModelParameters.R9.Left.IC_R9_Int_Inf.Points,
  InsertionSegment=....Segments.Left.R10Seg,
  INSERTION_POINTS=....Data.unscaled.ModelParameters.R10.Left.IC_R10_Int_Sup.Points,
  MUSCLE_MODEL_PARAMETERS=....MuscleModels.Left.InterCostalisInternal.IC_Int_R9R10,
  )= {
    NumberOfElements =  IC_MULTIPLIER*(IC_SIZE+1)+1;
    AnyMuscleViaPoint elem_sternum= {
      #if BM_TRUNK_THORACIC_STERNUM_TOPOLOGY == 4
      AnyRefNode &Org = .....Segments.Left.CostalCartilageSeg.Left_IC_Int_R9R10_elem_sternum;
      #else
      AnyRefNode &Org = .....Segments.SternalBodySeg.Left_IC_Int_R9R10_elem_sternum;
      #endif
      AnyRefNode &Ins = .InsertionSegment.IC_Int_R9R10_elem_sternum;
      AnyMuscleModel MusMdl = {
        F0=..MuscleModel.F0/..NumberOfElements;
        Lf0=..MuscleModel.F0;
        Vol0=..MuscleModel.Vol0/..NumberOfElements;
      };
      viewMuscle = {#include "../DrawSettings/MusDrawSettings.any"};
    };
  };

  SplineMuscle_CreateMuscle IC_Int_R10R11 (
  CREATE_ELEMENTS=IC_MULTIPLIER*(IC_SIZE),
  OriginSegment=....Segments.Left.R10Seg,
  ORIGIN_POINTS=....Data.unscaled.ModelParameters.R10.Left.IC_R10_Int_Inf.Points,
  InsertionSegment=....Segments.Left.R11Seg,
  INSERTION_POINTS=....Data.unscaled.ModelParameters.R11.Left.IC_R11_Int_Sup.Points,
  MUSCLE_MODEL_PARAMETERS=....MuscleModels.Left.InterCostalisInternal.IC_Int_R10R11,
  )= {};

  SplineMuscle_CreateMuscle IC_Int_R11R12 (
  CREATE_ELEMENTS=IC_MULTIPLIER*(IC_SIZE-1),
  OriginSegment=....Segments.Left.R11Seg,
  ORIGIN_POINTS=....Data.unscaled.ModelParameters.R11.Left.IC_R11_Int_Inf.Points,
  InsertionSegment=....Segments.Left.R12Seg,
  INSERTION_POINTS=....Data.unscaled.ModelParameters.R12.Left.IC_R12_Int_Sup.Points,
  MUSCLE_MODEL_PARAMETERS=....MuscleModels.Left.InterCostalisInternal.IC_Int_R11R12,
  )= {};
};

MuscleGroup InterCostalisintimus(searchString="*.*") = {

  SplineMuscle_CreateMuscle IC_Inn_R1R2(
  CREATE_ELEMENTS=IC_MULTIPLIER*(IC_SIZE),
  OriginSegment=....Segments.Left.R1Seg,
  ORIGIN_POINTS=....Data.unscaled.ModelParameters.R1.Left.IC_R1_Inn_Inf.Points,
  InsertionSegment=....Segments.Left.R2Seg,
  INSERTION_POINTS=....Data.unscaled.ModelParameters.R2.Left.IC_R2_Inn_Sup.Points,
  MUSCLE_MODEL_PARAMETERS=....MuscleModels.Left.InterCostalisExternal.IC_Ext_R1R2,
  )= {};

  SplineMuscle_CreateMuscle IC_Inn_R2R3 (
  CREATE_ELEMENTS=IC_MULTIPLIER*(IC_SIZE+1),
  OriginSegment=....Segments.Left.R2Seg,
  ORIGIN_POINTS=....Data.unscaled.ModelParameters.R2.Left.IC_R2_Inn_Inf.Points,
  InsertionSegment=....Segments.Left.R5Seg,
  INSERTION_POINTS=....Data.unscaled.ModelParameters.R3.Left.IC_R3_Inn_Sup.Points,
  MUSCLE_MODEL_PARAMETERS=....MuscleModels.Left.InterCostalisExternal.IC_Ext_R2R3,
  )= {};

  SplineMuscle_CreateMuscle IC_Inn_R3R4 (
  CREATE_ELEMENTS=IC_MULTIPLIER*(IC_SIZE+1),
  OriginSegment=....Segments.Left.R3Seg,
  ORIGIN_POINTS=....Data.unscaled.ModelParameters.R3.Left.IC_R3_Inn_Inf.Points,
  InsertionSegment=....Segments.Left.R4Seg,
  INSERTION_POINTS=....Data.unscaled.ModelParameters.R4.Left.IC_R4_Inn_Sup.Points,
  MUSCLE_MODEL_PARAMETERS=....MuscleModels.Left.InterCostalisExternal.IC_Ext_R3R4,
  )= {};

  SplineMuscle_CreateMuscle IC_Inn_R4R5 (
  CREATE_ELEMENTS=IC_MULTIPLIER*(IC_SIZE+1),
  OriginSegment=....Segments.Left.R4Seg,
  ORIGIN_POINTS=....Data.unscaled.ModelParameters.R4.Left.IC_R4_Inn_Inf.Points,
  InsertionSegment=....Segments.Left.R5Seg,
  INSERTION_POINTS=....Data.unscaled.ModelParameters.R5.Left.IC_R5_Inn_Sup.Points,
  MUSCLE_MODEL_PARAMETERS=....MuscleModels.Left.InterCostalisExternal.IC_Ext_R4R5,
  )= {};

  SplineMuscle_CreateMuscle IC_Inn_R5R6 (
  CREATE_ELEMENTS=IC_MULTIPLIER*(IC_SIZE+1),
  OriginSegment=....Segments.Left.R5Seg,
  ORIGIN_POINTS=....Data.unscaled.ModelParameters.R5.Left.IC_R5_Inn_Inf.Points,
  InsertionSegment=....Segments.Left.R6Seg,
  INSERTION_POINTS=....Data.unscaled.ModelParameters.R6.Left.IC_R6_Inn_Sup.Points,
  MUSCLE_MODEL_PARAMETERS=....MuscleModels.Left.InterCostalisExternal.IC_Ext_R5R6,
  )= {};

  SplineMuscle_CreateMuscle IC_Inn_R6R7 (
  CREATE_ELEMENTS=IC_MULTIPLIER*(IC_SIZE+1),
  OriginSegment=....Segments.Left.R6Seg,
  ORIGIN_POINTS=....Data.unscaled.ModelParameters.R6.Left.IC_R6_Inn_Inf.Points,
  InsertionSegment=....Segments.Left.R7Seg,
  INSERTION_POINTS=....Data.unscaled.ModelParameters.R7.Left.IC_R7_Inn_Sup.Points,
  MUSCLE_MODEL_PARAMETERS=....MuscleModels.Left.InterCostalisExternal.IC_Ext_R6R7,
  )= {};

  SplineMuscle_CreateMuscle IC_Inn_R7R8 (
  CREATE_ELEMENTS=IC_MULTIPLIER*(IC_SIZE+1),
  OriginSegment=....Segments.Left.R7Seg,
  ORIGIN_POINTS=....Data.unscaled.ModelParameters.R7.Left.IC_R7_Inn_Inf.Points,
  InsertionSegment=....Segments.Left.R8Seg,
  INSERTION_POINTS=....Data.unscaled.ModelParameters.R8.Left.IC_R8_Inn_Sup.Points,
  MUSCLE_MODEL_PARAMETERS=....MuscleModels.Left.InterCostalisExternal.IC_Ext_R7R8,
  )= {};

  SplineMuscle_CreateMuscle IC_Inn_R8R9 (
  CREATE_ELEMENTS=IC_MULTIPLIER*(IC_SIZE+1),
  OriginSegment=....Segments.Left.R8Seg,
  ORIGIN_POINTS=....Data.unscaled.ModelParameters.R8.Left.IC_R8_Inn_Inf.Points,
  InsertionSegment=....Segments.Left.R9Seg,
  INSERTION_POINTS=....Data.unscaled.ModelParameters.R9.Left.IC_R9_Inn_Sup.Points,
  MUSCLE_MODEL_PARAMETERS=....MuscleModels.Left.InterCostalisExternal.IC_Ext_R8R9,
  )= {};

  SplineMuscle_CreateMuscle IC_Inn_R9R10 (
  CREATE_ELEMENTS=IC_MULTIPLIER*(IC_SIZE+1),
  OriginSegment=....Segments.Left.R9Seg,
  ORIGIN_POINTS=....Data.unscaled.ModelParameters.R9.Left.IC_R9_Inn_Inf.Points,
  InsertionSegment=....Segments.Left.R10Seg,
  INSERTION_POINTS=....Data.unscaled.ModelParameters.R10.Left.IC_R10_Inn_Sup.Points,
  MUSCLE_MODEL_PARAMETERS=....MuscleModels.Left.InterCostalisExternal.IC_Ext_R9R10,
  )= {};

  SplineMuscle_CreateMuscle IC_Inn_R10R11 (
  CREATE_ELEMENTS=IC_MULTIPLIER*(IC_SIZE),
  OriginSegment=....Segments.Left.R10Seg,
  ORIGIN_POINTS=....Data.unscaled.ModelParameters.R10.Left.IC_R10_Inn_Inf.Points,
  InsertionSegment=....Segments.Left.R11Seg,
  INSERTION_POINTS=....Data.unscaled.ModelParameters.R11.Left.IC_R11_Inn_Sup.Points,
  MUSCLE_MODEL_PARAMETERS=....MuscleModels.Left.InterCostalisExternal.IC_Ext_R10R11,
  )= {};

  SplineMuscle_CreateMuscle IC_Inn_R11R12 (
  CREATE_ELEMENTS=IC_MULTIPLIER*(IC_SIZE-2),
  OriginSegment=....Segments.Left.R11Seg,
  ORIGIN_POINTS=....Data.unscaled.ModelParameters.R11.Left.IC_R11_Inn_Inf.Points,
  InsertionSegment=....Segments.Left.R12Seg,
  INSERTION_POINTS=....Data.unscaled.ModelParameters.R12.Left.IC_R12_Inn_Sup.Points,
  MUSCLE_MODEL_PARAMETERS=....MuscleModels.Left.InterCostalisExternal.IC_Ext_R11R12,
  )= {};

};
#endif

#if IC_TYPE != OLD

MuscleGroup InterCostalisExternus(searchString="*.*") = {

  SplineMuscle_CreateMuscleMultiOffset IC_Ext_R1R2 (
  CREATE_ELEMENTS=IC_MULTIPLIER*(IC_SIZE+1),
  OriginSegment=....Segments.Left.R1Seg,
  ORIGIN_POINTS=....Segments.Left.R1Seg.IC_points.Ext_InfPoints,
  InsertionSegment=....Segments.Left.R2Seg,
  INSERTION_POINTS=....Segments.Left.R2Seg.IC_points.Ext_SupPoints,
  MUSCLE_MODEL_PARAMETERS=....MuscleModels.Left.InterCostalisExternal.IC_Ext_R1R2,
  )= {DesiredAngle=45;};

  SplineMuscle_CreateMuscleMultiOffset IC_Ext_R2R3 (
  CREATE_ELEMENTS=IC_MULTIPLIER*(IC_SIZE+1),
  OriginSegment=....Segments.Left.R2Seg,
  ORIGIN_POINTS=....Segments.Left.R2Seg.IC_points.Ext_InfPoints,
  InsertionSegment=....Segments.Left.R3Seg,
  INSERTION_POINTS=....Segments.Left.R3Seg.IC_points.Ext_SupPoints,
  MUSCLE_MODEL_PARAMETERS=....MuscleModels.Left.InterCostalisExternal.IC_Ext_R2R3,
  )= {DesiredAngle=45;};


  SplineMuscle_CreateMuscleMultiOffset IC_Ext_R3R4 (
  CREATE_ELEMENTS=IC_MULTIPLIER*(IC_SIZE+1),
  OriginSegment=....Segments.Left.R3Seg,
  ORIGIN_POINTS=....Segments.Left.R3Seg.IC_points.Ext_InfPoints,
  InsertionSegment=....Segments.Left.R4Seg,
  INSERTION_POINTS=....Segments.Left.R4Seg.IC_points.Ext_SupPoints,
  MUSCLE_MODEL_PARAMETERS=....MuscleModels.Left.InterCostalisExternal.IC_Ext_R3R4,
  )= {DesiredAngle=45;};

  SplineMuscle_CreateMuscleMultiOffset IC_Ext_R4R5 (
  CREATE_ELEMENTS=IC_MULTIPLIER*(IC_SIZE+1),
  OriginSegment=....Segments.Left.R4Seg,
  ORIGIN_POINTS=....Segments.Left.R4Seg.IC_points.Ext_InfPoints,
  InsertionSegment=....Segments.Left.R5Seg,
  INSERTION_POINTS=....Segments.Left.R5Seg.IC_points.Ext_SupPoints,
  MUSCLE_MODEL_PARAMETERS=....MuscleModels.Left.InterCostalisExternal.IC_Ext_R4R5,
  )= {DesiredAngle=45;};


  SplineMuscle_CreateMuscleMultiOffset IC_Ext_R5R6 (
  CREATE_ELEMENTS=IC_MULTIPLIER*(IC_SIZE+1),
  OriginSegment=....Segments.Left.R5Seg,
  ORIGIN_POINTS=....Segments.Left.R5Seg.IC_points.Ext_InfPoints,
  InsertionSegment=....Segments.Left.R6Seg,
  INSERTION_POINTS=....Segments.Left.R6Seg.IC_points.Ext_SupPoints,
  MUSCLE_MODEL_PARAMETERS=....MuscleModels.Left.InterCostalisExternal.IC_Ext_R5R6,
  )= {DesiredAngle=45;};


  SplineMuscle_CreateMuscleMultiOffset IC_Ext_R6R7 (
  CREATE_ELEMENTS=IC_MULTIPLIER*(IC_SIZE+1),
  OriginSegment=....Segments.Left.R6Seg,
  ORIGIN_POINTS=....Segments.Left.R6Seg.IC_points.Ext_InfPoints,
  InsertionSegment=....Segments.Left.R7Seg,
  INSERTION_POINTS=....Segments.Left.R7Seg.IC_points.Ext_SupPoints,
  MUSCLE_MODEL_PARAMETERS=....MuscleModels.Left.InterCostalisExternal.IC_Ext_R6R7,
  )= {DesiredAngle=45;};

  SplineMuscle_CreateMuscleMultiOffset IC_Ext_R7R8 (
  CREATE_ELEMENTS=IC_MULTIPLIER*(IC_SIZE+1),
  OriginSegment=....Segments.Left.R7Seg,
  ORIGIN_POINTS=....Segments.Left.R7Seg.IC_points.Ext_InfPoints,
  InsertionSegment=....Segments.Left.R8Seg,
  INSERTION_POINTS=....Segments.Left.R8Seg.IC_points.Ext_SupPoints,
  MUSCLE_MODEL_PARAMETERS=....MuscleModels.Left.InterCostalisExternal.IC_Ext_R7R8,
  )= {DesiredAngle=45;};


  SplineMuscle_CreateMuscleMultiOffset IC_Ext_R8R9 (
  CREATE_ELEMENTS=IC_MULTIPLIER*(IC_SIZE+1),
  OriginSegment=....Segments.Left.R8Seg,
  ORIGIN_POINTS=....Segments.Left.R8Seg.IC_points.Ext_InfPoints,
  InsertionSegment=....Segments.Left.R9Seg,
  INSERTION_POINTS=....Segments.Left.R9Seg.IC_points.Ext_SupPoints,
  MUSCLE_MODEL_PARAMETERS=....MuscleModels.Left.InterCostalisExternal.IC_Ext_R8R9,
  )= {DesiredAngle=45;};
  SplineMuscle_CreateMuscleMultiOffset IC_Ext_R9R10 (
  CREATE_ELEMENTS=IC_MULTIPLIER*(IC_SIZE+1),
  OriginSegment=....Segments.Left.R9Seg,
  ORIGIN_POINTS=....Segments.Left.R9Seg.IC_points.Ext_InfPoints,
  InsertionSegment=....Segments.Left.R10Seg,
  INSERTION_POINTS=....Segments.Left.R10Seg.IC_points.Ext_SupPoints,
  MUSCLE_MODEL_PARAMETERS=....MuscleModels.Left.InterCostalisExternal.IC_Ext_R9R10,
  )= {DesiredAngle=45;};


  SplineMuscle_CreateMuscleMultiOffset IC_Ext_R10R11 (
  CREATE_ELEMENTS=IC_MULTIPLIER*(IC_SIZE),
  OriginSegment=....Segments.Left.R10Seg,
  ORIGIN_POINTS=....Segments.Left.R10Seg.IC_points.Ext_InfPoints,
  InsertionSegment=....Segments.Left.R11Seg,
  INSERTION_POINTS=....Segments.Left.R11Seg.IC_points.Ext_SupPoints,
  MUSCLE_MODEL_PARAMETERS=....MuscleModels.Left.InterCostalisExternal.IC_Ext_R10R11,
  )= {DesiredAngle=45;};


  SplineMuscle_CreateMuscleMultiOffset IC_Ext_R11R12 (
  CREATE_ELEMENTS=IC_MULTIPLIER*(IC_SIZE-4),
  OriginSegment=....Segments.Left.R11Seg,
  ORIGIN_POINTS=....Segments.Left.R11Seg.IC_points.Ext_InfPoints,
  InsertionSegment=....Segments.Left.R12Seg,
  INSERTION_POINTS=....Segments.Left.R12Seg.IC_points.Ext_SupPoints,
  MUSCLE_MODEL_PARAMETERS=....MuscleModels.Left.InterCostalisExternal.IC_Ext_R11R12,
  )= {DesiredAngle=45;};
};

MuscleGroup InterCostalisInternus(searchString="*.*") = {


  SplineMuscle_CreateMuscleMultiOffset IC_Int_R1R2 (
  CREATE_ELEMENTS=IC_MULTIPLIER*(IC_SIZE+1-3),
  OriginSegment=....Segments.Left.R1Seg,
  ORIGIN_POINTS=....Segments.Left.R1Seg.IC_points.Int_InfPoints,
  InsertionSegment=....Segments.Left.R2Seg,
  INSERTION_POINTS=....Segments.Left.R2Seg.IC_points.Int_SupPoints,
  MUSCLE_MODEL_PARAMETERS=....MuscleModels.Left.InterCostalisExternal.IC_Ext_R1R2,
  )= {
    DesiredAngle =-45;
    NumberOfElements = IC_MULTIPLIER*(IC_SIZE+1-3);
    //The Last element is defined manually
    AnyMuscleViaPoint elem_sternum = {
      AnyRefNode &Org = .....Segments.SternumSeg.Left_IC_Int_R1R2_elem_sternum;
      AnyRefNode &Ins = .InsertionSegment.IC_Int_R1R2_elem_sternum;
      AnyMuscleModel MusMdl = {
        F0 = ..MuscleModel.F0/..NumberOfElements;
        Lf0 = ..MuscleModel.F0;
        Vol0 = ..MuscleModel.Vol0/..NumberOfElements;
      };
      viewMuscle = {#include "../DrawSettings/MusDrawSettings.any"};
      // AnyDrawPLine drwLine = {AnyFloat RGB_Red= {1,0,0};AnyFloat RGB_Green= {0,1,0};RGB=iffun(gtfun(.LmtDot,0),RGB_Red,RGB_Green);Thickness=0.005;};
    };


  };

  SplineMuscle_CreateMuscleMultiOffset IC_Int_R2R3 (
  CREATE_ELEMENTS=IC_MULTIPLIER*(IC_SIZE+1),
  OriginSegment=....Segments.Left.R2Seg,
  ORIGIN_POINTS=....Segments.Left.R2Seg.IC_points.Int_InfPoints,
  InsertionSegment=....Segments.Left.R3Seg,
  INSERTION_POINTS=....Segments.Left.R3Seg.IC_points.Int_SupPoints,
  MUSCLE_MODEL_PARAMETERS=....MuscleModels.Left.InterCostalisExternal.IC_Ext_R2R3,
  )= {
    DesiredAngle=-45;
    NumberOfElements =  IC_MULTIPLIER*(IC_SIZE+1);
    AnyMuscleViaPoint elem_sternum= {
      AnyRefNode &Org = .....Segments.SternalBodySeg.Left_IC_Int_R2R3_elem_sternum;
      AnyRefNode &Ins = .InsertionSegment.IC_Int_R2R3_elem_sternum;
      AnyMuscleModel MusMdl = {
        F0 = ..MuscleModel.F0/..NumberOfElements;
        Lf0 = ..MuscleModel.F0;
        Vol0 = ..MuscleModel.Vol0/..NumberOfElements;
      };
      viewMuscle = {#include "../DrawSettings/MusDrawSettings.any"};
      // AnyDrawPLine drwLine = {AnyFloat RGB_Red= {1,0,0};AnyFloat RGB_Green= {0,1,0};RGB=iffun(gtfun(.LmtDot,0),RGB_Red,RGB_Green);Thickness=0.005;};
    };
  };


  SplineMuscle_CreateMuscleMultiOffset IC_Int_R3R4 (
  CREATE_ELEMENTS=IC_MULTIPLIER*(IC_SIZE+1),
  OriginSegment=....Segments.Left.R3Seg,
  ORIGIN_POINTS=....Segments.Left.R3Seg.IC_points.Int_InfPoints,
  InsertionSegment=....Segments.Left.R4Seg,
  INSERTION_POINTS=....Segments.Left.R4Seg.IC_points.Int_SupPoints,
  MUSCLE_MODEL_PARAMETERS=....MuscleModels.Left.InterCostalisExternal.IC_Ext_R3R4,
  )= {
    DesiredAngle=-45;
    NumberOfElements =  IC_MULTIPLIER*(IC_SIZE+1);
    AnyMuscleViaPoint elem_sternum= {
      AnyRefNode &Org = .....Segments.SternalBodySeg.Left_IC_Int_R3R4_elem_sternum;
      AnyRefNode &Ins = .InsertionSegment.IC_Int_R3R4_elem_sternum;
      AnyMuscleModel MusMdl = {
        F0 = ..MuscleModel.F0/..NumberOfElements;
        Lf0 = ..MuscleModel.F0;
        Vol0 = ..MuscleModel.Vol0/..NumberOfElements;
      };
      viewMuscle = {#include "../DrawSettings/MusDrawSettings.any"};
      // AnyDrawPLine drwLine = {AnyFloat RGB_Red= {1,0,0};AnyFloat RGB_Green= {0,1,0};RGB=iffun(gtfun(.LmtDot,0),RGB_Red,RGB_Green);Thickness=0.005;};
    };

  };

  SplineMuscle_CreateMuscleMultiOffset IC_Int_R4R5 (
  CREATE_ELEMENTS=IC_MULTIPLIER*(IC_SIZE+1),
  OriginSegment=....Segments.Left.R4Seg,
  ORIGIN_POINTS=....Segments.Left.R4Seg.IC_points.Int_InfPoints,
  InsertionSegment=....Segments.Left.R5Seg,
  INSERTION_POINTS=....Segments.Left.R5Seg.IC_points.Int_SupPoints,
  MUSCLE_MODEL_PARAMETERS=....MuscleModels.Left.InterCostalisExternal.IC_Ext_R4R5,
  )= {
    DesiredAngle=-45;
    NumberOfElements =  IC_MULTIPLIER*(IC_SIZE+1);
    AnyMuscleViaPoint elem_sternum= {
      AnyRefNode &Org = .....Segments.SternalBodySeg.Left_IC_Int_R4R5_elem_sternum;
      AnyRefNode &Ins = .InsertionSegment.IC_Int_R4R5_elem_sternum;
      AnyMuscleModel MusMdl = {
        F0 = ..MuscleModel.F0/..NumberOfElements;
        Lf0 = ..MuscleModel.F0;
        Vol0 = ..MuscleModel.Vol0/..NumberOfElements;
      };
      viewMuscle = {#include "../DrawSettings/MusDrawSettings.any"};
      // AnyDrawPLine drwLine = {AnyFloat RGB_Red= {1,0,0};AnyFloat RGB_Green= {0,1,0};RGB=iffun(gtfun(.LmtDot,0),RGB_Red,RGB_Green);Thickness=0.005;};
    };
  };


  SplineMuscle_CreateMuscleMultiOffset IC_Int_R5R6 (
  CREATE_ELEMENTS=IC_MULTIPLIER*(IC_SIZE+1),
  OriginSegment=....Segments.Left.R5Seg,
  ORIGIN_POINTS=....Segments.Left.R5Seg.IC_points.Int_InfPoints,
  InsertionSegment=....Segments.Left.R6Seg,
  INSERTION_POINTS=....Segments.Left.R6Seg.IC_points.Int_SupPoints,
  MUSCLE_MODEL_PARAMETERS=....MuscleModels.Left.InterCostalisExternal.IC_Ext_R5R6,
  )= {
    DesiredAngle=-45;
    NumberOfElements =  IC_MULTIPLIER*(IC_SIZE+1);
    AnyMuscleViaPoint elem_sternum= {
      AnyRefNode &Org = .....Segments.SternalBodySeg.Left_IC_Int_R5R6_elem_sternum;
      AnyRefNode &Ins = .InsertionSegment.IC_Int_R5R6_elem_sternum;
      AnyMuscleModel MusMdl = {
        F0 = ..MuscleModel.F0/..NumberOfElements;
        Lf0 = ..MuscleModel.F0;
        Vol0 = ..MuscleModel.Vol0/..NumberOfElements;
      };
      viewMuscle = {#include "../DrawSettings/MusDrawSettings.any"};
      // AnyDrawPLine drwLine = {AnyFloat RGB_Red= {1,0,0};AnyFloat RGB_Green= {0,1,0};RGB=iffun(gtfun(.LmtDot,0),RGB_Red,RGB_Green);Thickness=0.005;};
    };
  };


  SplineMuscle_CreateMuscleMultiOffset IC_Int_R6R7 (
  CREATE_ELEMENTS=IC_MULTIPLIER*(IC_SIZE+1),
  OriginSegment=....Segments.Left.R6Seg,
  ORIGIN_POINTS=....Segments.Left.R6Seg.IC_points.Int_InfPoints,
  InsertionSegment=....Segments.Left.R7Seg,
  INSERTION_POINTS=....Segments.Left.R7Seg.IC_points.Int_SupPoints,
  MUSCLE_MODEL_PARAMETERS=....MuscleModels.Left.InterCostalisExternal.IC_Ext_R6R7,
  )= {
    DesiredAngle=-45;
    NumberOfElements =  IC_MULTIPLIER*(IC_SIZE+1);
    AnyMuscleViaPoint elem_sternum= {
      AnyRefNode &Org = .....Segments.SternalBodySeg.Left_IC_Int_R6R7_elem_sternum;
      AnyRefNode &Ins = .InsertionSegment.IC_Int_R6R7_elem_sternum;
      AnyMuscleModel MusMdl = {
        F0 = ..MuscleModel.F0/..NumberOfElements;
        Lf0 = ..MuscleModel.F0;
        Vol0 = ..MuscleModel.Vol0/..NumberOfElements;
      };
      viewMuscle = {#include "../DrawSettings/MusDrawSettings.any"};
      // AnyDrawPLine drwLine = {AnyFloat RGB_Red= {1,0,0};AnyFloat RGB_Green= {0,1,0};RGB=iffun(gtfun(.LmtDot,0),RGB_Red,RGB_Green);Thickness=0.005;};

    };
  };

  SplineMuscle_CreateMuscleMultiOffset IC_Int_R7R8 (
  CREATE_ELEMENTS=IC_MULTIPLIER*(IC_SIZE+1),
  OriginSegment=....Segments.Left.R7Seg,
  ORIGIN_POINTS=....Segments.Left.R7Seg.IC_points.Int_InfPoints,
  InsertionSegment=....Segments.Left.R8Seg,
  INSERTION_POINTS=....Segments.Left.R8Seg.IC_points.Int_SupPoints,
  MUSCLE_MODEL_PARAMETERS=....MuscleModels.Left.InterCostalisExternal.IC_Ext_R7R8,
  )= {
    DesiredAngle=-45;
    NumberOfElements =  IC_MULTIPLIER*(IC_SIZE+1);
    AnyMuscleViaPoint elem_sternum= {
      #if BM_TRUNK_THORACIC_STERNUM_TOPOLOGY == 4
      AnyRefNode &Org = .....Segments.Left.CostalCartilageSeg.Left_IC_Int_R7R8_elem_sternum;
      #else
      AnyRefNode &Org = .....Segments.SternalBodySeg.Left_IC_Int_R7R8_elem_sternum;
      #endif
      AnyRefNode &Ins = .InsertionSegment.IC_Int_R7R8_elem_sternum;
      AnyMuscleModel MusMdl = {
        F0 = ..MuscleModel.F0/..NumberOfElements;
        Lf0 = ..MuscleModel.F0;
        Vol0 = ..MuscleModel.Vol0/..NumberOfElements;
      };
      viewMuscle = {#include "../DrawSettings/MusDrawSettings.any"};
      // AnyDrawPLine drwLine = {AnyFloat RGB_Red= {1,0,0};AnyFloat RGB_Green= {0,1,0};RGB=iffun(gtfun(.LmtDot,0),RGB_Red,RGB_Green);Thickness=0.005;};

    };
  };


  SplineMuscle_CreateMuscleMultiOffset IC_Int_R8R9 (
  CREATE_ELEMENTS=IC_MULTIPLIER*(IC_SIZE+1),
  OriginSegment=....Segments.Left.R8Seg,
  ORIGIN_POINTS=....Segments.Left.R8Seg.IC_points.Int_InfPoints,
  InsertionSegment=....Segments.Left.R9Seg,
  INSERTION_POINTS=....Segments.Left.R9Seg.IC_points.Int_SupPoints,
  MUSCLE_MODEL_PARAMETERS=....MuscleModels.Left.InterCostalisExternal.IC_Ext_R8R9,
  )= {
    DesiredAngle=-45;
    NumberOfElements =  IC_MULTIPLIER*(IC_SIZE+1);
    AnyMuscleViaPoint elem_sternum= {
      #if BM_TRUNK_THORACIC_STERNUM_TOPOLOGY == 4
      AnyRefNode &Org = .....Segments.Left.CostalCartilageSeg.Left_IC_Int_R8R9_elem_sternum;
      #else
      AnyRefNode &Org = .....Segments.SternalBodySeg.Left_IC_Int_R8R9_elem_sternum;
      #endif
      AnyRefNode &Ins = .InsertionSegment.IC_Int_R8R9_elem_sternum;
      AnyMuscleModel MusMdl = {
        F0 = ..MuscleModel.F0/..NumberOfElements;
        Lf0 = ..MuscleModel.F0;
        Vol0 = ..MuscleModel.Vol0/..NumberOfElements;
      };
      viewMuscle = {#include "../DrawSettings/MusDrawSettings.any"};
    };
  };

  SplineMuscle_CreateMuscleMultiOffset IC_Int_R9R10 (
  CREATE_ELEMENTS=IC_MULTIPLIER*(IC_SIZE+1),
  OriginSegment=....Segments.Left.R9Seg,
  ORIGIN_POINTS=....Segments.Left.R9Seg.IC_points.Int_InfPoints,
  InsertionSegment=....Segments.Left.R10Seg,
  INSERTION_POINTS=....Segments.Left.R10Seg.IC_points.Int_SupPoints,
  MUSCLE_MODEL_PARAMETERS=....MuscleModels.Left.InterCostalisExternal.IC_Ext_R9R10,
  )= {
    DesiredAngle=-45;
    NumberOfElements =  IC_MULTIPLIER*(IC_SIZE+1);
    AnyMuscleViaPoint elem_sternum= {
      #if BM_TRUNK_THORACIC_STERNUM_TOPOLOGY == 4
      AnyRefNode &Org = .....Segments.Left.CostalCartilageSeg.Left_IC_Int_R9R10_elem_sternum;
      #else
      AnyRefNode &Org = .....Segments.SternalBodySeg.Left_IC_Int_R9R10_elem_sternum;
      #endif
      AnyRefNode &Ins = .InsertionSegment.IC_Int_R9R10_elem_sternum;
      AnyMuscleModel MusMdl = {
        F0 = ..MuscleModel.F0/..NumberOfElements;
        Lf0 = ..MuscleModel.F0;
        Vol0 = ..MuscleModel.Vol0/..NumberOfElements;
      };
      viewMuscle = {#include "../DrawSettings/MusDrawSettings.any"};
    };
  };


  SplineMuscle_CreateMuscleMultiOffset IC_Int_R10R11 (
  CREATE_ELEMENTS=IC_MULTIPLIER*(IC_SIZE),
  OriginSegment=....Segments.Left.R10Seg,
  ORIGIN_POINTS=....Segments.Left.R10Seg.IC_points.Int_InfPoints,
  InsertionSegment=....Segments.Left.R11Seg,
  INSERTION_POINTS=....Segments.Left.R11Seg.IC_points.Int_SupPoints,
  MUSCLE_MODEL_PARAMETERS=....MuscleModels.Left.InterCostalisExternal.IC_Ext_R10R11,
  )= {DesiredAngle=-45;};


  SplineMuscle_CreateMuscleMultiOffset IC_Int_R11R12 (
  CREATE_ELEMENTS=IC_MULTIPLIER*(IC_SIZE-4),
  OriginSegment=....Segments.Left.R11Seg,
  ORIGIN_POINTS=....Segments.Left.R11Seg.IC_points.Int_InfPoints,
  InsertionSegment=....Segments.Left.R12Seg,
  INSERTION_POINTS=....Segments.Left.R12Seg.IC_points.Int_SupPoints,
  MUSCLE_MODEL_PARAMETERS=....MuscleModels.Left.InterCostalisExternal.IC_Ext_R11R12,
  )= {DesiredAngle=-45;};
};

MuscleGroup InterCostalisIntimus(searchString="*.*") = {

  SplineMuscle_CreateMuscleMultiOffset IC_Inn_R1R2 (
  CREATE_ELEMENTS= IC_MULTIPLIER*IC_SIZE,
  OriginSegment=....Segments.Left.R1Seg,
  ORIGIN_POINTS=....Segments.Left.R1Seg.IC_points.Inn_InfPoints,
  InsertionSegment=....Segments.Left.R2Seg,
  INSERTION_POINTS=....Segments.Left.R2Seg.IC_points.Inn_SupPoints,
  MUSCLE_MODEL_PARAMETERS=....MuscleModels.Left.InterCostalisExternal.IC_Ext_R1R2,
  )= {DesiredAngle = 0;};

  SplineMuscle_CreateMuscleMultiOffset IC_Inn_R2R3 (
  CREATE_ELEMENTS=IC_MULTIPLIER*(IC_SIZE+3),
  OriginSegment=....Segments.Left.R2Seg,
  ORIGIN_POINTS=....Segments.Left.R2Seg.IC_points.Inn_InfPoints,
  InsertionSegment=....Segments.Left.R3Seg,
  INSERTION_POINTS=....Segments.Left.R3Seg.IC_points.Inn_SupPoints,
  MUSCLE_MODEL_PARAMETERS=....MuscleModels.Left.InterCostalisExternal.IC_Ext_R2R3,
  )= {DesiredAngle = 0;};


  SplineMuscle_CreateMuscleMultiOffset IC_Inn_R3R4 (
  CREATE_ELEMENTS=IC_MULTIPLIER*(IC_SIZE+3),
  OriginSegment=....Segments.Left.R3Seg,
  ORIGIN_POINTS=....Segments.Left.R3Seg.IC_points.Inn_InfPoints,
  InsertionSegment=....Segments.Left.R4Seg,
  INSERTION_POINTS=....Segments.Left.R4Seg.IC_points.Inn_SupPoints,
  MUSCLE_MODEL_PARAMETERS=....MuscleModels.Left.InterCostalisExternal.IC_Ext_R3R4,
  )= {DesiredAngle = 0;};

  SplineMuscle_CreateMuscleMultiOffset IC_Inn_R4R5 (
  CREATE_ELEMENTS=IC_MULTIPLIER*(IC_SIZE+3),
  OriginSegment=....Segments.Left.R4Seg,
  ORIGIN_POINTS=....Segments.Left.R4Seg.IC_points.Inn_InfPoints,
  InsertionSegment=....Segments.Left.R5Seg,
  INSERTION_POINTS=....Segments.Left.R5Seg.IC_points.Inn_SupPoints,
  MUSCLE_MODEL_PARAMETERS=....MuscleModels.Left.InterCostalisExternal.IC_Ext_R4R5,
  )= {DesiredAngle = 0;};


  SplineMuscle_CreateMuscleMultiOffset IC_Inn_R5R6 (
  CREATE_ELEMENTS=IC_MULTIPLIER*(IC_SIZE+3),
  OriginSegment=....Segments.Left.R5Seg,
  ORIGIN_POINTS=....Segments.Left.R5Seg.IC_points.Inn_InfPoints,
  InsertionSegment=....Segments.Left.R6Seg,
  INSERTION_POINTS=....Segments.Left.R6Seg.IC_points.Inn_SupPoints,
  MUSCLE_MODEL_PARAMETERS=....MuscleModels.Left.InterCostalisExternal.IC_Ext_R5R6,
  )= {DesiredAngle = 0;};


  SplineMuscle_CreateMuscleMultiOffset IC_Inn_R6R7 (
  CREATE_ELEMENTS=IC_MULTIPLIER*(IC_SIZE+3),
  OriginSegment=....Segments.Left.R6Seg,
  ORIGIN_POINTS=....Segments.Left.R6Seg.IC_points.Inn_InfPoints,
  InsertionSegment=....Segments.Left.R7Seg,
  INSERTION_POINTS=....Segments.Left.R7Seg.IC_points.Inn_SupPoints,
  MUSCLE_MODEL_PARAMETERS=....MuscleModels.Left.InterCostalisExternal.IC_Ext_R6R7,
  )= {DesiredAngle = 0;};

  SplineMuscle_CreateMuscleMultiOffset IC_Inn_R7R8 (
  CREATE_ELEMENTS=IC_MULTIPLIER*(IC_SIZE+3),
  OriginSegment=....Segments.Left.R7Seg,
  ORIGIN_POINTS=....Segments.Left.R7Seg.IC_points.Inn_InfPoints,
  InsertionSegment=....Segments.Left.R8Seg,
  INSERTION_POINTS=....Segments.Left.R8Seg.IC_points.Inn_SupPoints,
  MUSCLE_MODEL_PARAMETERS=....MuscleModels.Left.InterCostalisExternal.IC_Ext_R7R8,
  )= {DesiredAngle = 0;};


  SplineMuscle_CreateMuscleMultiOffset IC_Inn_R8R9 (
  CREATE_ELEMENTS=IC_MULTIPLIER*(IC_SIZE+3),
  OriginSegment=....Segments.Left.R8Seg,
  ORIGIN_POINTS=....Segments.Left.R8Seg.IC_points.Inn_InfPoints,
  InsertionSegment=....Segments.Left.R9Seg,
  INSERTION_POINTS=....Segments.Left.R9Seg.IC_points.Inn_SupPoints,
  MUSCLE_MODEL_PARAMETERS=....MuscleModels.Left.InterCostalisExternal.IC_Ext_R8R9,
  )= {DesiredAngle = 0;};

  SplineMuscle_CreateMuscleMultiOffset IC_Inn_R9R10 (
  CREATE_ELEMENTS=IC_MULTIPLIER*(IC_SIZE+3),
  OriginSegment=....Segments.Left.R9Seg,
  ORIGIN_POINTS=....Segments.Left.R9Seg.IC_points.Inn_InfPoints,
  InsertionSegment=....Segments.Left.R10Seg,
  INSERTION_POINTS=....Segments.Left.R10Seg.IC_points.Inn_SupPoints,
  MUSCLE_MODEL_PARAMETERS=....MuscleModels.Left.InterCostalisExternal.IC_Ext_R9R10,
  )= {DesiredAngle = 0;};

  SplineMuscle_CreateMuscleMultiOffset IC_Inn_R10R11 (
  CREATE_ELEMENTS=IC_MULTIPLIER*(IC_SIZE),
  OriginSegment=....Segments.Left.R10Seg,
  ORIGIN_POINTS=....Segments.Left.R10Seg.IC_points.Inn_InfPoints,
  InsertionSegment=....Segments.Left.R11Seg,
  INSERTION_POINTS=....Segments.Left.R11Seg.IC_points.Inn_SupPoints,
  MUSCLE_MODEL_PARAMETERS=....MuscleModels.Left.InterCostalisExternal.IC_Ext_R10R11,
  )= {DesiredAngle = 0;};


  SplineMuscle_CreateMuscleMultiOffset IC_Inn_R11R12 (
  CREATE_ELEMENTS=IC_MULTIPLIER*(IC_SIZE-4),
  OriginSegment=....Segments.Left.R11Seg,
  ORIGIN_POINTS=....Segments.Left.R11Seg.IC_points.Inn_InfPoints,
  InsertionSegment=....Segments.Left.R12Seg,
  INSERTION_POINTS=....Segments.Left.R12Seg.IC_points.Inn_SupPoints,
  MUSCLE_MODEL_PARAMETERS=....MuscleModels.Left.InterCostalisExternal.IC_Ext_R11R12,
  )= {DesiredAngle = 0;};

};

#endif

#endif

MuscleGroup LevatorCostarum = {

  AnyMuscleViaPoint LCBrC7R1 = {
    AnyMuscleModel &MusMdl = ....MuscleModels.Left.LevatorCostarum.LCModel_1;
    AnyRefNode &S4 = ....Segments.C7Seg.LCBrC7R1LOrg;
    AnyRefNode &R1 = ....Segments.Left.R1Seg.LCBrC7R1_L_Ins;
    viewMuscle = {#include "../DrawSettings/MusDrawSettings.any"};
    viewForce.Visible ??= Off;
  };
  #if BM_TRUNK_THORACIC_MODEL == _THORACIC_MODEL_FLEXIBLE_
  AnyMuscleViaPoint LCBrT1R2 = {
    AnyMuscleModel &MusMdl = ....MuscleModels.Left.LevatorCostarum.LCModel_2;
    AnyRefNode &S4 = ....Segments.T1Seg.LCBrT1R2LOrg;
    AnyRefNode &R1 = ....Segments.Left.R2Seg.LCBrT1R2_L_Ins;
    viewMuscle = {#include "../DrawSettings/MusDrawSettings.any"};
    viewForce.Visible ??= Off;
  };

  AnyMuscleViaPoint LCBrT2R3 = {
    AnyMuscleModel &MusMdl = ....MuscleModels.Left.LevatorCostarum.LCModel_3;
    AnyRefNode &S4 = ....Segments.T2Seg.LCBrT2R3LOrg;
    AnyRefNode &R1 = ....Segments.Left.R3Seg.LCBrT2R3_L_Ins;
    viewMuscle = {#include "../DrawSettings/MusDrawSettings.any"};
    viewForce.Visible ??= Off;
  };

  AnyMuscleViaPoint LCBrT3R4 = {
    AnyMuscleModel &MusMdl = ....MuscleModels.Left.LevatorCostarum.LCModel_4;
    AnyRefNode &S4 = ....Segments.T3Seg.LCBrT3R4LOrg;
    AnyRefNode &R1 = ....Segments.Left.R4Seg.LCBrT3R4_L_Ins;
    viewMuscle = {#include "../DrawSettings/MusDrawSettings.any"};
    viewForce.Visible ??= Off;
  };

  AnyMuscleViaPoint LCBrT4R5 = {
    AnyMuscleModel &MusMdl = ....MuscleModels.Left.LevatorCostarum.LCModel_5;
    AnyRefNode &S4 = ....Segments.T4Seg.LCBrT4R5LOrg;
    AnyRefNode &R1 = ....Segments.Left.R5Seg.LCBrT4R5_L_Ins;
    viewMuscle = {#include "../DrawSettings/MusDrawSettings.any"};
    viewForce.Visible ??= Off;
  };

  AnyMuscleViaPoint LCBrT5R6 = {
    AnyMuscleModel &MusMdl = ....MuscleModels.Left.LevatorCostarum.LCModel_6;
    AnyRefNode &S4 = ....Segments.T5Seg.LCBrT5R6LOrg;
    AnyRefNode &R1 = ....Segments.Left.R6Seg.LCBrT5R6_L_Ins;
    viewMuscle = {#include "../DrawSettings/MusDrawSettings.any"};
    viewForce.Visible ??= Off;
  };

  AnyMuscleViaPoint LCBrT6R7 = {
    AnyMuscleModel &MusMdl = ....MuscleModels.Left.LevatorCostarum.LCModel_7;
    AnyRefNode &S4 = ....Segments.T6Seg.LCBrT6R7LOrg;
    AnyRefNode &R1 = ....Segments.Left.R7Seg.LCBrT6R7_L_Ins;
    viewMuscle = {#include "../DrawSettings/MusDrawSettings.any"};
    viewForce.Visible ??= Off;
  };

  AnyMuscleViaPoint LCBrT7R8 = {
    AnyMuscleModel &MusMdl = ....MuscleModels.Left.LevatorCostarum.LCModel_8;
    AnyRefNode &S4 = ....Segments.T7Seg.LCBrT7R8LOrg;
    AnyRefNode &R1 = ....Segments.Left.R8Seg.LCBrT7R8_L_Ins;
    viewMuscle = {#include "../DrawSettings/MusDrawSettings.any"};
    viewForce.Visible ??= Off;
  };

  AnyMuscleViaPoint LCBrT8R9 = {
    AnyMuscleModel &MusMdl = ....MuscleModels.Left.LevatorCostarum.LCModel_9;
    AnyRefNode &S4 = ....Segments.T8Seg.LCBrT8R9LOrg;
    AnyRefNode &R1 = ....Segments.Left.R9Seg.LCBrT8R9_L_Ins;
    viewMuscle = {#include "../DrawSettings/MusDrawSettings.any"};
    viewForce.Visible ??= Off;
  };

  AnyMuscleViaPoint LCBrT9R10 = {
    AnyMuscleModel &MusMdl = ....MuscleModels.Left.LevatorCostarum.LCModel_10;
    AnyRefNode &S4 = ....Segments.T9Seg.LCBrT9R10LOrg;
    AnyRefNode &R1 = ....Segments.Left.R10Seg.LCBrT9R10_L_Ins;
    viewMuscle = {#include "../DrawSettings/MusDrawSettings.any"};
    viewForce.Visible ??= Off;
  };

  AnyMuscleViaPoint LCBrT10R11 = {
    AnyMuscleModel &MusMdl = ....MuscleModels.Left.LevatorCostarum.LCModel_11;
    AnyRefNode &S4 = ....Segments.T10Seg.LCBrT10R11LOrg;
    AnyRefNode &R1 = ....Segments.Left.R11Seg.LCBrT10R11_L_Ins;
    viewMuscle = {#include "../DrawSettings/MusDrawSettings.any"};
    viewForce.Visible ??= Off;
  };

  AnyMuscleViaPoint LCBrT11R12 = {
    AnyMuscleModel &MusMdl = ....MuscleModels.Left.LevatorCostarum.LCModel_12;
    AnyRefNode &S4 = ....Segments.T11Seg.LCBrT11R12LOrg;
    AnyRefNode &R1 = ....Segments.Left.R12Seg.LCBrT11R12_L_Ins;
    viewMuscle = {#include "../DrawSettings/MusDrawSettings.any"};
    viewForce.Visible ??= Off;
  };

  // LONGUS
  AnyMuscleViaPoint LCLgT5R7 = {
    AnyMuscleModel &MusMdl = ....MuscleModels.Left.LevatorCostarum.LCModel_13;
    AnyRefNode &S4 = ....Segments.T5Seg.LCLgT5R7LOrg;
    AnyRefNode &R1 = ....Segments.Left.R7Seg.LCLgT5R7_L_Ins;
    viewMuscle = {#include "../DrawSettings/MusDrawSettings.any"};
    viewForce.Visible ??= Off;
  };

  AnyMuscleViaPoint LCLgT6R8 = {
    AnyMuscleModel &MusMdl = ....MuscleModels.Left.LevatorCostarum.LCModel_14;
    AnyRefNode &S4 = ....Segments.T6Seg.LCLgT6R8LOrg;
    AnyRefNode &R1 = ....Segments.Left.R8Seg.LCLgT6R8_L_Ins;
    viewMuscle = {#include "../DrawSettings/MusDrawSettings.any"};
    viewForce.Visible ??= Off;
  };

  AnyMuscleViaPoint LCLgT7R9 = {
    AnyMuscleModel &MusMdl = ....MuscleModels.Left.LevatorCostarum.LCModel_15;
    AnyRefNode &S4 = ....Segments.T7Seg.LCLgT7R9LOrg;
    AnyRefNode &R1 = ....Segments.Left.R9Seg.LCLgT7R9_L_Ins;
    viewMuscle = {#include "../DrawSettings/MusDrawSettings.any"};
    viewForce.Visible ??= Off;
  };

  AnyMuscleViaPoint LCLgT8R10 = {
    AnyMuscleModel &MusMdl = ....MuscleModels.Left.LevatorCostarum.LCModel_16;
    AnyRefNode &S4 = ....Segments.T8Seg.LCLgT8R10LOrg;
    AnyRefNode &R1 = ....Segments.Left.R10Seg.LCLgT8R10_L_Ins;
    viewMuscle = {#include "../DrawSettings/MusDrawSettings.any"};
    viewForce.Visible ??= Off;
  };

  AnyMuscleViaPoint LCLgT9R11 = {
    AnyMuscleModel &MusMdl = ....MuscleModels.Left.LevatorCostarum.LCModel_17;
    AnyRefNode &S4 = ....Segments.T9Seg.LCLgT9R11LOrg;
    AnyRefNode &R1 = ....Segments.Left.R11Seg.LCLgT9R11_L_Ins;
    viewMuscle = {#include "../DrawSettings/MusDrawSettings.any"};
    viewForce.Visible ??= Off;
  };

  AnyMuscleViaPoint LCLgT10R12 = {
    AnyMuscleModel &MusMdl = ....MuscleModels.Left.LevatorCostarum.LCModel_18;
    AnyRefNode &S4 = ....Segments.T10Seg.LCLgT10R12LOrg;
    AnyRefNode &R1 = ....Segments.Left.R12Seg.LCLgT10R12_L_Ins;
    viewMuscle = {#include "../DrawSettings/MusDrawSettings.any"};
    viewForce.Visible ??= Off;
  };
  #endif
};

MuscleGroup LongissimusCapitis = {
  AnyMuscleViaPoint LongissimusCapitisC3C0 = {
    AnyMuscleModel &MusMdl = ....MuscleModels.Left.LongissimusCapitis.LongissimusCapitisC3C0;
    AnyRefNode &Org = ....Segments.C3Seg.LongissimusCapitisC3C0NodeL;
    AnyRefNode &Ins = ....Segments.SkullSeg.LongissimusCapitisNodeL;
    viewMuscle = {#include "../DrawSettings/MusDrawSettings.any"};
    viewForce.Visible ??= Off;
  };
  AnyMuscleViaPoint LongissimusCapitisC4C0 = {
    AnyMuscleModel &MusMdl = ....MuscleModels.Left.LongissimusCapitis.LongissimusCapitisC4C0;
    AnyRefNode &Org = ....Segments.C4Seg.LongissimusCapitisC4C0NodeL;
    AnyRefNode &Ins = ....Segments.SkullSeg.LongissimusCapitisNodeL;
    viewMuscle = {#include "../DrawSettings/MusDrawSettings.any"};
    viewForce.Visible ??= Off;
  };
  AnyMuscleViaPoint LongissimusCapitisC5C0 = {
    AnyMuscleModel &MusMdl = ....MuscleModels.Left.LongissimusCapitis.LongissimusCapitisC5C0;
    AnyRefNode &Org = ....Segments.C5Seg.LongissimusCapitisC5C0NodeL;
    AnyRefNode &Ins = ....Segments.SkullSeg.LongissimusCapitisNodeL;
    viewMuscle = {#include "../DrawSettings/MusDrawSettings.any"};
    viewForce.Visible ??= Off;
  };
  AnyMuscleViaPoint LongissimusCapitisC6C0 = {
    AnyMuscleModel &MusMdl = ....MuscleModels.Left.LongissimusCapitis.LongissimusCapitisC6C0;
    AnyRefNode &Org = ....Segments.C6Seg.LongissimusCapitisC6C0NodeL;
    AnyRefNode &Ins = ....Segments.SkullSeg.LongissimusCapitisNodeL;
    viewMuscle = {#include "../DrawSettings/MusDrawSettings.any"};
    viewForce.Visible ??= Off;
  };
  AnyMuscleViaPoint LongissimusCapitisC7C0 = {
    AnyMuscleModel &MusMdl = ....MuscleModels.Left.LongissimusCapitis.LongissimusCapitisC7C0;
    AnyRefNode &Org = ....Segments.C7Seg.LongissimusCapitisC7C0NodeL;
    AnyRefNode &Ins = ....Segments.SkullSeg.LongissimusCapitisNodeL;
    viewMuscle = {#include "../DrawSettings/MusDrawSettings.any"};
    viewForce.Visible ??= Off;
  };
  AnyMuscleViaPoint LongissimusCapitisT1C0 = {
    AnyMuscleModel &MusMdl = ....MuscleModels.Left.LongissimusCapitis.LongissimusCapitisT1C0;
    AnyRefNode &Org = ....Segments.T1Seg.Left.LongissimusCapitisT1C0Node;
    AnyRefNode &Ins = ....Segments.SkullSeg.LongissimusCapitisNodeL;
    viewMuscle = {#include "../DrawSettings/MusDrawSettings.any"};
    viewForce.Visible ??= Off;
  };
  AnyMuscleViaPoint LongissimusCapitisT2C0 = {
    AnyMuscleModel &MusMdl = ....MuscleModels.Left.LongissimusCapitis.LongissimusCapitisT2C0;
    AnyRefNode &Org = ....Segments.T2Seg.Left.LongissimusCapitisT2C0Node;
    AnyRefNode &Ins = ....Segments.SkullSeg.LongissimusCapitisNodeL;
    viewMuscle = {#include "../DrawSettings/MusDrawSettings.any"};
    viewForce.Visible ??= Off;
  };
  AnyMuscleViaPoint LongissimusCapitisT3C0 = {
    AnyMuscleModel &MusMdl = ....MuscleModels.Left.LongissimusCapitis.LongissimusCapitisT3C0;
    AnyRefNode &Org = ....Segments.T3Seg.Left.LongissimusCapitisT3C0Node;
    AnyRefNode &Ins = ....Segments.SkullSeg.LongissimusCapitisNodeL;
    viewMuscle = {#include "../DrawSettings/MusDrawSettings.any"};
    viewForce.Visible ??= Off;
  };
  AnyMuscleViaPoint LongissimusCapitisT4C0 = {
    AnyMuscleModel &MusMdl = ....MuscleModels.Left.LongissimusCapitis.LongissimusCapitisT4C0;
    AnyRefNode &Org = ....Segments.T4Seg.Left.LongissimusCapitisT4C0Node;
    AnyRefNode &Ins = ....Segments.SkullSeg.LongissimusCapitisNodeL;
    viewMuscle = {#include "../DrawSettings/MusDrawSettings.any"};
    viewForce.Visible ??= Off;
  };
  AnyMuscleViaPoint LongissimusCapitisT5C0 = {
    AnyMuscleModel &MusMdl = ....MuscleModels.Left.LongissimusCapitis.LongissimusCapitisT5C0;
    AnyRefNode &Org = ....Segments.T5Seg.Left.LongissimusCapitisT5C0Node;
    AnyRefNode &Ins = ....Segments.SkullSeg.LongissimusCapitisNodeL;
    viewMuscle = {#include "../DrawSettings/MusDrawSettings.any"};
    viewForce.Visible ??= Off;
  };
};

MuscleGroup LongissimusCervicis = {
  AnyMuscleViaPoint LongissimusCervicisT1C2 = {
    AnyMuscleModel &MusMdl = ....MuscleModels.Left.LongissimusCervicis.LongissimusCervicisT1C2;
    AnyRefNode &Org = ....Segments.T1Seg.Left.LongissimusCervicisT1Node;
    AnyRefNode &Ins = ....Segments.C2Seg.Left.LongissimusCervicisT1C2Node;
    viewMuscle = {#include "../DrawSettings/MusDrawSettings.any"};
    viewForce.Visible ??= Off;
  };

  AnyMuscleViaPoint LongissimusCervicisT2C3 = {
    AnyMuscleModel &MusMdl = ....MuscleModels.Left.LongissimusCervicis.LongissimusCervicisT2C3;
    AnyRefNode &Org = ....Segments.T2Seg.Left.LongissimusCervicisT2Node;
    AnyRefNode &Ins = ....Segments.C3Seg.Left.LongissimusCervicisT2C3Node;
    viewMuscle = {#include "../DrawSettings/MusDrawSettings.any"};
    viewForce.Visible ??= Off;
  };

  AnyMuscleViaPoint LongissimusCervicisT3C4 = {
    AnyMuscleModel &MusMdl = ....MuscleModels.Left.LongissimusCervicis.LongissimusCervicisT3C4;
    AnyRefNode &Org = ....Segments.T3Seg.Left.LongissimusCervicisT3Node;
    AnyRefNode &Ins = ....Segments.C4Seg.Left.LongissimusCervicisT3C4Node;
    viewMuscle = {#include "../DrawSettings/MusDrawSettings.any"};
    viewForce.Visible ??= Off;
  };

  AnyMuscleViaPoint LongissimusCervicisT4C5 = {
    AnyMuscleModel &MusMdl = ....MuscleModels.Left.LongissimusCervicis.LongissimusCervicisT4C5;
    AnyRefNode &Org = ....Segments.T4Seg.Left.LongissimusCervicisT4Node;
    AnyRefNode &Ins = ....Segments.C5Seg.Left.LongissimusCervicisT4C5Node;
    viewMuscle = {#include "../DrawSettings/MusDrawSettings.any"};
    viewForce.Visible ??= Off;
  };

  AnyMuscleViaPoint LongissimusCervicisT5C6 = {
    AnyMuscleModel &MusMdl = ....MuscleModels.Left.LongissimusCervicis.LongissimusCervicisT5C6;
    AnyRefNode &Org = ....Segments.T5Seg.Left.LongissimusCervicisT5Node;
    AnyRefNode &Ins = ....Segments.C6Seg.Left.LongissimusCervicisT5C6Node;
    viewMuscle = {#include "../DrawSettings/MusDrawSettings.any"};
    viewForce.Visible ??= Off;
  };
};
///The longissimus thoracis is a component of the erector spinae muscle group. It consists of two parts: lumbar and thoracic.
///The thoracic part inserts into the transverse processes of vertebrae T1 - T12 and the angles of ribs 3 - 12.
/// Refrence: Bakkum, B.W., Cramer, G.D.: Muscles That Influence the Spine. In: Clinical Anatomy of the Spine, Spinal Cord, and Ans. pp. 98 - 134. Elsevier (2014) (DOI: 10.1016/B978-0-323-07954-9.00004-9)
MuscleGroup LongissimusThoracis = {
  // Longissimus thoracis part lumbar
  AnyMuscleViaPoint LTplL1SIPS = {
    AnyMuscleModel &MusMdl = ....MuscleModels.Left.LongissimusThoracis.LTplL1SIPS;
    AnyRefNode &Org = ....Segments.L1Seg.LTplL1SIPSNodeL;
    #if BM_TRUNK_CAVITY_MODEL == _CAVITY_MODEL_VOLUME_
    AnyRefNode &Via1 = ....Abdominal.Layer_L3.BaseSegPosterior.LTplL1SIPSViaNodeL;
    #else
    AnyRefNode &Via1 = ....Segments.L2Seg.LTplL1SIPSViaNodeL;
    #endif
    AnyRefNode &Ins = ....Segments.PelvisSeg.LTplL1SIPSNodeL;
    viewMuscle = {#include "../DrawSettings/MusDrawSettings.any"};
    viewForce.Visible ??= Off;
  };
  AnyMuscleViaPoint LTplL2SIPS = {
    AnyMuscleModel &MusMdl = ....MuscleModels.Left.LongissimusThoracis.LTplL2SIPS;
    AnyRefNode &Org = ....Segments.L2Seg.LTplL2SIPSNodeL;
    AnyRefNode &Ins = ....Segments.PelvisSeg.LTplL2SIPSNodeL;
    viewMuscle = {#include "../DrawSettings/MusDrawSettings.any"};
    viewForce.Visible ??= Off;
  };
  AnyMuscleViaPoint LTplL3SIPS = {
    AnyMuscleModel &MusMdl = ....MuscleModels.Left.LongissimusThoracis.LTplL3SIPS;
    AnyRefNode &Org = ....Segments.L3Seg.LTplL3SIPSNodeL;
    AnyRefNode &Ins = ....Segments.PelvisSeg.LTplL3SIPSNodeL;
    viewMuscle = {#include "../DrawSettings/MusDrawSettings.any"};
    viewForce.Visible ??= Off;
  };
  AnyMuscleViaPoint LTplL4SIPS = {
    AnyMuscleModel &MusMdl = ....MuscleModels.Left.LongissimusThoracis.LTplL4SIPS;
    AnyRefNode &Org = ....Segments.L4Seg.LTplL4SIPSNodeL;
    AnyRefNode &Ins = ....Segments.PelvisSeg.LTplL4SIPSNodeL;
    viewMuscle = {#include "../DrawSettings/MusDrawSettings.any"};
    viewForce.Visible ??= Off;
  };
  AnyMuscleViaPoint LTplL5Ilium = {
    AnyMuscleModel &MusMdl = ....MuscleModels.Left.LongissimusThoracis.LTplL5Ilium;
    AnyRefNode &Org = ....Segments.L5Seg.LTplL5IliumNodeL;
    AnyRefNode &Ins = ....Segments.SacrumSeg.LTplL5IliumNodeL;
    viewMuscle = {#include "../DrawSettings/MusDrawSettings.any"};
    viewForce.Visible ??= Off;
  };
    // End of Longissimus thoracis part lumbar

    // Longissimus thoracis part thoracis
  AnyMuscleViaPoint LTptT1L1 = {
    AnyMuscleModel &MusMdl = ....MuscleModels.Left.LongissimusThoracis.LTptT1L1;
    AnyRefNode &Org = ....Segments.T1Seg.LTptT1L1NodeL;
    AnyRefNode &Via1 = ....Segments.T2Seg.LTptT1L1Via1NodeL;
    AnyRefNode &Via2 = ....Segments.T3Seg.LTptT1L1Via2NodeL;
    AnyRefNode &Via3 = ....Segments.T4Seg.LTptT1L1Via3NodeL;
    AnyRefNode &Via4 = ....Segments.T5Seg.LTptT1L1Via4NodeL;
    AnyRefNode &Via5 = ....Segments.T6Seg.LTptT1L1Via5NodeL;
    AnyRefNode &Via6 = ....Segments.T7Seg.LTptT1L1Via6NodeL;
    AnyRefNode &Via7 = ....Segments.T8Seg.LTptT1L1Via7NodeL;
    AnyRefNode &Via8 = ....Segments.T9Seg.LTptT1L1Via8NodeL;
    AnyRefNode &Via9 = ....Segments.T10Seg.LTptT1L1Via9NodeL;
    AnyRefNode &Via10 = ....Segments.T11Seg.LTptT1L1Via10NodeL;
    AnyRefNode &Via11 = ....Segments.T12Seg.LTptT1L1Via11NodeL;
    AnyRefNode &Ins = ....Segments.L1Seg.LTptT1L1NodeL;
    viewMuscle = {#include "../DrawSettings/MusDrawSettings.any"};
    viewForce.Visible ??= Off;
  };
  AnyMuscleViaPoint LTptT2L2 = {
    AnyMuscleModel &MusMdl = ....MuscleModels.Left.LongissimusThoracis.LTptT2L2;
    AnyRefNode &Org = ....Segments.T2Seg.LTptT2L2NodeL;
    AnyRefNode &Via1 = ....Segments.T3Seg.LTptT2L2Via1NodeL;
    AnyRefNode &Via2 = ....Segments.T4Seg.LTptT2L2Via2NodeL;
    AnyRefNode &Via3 = ....Segments.T5Seg.LTptT2L2Via3NodeL;
    AnyRefNode &Via4 = ....Segments.T6Seg.LTptT2L2Via4NodeL;
    AnyRefNode &Via5 = ....Segments.T7Seg.LTptT2L2Via5NodeL;
    AnyRefNode &Via6 = ....Segments.T8Seg.LTptT2L2Via6NodeL;
    AnyRefNode &Via7 = ....Segments.T9Seg.LTptT2L2Via7NodeL;
    AnyRefNode &Via8 = ....Segments.T10Seg.LTptT2L2Via8NodeL;
    AnyRefNode &Via9 = ....Segments.T11Seg.LTptT2L2Via9NodeL;
    AnyRefNode &Via10 = ....Segments.T12Seg.LTptT2L2Via10NodeL;
    AnyRefNode &Via11 = ....Segments.L1Seg.LTptT2L2Via11NodeL;
    AnyRefNode &Ins = ....Segments.L2Seg.LTptT2L2NodeL;
    viewMuscle = {#include "../DrawSettings/MusDrawSettings.any"};
    viewForce.Visible ??= Off;
  };
  AnyMuscleViaPoint LTptT3L3 = {
    AnyMuscleModel &MusMdl = ....MuscleModels.Left.LongissimusThoracis.LTptT3L3;
    AnyRefNode &Org = ....Segments.T3Seg.LTptT3L3NodeL;
    AnyRefNode &Via1 = ....Segments.T4Seg.LTptT3L3Via1NodeL;
    AnyRefNode &Via2 = ....Segments.T5Seg.LTptT3L3Via2NodeL;
    AnyRefNode &Via3 = ....Segments.T6Seg.LTptT3L3Via3NodeL;
    AnyRefNode &Via4 = ....Segments.T7Seg.LTptT3L3Via4NodeL;
    AnyRefNode &Via5 = ....Segments.T8Seg.LTptT3L3Via5NodeL;
    AnyRefNode &Via6 = ....Segments.T9Seg.LTptT3L3Via6NodeL;
    AnyRefNode &Via7 = ....Segments.T10Seg.LTptT3L3Via7NodeL;
    AnyRefNode &Via8 = ....Segments.T11Seg.LTptT3L3Via8NodeL;
    AnyRefNode &Via9 = ....Segments.T12Seg.LTptT3L3Via9NodeL;
    AnyRefNode &Via10 = ....Segments.L1Seg.LTptT3L3Via10NodeL;
    AnyRefNode &Via11 = ....Segments.L2Seg.LTptT3L3Via11NodeL;
    AnyRefNode &Ins = ....Segments.L3Seg.LTptT3L3NodeL;
    viewMuscle = {#include "../DrawSettings/MusDrawSettings.any"};
    viewForce.Visible ??= Off;
  };
  AnyMuscleViaPoint LTptT4L4 = {
    AnyMuscleModel &MusMdl = ....MuscleModels.Left.LongissimusThoracis.LTptT4L4;
    AnyRefNode &Org = ....Segments.T4Seg.LTptT4L4NodeL;
    AnyRefNode &Via1 = ....Segments.T5Seg.LTptT4L4Via1NodeL;
    AnyRefNode &Via2 = ....Segments.T6Seg.LTptT4L4Via2NodeL;
    AnyRefNode &Via3 = ....Segments.T7Seg.LTptT4L4Via3NodeL;
    AnyRefNode &Via4 = ....Segments.T8Seg.LTptT4L4Via4NodeL;
    AnyRefNode &Via5 = ....Segments.T9Seg.LTptT4L4Via5NodeL;
    AnyRefNode &Via6 = ....Segments.T10Seg.LTptT4L4Via6NodeL;
    AnyRefNode &Via7 = ....Segments.T11Seg.LTptT4L4Via7NodeL;
    AnyRefNode &Via8 = ....Segments.T12Seg.LTptT4L4Via8NodeL;
    AnyRefNode &Via9 = ....Segments.L1Seg.LTptT4L4Via9NodeL;
    AnyRefNode &Via10 = ....Segments.L2Seg.LTptT4L4Via10NodeL;
    AnyRefNode &Via11 = ....Segments.L3Seg.LTptT4L4Via11NodeL;
    AnyRefNode &Ins = ....Segments.L4Seg.LTptT4L4NodeL;
    viewMuscle = {#include "../DrawSettings/MusDrawSettings.any"};
    viewForce.Visible ??= Off;
  };
  AnyMuscleViaPoint LTptT5L5 = {
    AnyMuscleModel &MusMdl = ....MuscleModels.Left.LongissimusThoracis.LTptT5L5;
    AnyRefNode &Org = ....Segments.T5Seg.LTptT5L5NodeL;
    AnyRefNode &Via1 = ....Segments.T6Seg.LTptT5L5Via1NodeL;
    AnyRefNode &Via2 = ....Segments.T7Seg.LTptT5L5Via2NodeL;
    AnyRefNode &Via3 = ....Segments.T8Seg.LTptT5L5Via3NodeL;
    AnyRefNode &Via4 = ....Segments.T9Seg.LTptT5L5Via4NodeL;
    AnyRefNode &Via5 = ....Segments.T10Seg.LTptT5L5Via5NodeL;
    AnyRefNode &Via6 = ....Segments.T11Seg.LTptT5L5Via6NodeL;
    AnyRefNode &Via7 = ....Segments.T12Seg.LTptT5L5Via7NodeL;
    AnyRefNode &Via8 = ....Segments.L1Seg.LTptT5L5Via8NodeL;
    AnyRefNode &Via9 = ....Segments.L2Seg.LTptT5L5Via9NodeL;
    AnyRefNode &Via10 = ....Segments.L3Seg.LTptT5L5Via10NodeL;
    AnyRefNode &Via11 = ....Segments.L4Seg.LTptT5L5Via11NodeL;
    AnyRefNode &Ins = ....Segments.L5Seg.LTptT5L5NodeL;
    viewMuscle = {#include "../DrawSettings/MusDrawSettings.any"};
    viewForce.Visible ??= Off;
  };
  AnyMuscleViaPoint LTptT6S1 = {
    AnyMuscleModel &MusMdl = ....MuscleModels.Left.LongissimusThoracis.LTptT6S1;
    AnyRefNode &Org = ....Segments.T6Seg.LTptT6S1NodeL;
    AnyRefNode &Via1 = ....Segments.T7Seg.LTptT6S1Via1NodeL;
    AnyRefNode &Via2 = ....Segments.T8Seg.LTptT6S1Via2NodeL;
    AnyRefNode &Via3 = ....Segments.T9Seg.LTptT6S1Via3NodeL;
    AnyRefNode &Via4 = ....Segments.T10Seg.LTptT6S1Via4NodeL;
    AnyRefNode &Via5 = ....Segments.T11Seg.LTptT6S1Via5NodeL;
    AnyRefNode &Via6 = ....Segments.T12Seg.LTptT6S1Via6NodeL;
    AnyRefNode &Via7 = ....Segments.L1Seg.LTptT6S1Via7NodeL;
    AnyRefNode &Via8 = ....Segments.L2Seg.LTptT6S1Via8NodeL;
    AnyRefNode &Via9 = ....Segments.L3Seg.LTptT6S1Via9NodeL;
    AnyRefNode &Via10 = ....Segments.L4Seg.LTptT6S1Via10NodeL;
    AnyRefNode &Via11 = ....Segments.L5Seg.LTptT6S1Via11NodeL;
    AnyRefNode &Ins = ....Segments.SacrumSeg.LTptT6S1NodeL;
    viewMuscle = {#include "../DrawSettings/MusDrawSettings.any"};
    viewForce.Visible ??= Off;
  };
  AnyMuscleViaPoint LTptT7S2 = {
    AnyMuscleModel &MusMdl = ....MuscleModels.Left.LongissimusThoracis.LTptT7S2;
    AnyRefNode &Org = ....Segments.T7Seg.LTptT7S2NodeL;
    AnyRefNode &Via1 = ....Segments.T8Seg.LTptT7S2Via1NodeL;
    AnyRefNode &Via2 = ....Segments.T9Seg.LTptT7S2Via2NodeL;
    AnyRefNode &Via3 = ....Segments.T10Seg.LTptT7S2Via3NodeL;
    AnyRefNode &Via4 = ....Segments.T11Seg.LTptT7S2Via4NodeL;
    AnyRefNode &Via5 = ....Segments.T12Seg.LTptT7S2Via5NodeL;
    AnyRefNode &Via6 = ....Segments.L1Seg.LTptT7S2Via6NodeL;
    AnyRefNode &Via7 = ....Segments.L2Seg.LTptT7S2Via7NodeL;
    AnyRefNode &Via8 = ....Segments.L3Seg.LTptT7S2Via8NodeL;
    AnyRefNode &Via9 = ....Segments.L4Seg.LTptT7S2Via9NodeL;
    AnyRefNode &Via10 = ....Segments.L5Seg.LTptT7S2Via10NodeL;
    AnyRefNode &Ins = ....Segments.SacrumSeg.LTptT7S2NodeL;
    viewMuscle = {#include "../DrawSettings/MusDrawSettings.any"};
    viewForce.Visible ??= Off;
  };
  AnyMuscleViaPoint LTptT8S3 = {
    AnyMuscleModel &MusMdl = ....MuscleModels.Left.LongissimusThoracis.LTptT8S3;
    AnyRefNode &Org = ....Segments.T8Seg.LTptT8S3NodeL;
    AnyRefNode &Via1 = ....Segments.T9Seg.LTptT8S3Via1NodeL;
    AnyRefNode &Via2 = ....Segments.T10Seg.LTptT8S3Via2NodeL;
    AnyRefNode &Via3 = ....Segments.T11Seg.LTptT8S3Via3NodeL;
    AnyRefNode &Via4 = ....Segments.T12Seg.LTptT8S3Via4NodeL;
    AnyRefNode &Via5 = ....Segments.L1Seg.LTptT8S3Via5NodeL;
    AnyRefNode &Via6 = ....Segments.L2Seg.LTptT8S3Via6NodeL;
    AnyRefNode &Via7 = ....Segments.L3Seg.LTptT8S3Via7NodeL;
    AnyRefNode &Via8 = ....Segments.L4Seg.LTptT8S3Via8NodeL;
    AnyRefNode &Via9 = ....Segments.L5Seg.LTptT8S3Via9NodeL;
    AnyRefNode &Ins = ....Segments.SacrumSeg.LTptT8S3NodeL;
    viewMuscle = {#include "../DrawSettings/MusDrawSettings.any"};
    viewForce.Visible ??= Off;
  };
  AnyMuscleViaPoint LTptT9S4 = {
    AnyMuscleModel &MusMdl = ....MuscleModels.Left.LongissimusThoracis.LTptT9S4;
    AnyRefNode &Org = ....Segments.T9Seg.LTptT9S4NodeL;
    AnyRefNode &Via1 = ....Segments.T10Seg.LTptT9S4Via1NodeL;
    AnyRefNode &Via2 = ....Segments.T11Seg.LTptT9S4Via2NodeL;
    AnyRefNode &Via3 = ....Segments.T12Seg.LTptT9S4Via3NodeL;
    AnyRefNode &Via4 = ....Segments.L1Seg.LTptT9S4Via4NodeL;
    AnyRefNode &Via5 = ....Segments.L2Seg.LTptT9S4Via5NodeL;
    AnyRefNode &Via6 = ....Segments.L3Seg.LTptT9S4Via6NodeL;
    AnyRefNode &Via7 = ....Segments.L4Seg.LTptT9S4Via7NodeL;
    AnyRefNode &Via8 = ....Segments.L5Seg.LTptT9S4Via8NodeL;
    AnyRefNode &Ins = ....Segments.SacrumSeg.LTptT9S4NodeL;
    viewMuscle = {#include "../DrawSettings/MusDrawSettings.any"};
    viewForce.Visible ??= Off;
  };
  AnyMuscleViaPoint LTptT10Sacrum = {
    AnyMuscleModel &MusMdl = ....MuscleModels.Left.LongissimusThoracis.LTptT10Sacrum;
    AnyRefNode &Org = ....Segments.T10Seg.LTptT10SacrumNodeL;
    AnyRefNode &Via1 = ....Segments.T11Seg.LTptT10SacrumVia1NodeL;
    #if BM_TRUNK_CAVITY_MODEL == _CAVITY_MODEL_VOLUME_
    AnyRefNode &Via2 = ....Abdominal.Layer_L1.BaseSegPosterior.LTptT10SacrumVia2NodeL;
    AnyRefNode &Via3 = ....Abdominal.Layer_L2.BaseSegPosterior.LTptT10SacrumVia3NodeL;
    AnyRefNode &Via4 = ....Abdominal.Layer_L3.BaseSegPosterior.LTptT10SacrumVia4NodeL;
    AnyRefNode &Via5 = ....Abdominal.Layer_L4.BaseSegPosterior.LTptT10SacrumVia5NodeL;
    AnyRefNode &Via6 = ....Abdominal.Layer_L5.BaseSegPosterior.LTptT10SacrumVia6NodeL;
//    AnyRefNode &Via7 = ....Abdominal.Layer_L5.BaseSegPosterior.LTptT10SacrumVia7NodeL;
    #else
    AnyRefNode &Via2 = ....Segments.T12Seg.LTptT10SacrumVia2NodeL;
    AnyRefNode &Via3 = ....Segments.L1Seg.LTptT10SacrumVia3NodeL;
    AnyRefNode &Via4 = ....Segments.L2Seg.LTptT10SacrumVia4NodeL;
    AnyRefNode &Via5 = ....Segments.L3Seg.LTptT10SacrumVia5NodeL;
    AnyRefNode &Via6 = ....Segments.L4Seg.LTptT10SacrumVia6NodeL;
    AnyRefNode &Via7 = ....Segments.L5Seg.LTptT10SacrumVia7NodeL;
    #endif
    AnyRefNode &Ins = ....Segments.SacrumSeg.LTptT10SacrumNodeL;
    viewMuscle = {#include "../DrawSettings/MusDrawSettings.any"};
    viewForce.Visible ??= Off;
  };
    AnyMuscleViaPoint LTptT11Sacrum = {
    AnyMuscleModel &MusMdl = ....MuscleModels.Left.LongissimusThoracis.LTptT11Sacrum;
    AnyRefNode &Org = ....Segments.T11Seg.LTptT11SacrumNodeL;
    #if BM_TRUNK_CAVITY_MODEL == _CAVITY_MODEL_VOLUME_
    AnyRefNode &Via1 = ....Abdominal.Layer_L1.BaseSegPosterior.LTptT11SacrumVia1NodeL;
    AnyRefNode &Via2 = ....Abdominal.Layer_L2.BaseSegPosterior.LTptT11SacrumVia2NodeL;
    AnyRefNode &Via3 = ....Abdominal.Layer_L3.BaseSegPosterior.LTptT11SacrumVia3NodeL;
    AnyRefNode &Via4 = ....Abdominal.Layer_L4.BaseSegPosterior.LTptT11SacrumVia4NodeL;
    AnyRefNode &Via5 = ....Abdominal.Layer_L5.BaseSegPosterior.LTptT11SacrumVia5NodeL;
//    AnyRefNode &Via6 = ....Abdominal.Layer_L5.BaseSegPosterior.LTptT11SacrumVia6NodeL;
    #else
    AnyRefNode &Via1 = ....Segments.T12Seg.LTptT11SacrumVia1NodeL;
    AnyRefNode &Via2 = ....Segments.L1Seg.LTptT11SacrumVia2NodeL;
    AnyRefNode &Via3 = ....Segments.L2Seg.LTptT11SacrumVia3NodeL;
    AnyRefNode &Via4 = ....Segments.L3Seg.LTptT11SacrumVia4NodeL;
    AnyRefNode &Via5 = ....Segments.L4Seg.LTptT11SacrumVia5NodeL;
    AnyRefNode &Via6 = ....Segments.L5Seg.LTptT11SacrumVia6NodeL;
    #endif
    AnyRefNode &Ins = ....Segments.SacrumSeg.LTptT11SacrumNodeL;
    viewMuscle = {#include "../DrawSettings/MusDrawSettings.any"};
    viewForce.Visible ??= Off;
  };
  AnyMuscleViaPoint LTptT12Sacrum = {
    AnyMuscleModel &MusMdl = ....MuscleModels.Left.LongissimusThoracis.LTptT12Sacrum;
    AnyRefNode &Org = ....Segments.T12Seg.LTptT12SacrumNodeL;
    #if BM_TRUNK_CAVITY_MODEL == _CAVITY_MODEL_VOLUME_
    AnyRefNode &Via1 = ....Abdominal.Layer_L2.BaseSegPosterior.LTptT12SacrumVia1NodeL;
    AnyRefNode &Via2 = ....Abdominal.Layer_L3.BaseSegPosterior.LTptT12SacrumVia2NodeL;
    AnyRefNode &Via3 = ....Abdominal.Layer_L4.BaseSegPosterior.LTptT12SacrumVia3NodeL;
    AnyRefNode &Via4 = ....Abdominal.Layer_L5.BaseSegPosterior.LTptT12SacrumVia4NodeL;
//    AnyRefNode &Via5 = ....Abdominal.Layer_L5.BaseSegPosterior.LTptT12SacrumVia5NodeL;
    #else
    AnyRefNode &Via1 = ....Segments.L1Seg.LTptT12SacrumVia1NodeL;
    AnyRefNode &Via2 = ....Segments.L2Seg.LTptT12SacrumVia2NodeL;
    AnyRefNode &Via3 = ....Segments.L3Seg.LTptT12SacrumVia3NodeL;
    AnyRefNode &Via4 = ....Segments.L4Seg.LTptT12SacrumVia4NodeL;
    AnyRefNode &Via5 = ....Segments.L5Seg.LTptT12SacrumVia5NodeL;
    #endif
    AnyRefNode &Ins = ....Segments.SacrumSeg.LTptT12SacrumNodeL;
    viewMuscle = {#include "../DrawSettings/MusDrawSettings.any"};
    viewForce.Visible ??= Off;
  };

  // Longissimus Thoracis - lateral part (attaching to ribs)
  AnyMuscleViaPoint LTptC3L3 = {
    AnyMuscleModel &MusMdl = ....MuscleModels.Left.LongissimusThoracis.LTptC3L3;
    AnyRefNode &Org = ....Segments.Left.R3Seg.LTptC3L3NodeL;
    AnyRefNode &Via1 = ....Segments.Left.R4Seg.LTptC3L3Via1NodeL;
    #ifndef LongissimusThoracis_ViaNodes_Ribs
    AnyRefNode &Via2 = ....Segments.T5Seg.LTptC3L3Via2NodeL;
    AnyRefNode &Via3 = ....Segments.T6Seg.LTptC3L3Via3NodeL;
    AnyRefNode &Via4 = ....Segments.T7Seg.LTptC3L3Via4NodeL;
    AnyRefNode &Via5 = ....Segments.T8Seg.LTptC3L3Via5NodeL;
    AnyRefNode &Via6 = ....Segments.T9Seg.LTptC3L3Via6NodeL;
    AnyRefNode &Via7 = ....Segments.T10Seg.LTptC3L3Via7NodeL;
    #else
    AnyRefNode &Via2 = ....Segments.Left.R5Seg.LTptC3L3Via2NodeL;
    AnyRefNode &Via3 = ....Segments.Left.R6Seg.LTptC3L3Via3NodeL;
    AnyRefNode &Via4 = ....Segments.Left.R7Seg.LTptC3L3Via4NodeL;
    AnyRefNode &Via5 = ....Segments.Left.R8Seg.LTptC3L3Via5NodeL;
    AnyRefNode &Via6 = ....Segments.Left.R9Seg.LTptC3L3Via6NodeL;
    AnyRefNode &Via7 = ....Segments.Left.R10Seg.LTptC3L3Via7NodeL;
    #endif
    AnyRefNode &Via8 = ....Segments.T11Seg.LTptC3L3Via8NodeL;
    AnyRefNode &Via9 = ....Segments.T12Seg.LTptC3L3Via9NodeL;
    AnyRefNode &Via10 = ....Segments.L1Seg.LTptC3L3Via10NodeL;
    AnyRefNode &Via11 = ....Segments.L2Seg.LTptC3L3Via11NodeL;
    AnyRefNode &Ins = ....Segments.L3Seg.LTptC3L3NodeL;
    viewMuscle = {#include "../DrawSettings/MusDrawSettings.any"};
    viewForce.Visible ??= Off;
  };
  AnyMuscleViaPoint LTptC4L4 = {
    AnyMuscleModel &MusMdl = ....MuscleModels.Left.LongissimusThoracis.LTptC4L4;
    AnyRefNode &Org = ....Segments.Left.R4Seg.LTptC4L4NodeL;
    AnyRefNode &Via1 = ....Segments.Left.R5Seg.LTptC4L4Via1NodeL;
    #ifndef LongissimusThoracis_ViaNodes_Ribs
    AnyRefNode &Via2 = ....Segments.T6Seg.LTptC4L4Via2NodeL;
    AnyRefNode &Via3 = ....Segments.T7Seg.LTptC4L4Via3NodeL;
    AnyRefNode &Via4 = ....Segments.T8Seg.LTptC4L4Via4NodeL;
    AnyRefNode &Via5 = ....Segments.T9Seg.LTptC4L4Via5NodeL;
    AnyRefNode &Via6 = ....Segments.T10Seg.LTptC4L4Via6NodeL;
    #else
    AnyRefNode &Via2 = ....Segments.Left.R6Seg.LTptC4L4Via2NodeL;
    AnyRefNode &Via3 = ....Segments.Left.R7Seg.LTptC4L4Via3NodeL;
    AnyRefNode &Via4 = ....Segments.Left.R8Seg.LTptC4L4Via4NodeL;
    AnyRefNode &Via5 = ....Segments.Left.R9Seg.LTptC4L4Via5NodeL;
    AnyRefNode &Via6 = ....Segments.Left.R10Seg.LTptC4L4Via6NodeL;
    #endif
    AnyRefNode &Via7 = ....Segments.T11Seg.LTptC4L4Via7NodeL;
    AnyRefNode &Via8 = ....Segments.T12Seg.LTptC4L4Via8NodeL;
    AnyRefNode &Via9 = ....Segments.L1Seg.LTptC4L4Via9NodeL;
    AnyRefNode &Via10 = ....Segments.L2Seg.LTptC4L4Via10NodeL;
    AnyRefNode &Via11 = ....Segments.L3Seg.LTptC4L4Via11NodeL;
    AnyRefNode &Ins = ....Segments.L4Seg.LTptC4L4NodeL;
    viewMuscle = {#include "../DrawSettings/MusDrawSettings.any"};
    viewForce.Visible ??= Off;
  };
  AnyMuscleViaPoint LTptC5L5 = {
    AnyMuscleModel &MusMdl = ....MuscleModels.Left.LongissimusThoracis.LTptC5L5;
    AnyRefNode &Org = ....Segments.Left.R5Seg.LTptC5L5NodeL;
    AnyRefNode &Via1 = ....Segments.Left.R6Seg.LTptC5L5Via1NodeL;
    #ifndef LongissimusThoracis_ViaNodes_Ribs
    AnyRefNode &Via2 = ....Segments.T7Seg.LTptC5L5Via2NodeL;
    AnyRefNode &Via3 = ....Segments.T8Seg.LTptC5L5Via3NodeL;
    AnyRefNode &Via4 = ....Segments.T9Seg.LTptC5L5Via4NodeL;
    AnyRefNode &Via5 = ....Segments.T10Seg.LTptC5L5Via5NodeL;
    #else
    AnyRefNode &Via2 = ....Segments.Left.R7Seg.LTptC5L5Via2NodeL;
    AnyRefNode &Via3 = ....Segments.Left.R8Seg.LTptC5L5Via3NodeL;
    AnyRefNode &Via4 = ....Segments.Left.R9Seg.LTptC5L5Via4NodeL;
    AnyRefNode &Via5 = ....Segments.Left.R10Seg.LTptC5L5Via5NodeL;
    #endif
    AnyRefNode &Via6 = ....Segments.T11Seg.LTptC5L5Via6NodeL;
    AnyRefNode &Via7 = ....Segments.T12Seg.LTptC5L5Via7NodeL;
    AnyRefNode &Via8 = ....Segments.L1Seg.LTptC5L5Via8NodeL;
    AnyRefNode &Via9 = ....Segments.L2Seg.LTptC5L5Via9NodeL;
    AnyRefNode &Via10 = ....Segments.L3Seg.LTptC5L5Via10NodeL;
    AnyRefNode &Via11 = ....Segments.L4Seg.LTptC5L5Via11NodeL;
    AnyRefNode &Ins = ....Segments.L5Seg.LTptC5L5NodeL;
    viewMuscle = {#include "../DrawSettings/MusDrawSettings.any"};
    viewForce.Visible ??= Off;
  };
  AnyMuscleViaPoint LTptC6S1 = {
    AnyMuscleModel &MusMdl = ....MuscleModels.Left.LongissimusThoracis.LTptC6S1;
    AnyRefNode &Org = ....Segments.Left.R6Seg.LTptC6S1NodeL;
    AnyRefNode &Via1 = ....Segments.Left.R7Seg.LTptC6S1Via1NodeL;
    #ifndef LongissimusThoracis_ViaNodes_Ribs
    AnyRefNode &Via2 = ....Segments.T8Seg.LTptC6S1Via2NodeL;
    AnyRefNode &Via3 = ....Segments.T9Seg.LTptC6S1Via3NodeL;
    AnyRefNode &Via4 = ....Segments.T10Seg.LTptC6S1Via4NodeL;
    #else
    AnyRefNode &Via2 = ....Segments.Left.R8Seg.LTptC6S1Via2NodeL;
    AnyRefNode &Via3 = ....Segments.Left.R9Seg.LTptC6S1Via3NodeL;
    AnyRefNode &Via4 = ....Segments.Left.R10Seg.LTptC6S1Via4NodeL;
    #endif
    AnyRefNode &Via5 = ....Segments.T11Seg.LTptC6S1Via5NodeL;
    AnyRefNode &Via6 = ....Segments.T12Seg.LTptC6S1Via6NodeL;
    AnyRefNode &Via7 = ....Segments.L1Seg.LTptC6S1Via7NodeL;
    AnyRefNode &Via8 = ....Segments.L2Seg.LTptC6S1Via8NodeL;
    AnyRefNode &Via9 = ....Segments.L3Seg.LTptC6S1Via9NodeL;
    AnyRefNode &Via10 = ....Segments.L4Seg.LTptC6S1Via10NodeL;
    AnyRefNode &Via11 = ....Segments.L5Seg.LTptC6S1Via11NodeL;
    AnyRefNode &Ins = ....Segments.SacrumSeg.LTptC6S1NodeL;
    viewMuscle = {#include "../DrawSettings/MusDrawSettings.any"};
    viewForce.Visible ??= Off;
  };
  AnyMuscleViaPoint LTptC7S2 = {
    AnyMuscleModel &MusMdl = ....MuscleModels.Left.LongissimusThoracis.LTptC7S2;
    AnyRefNode &Org = ....Segments.Left.R7Seg.LTptC7S2NodeL;
    AnyRefNode &Via1 = ....Segments.Left.R8Seg.LTptC7S2Via1NodeL;
    AnyRefNode &Via2 = ....Segments.Left.R9Seg.LTptC7S2Via2NodeL;
    AnyRefNode &Via3 = ....Segments.Left.R10Seg.LTptC7S2Via3NodeL;
   #ifndef LongissimusThoracis_ViaNodes_Ribs
    AnyRefNode &Via4 = ....Segments.T11Seg.LTptC7S2Via4NodeL;
    #else
    AnyRefNode &Via4 = ....Segments.Left.R11Seg.LTptC7S2Via4NodeL;
    #endif
    AnyRefNode &Via5 = ....Segments.T12Seg.LTptC7S2Via5NodeL;
    AnyRefNode &Via6 = ....Segments.L1Seg.LTptC7S2Via6NodeL;
    AnyRefNode &Via7 = ....Segments.L2Seg.LTptC7S2Via7NodeL;
    AnyRefNode &Via8 = ....Segments.L3Seg.LTptC7S2Via8NodeL;
    AnyRefNode &Via9 = ....Segments.L4Seg.LTptC7S2Via9NodeL;
    AnyRefNode &Via10 = ....Segments.L5Seg.LTptC7S2Via10NodeL;
    AnyRefNode &Ins = ....Segments.SacrumSeg.LTptC7S2NodeL;
    viewMuscle = {#include "../DrawSettings/MusDrawSettings.any"};
    viewForce.Visible ??= Off;
  };
  AnyMuscleViaPoint LTptC8S3 = {
    AnyMuscleModel &MusMdl = ....MuscleModels.Left.LongissimusThoracis.LTptC8S3;
    AnyRefNode &Org = ....Segments.Left.R8Seg.LTptC8S3NodeL;
    AnyRefNode &Via1 = ....Segments.Left.R9Seg.LTptC8S3Via1NodeL;
    AnyRefNode &Via2 = ....Segments.Left.R10Seg.LTptC8S3Via2NodeL;
    AnyRefNode &Via3 = ....Segments.Left.R11Seg.LTptC8S3Via3NodeL;
    #ifndef LongissimusThoracis_ViaNodes_Ribs
    AnyRefNode &Via4 = ....Segments.T12Seg.LTptC8S3Via4NodeL;
    #else
    AnyRefNode &Via4 = ....Segments.Left.R12Seg.LTptC8S3Via4NodeL;
    #endif
    AnyRefNode &Via5 = ....Segments.L1Seg.LTptC8S3Via5NodeL;
    AnyRefNode &Via6 = ....Segments.L2Seg.LTptC8S3Via6NodeL;
    AnyRefNode &Via7 = ....Segments.L3Seg.LTptC8S3Via7NodeL;
    AnyRefNode &Via8 = ....Segments.L4Seg.LTptC8S3Via8NodeL;
    AnyRefNode &Via9 = ....Segments.L5Seg.LTptC8S3Via9NodeL;
    AnyRefNode &Ins = ....Segments.SacrumSeg.LTptC8S3NodeL;
    viewMuscle = {#include "../DrawSettings/MusDrawSettings.any"};
    viewForce.Visible ??= Off;
  };
  AnyMuscleViaPoint LTptC9S4 = {
    AnyMuscleModel &MusMdl = ....MuscleModels.Left.LongissimusThoracis.LTptC9S4;
    AnyRefNode &Org = ....Segments.Left.R9Seg.LTptC9S4NodeL;
    AnyRefNode &Via1 = ....Segments.Left.R10Seg.LTptC9S4Via1NodeL;
    AnyRefNode &Via2 = ....Segments.Left.R11Seg.LTptC9S4Via2NodeL;
    #ifndef LongissimusThoracis_ViaNodes_Ribs
    AnyRefNode &Via3 = ....Segments.T12Seg.LTptC9S4Via3NodeL;
    #else
    AnyRefNode &Via3 = ....Segments.Left.R12Seg.LTptC9S4Via3NodeL;
    #endif
    AnyRefNode &Via4 = ....Segments.L1Seg.LTptC9S4Via4NodeL;
    AnyRefNode &Via5 = ....Segments.L2Seg.LTptC9S4Via5NodeL;
    AnyRefNode &Via6 = ....Segments.L3Seg.LTptC9S4Via6NodeL;
    AnyRefNode &Via7 = ....Segments.L4Seg.LTptC9S4Via7NodeL;
    AnyRefNode &Via8 = ....Segments.L5Seg.LTptC9S4Via8NodeL;
    AnyRefNode &Ins = ....Segments.SacrumSeg.LTptC9S4NodeL;
    viewMuscle = {#include "../DrawSettings/MusDrawSettings.any"};
    viewForce.Visible ??= Off;
  };
  AnyMuscleViaPoint LTptC10Sacrum = {
    AnyMuscleModel &MusMdl = ....MuscleModels.Left.LongissimusThoracis.LTptC10Sacrum;
    AnyRefNode &Org = ....Segments.Left.R10Seg.LTptC10SacrumNodeL;
    AnyRefNode &Via1 = ....Segments.Left.R11Seg.LTptC10SacrumVia1NodeL;
    #if BM_TRUNK_CAVITY_MODEL == _CAVITY_MODEL_VOLUME_
    AnyRefNode &Via2 = ....Abdominal.Layer_L1.BaseSegPosterior.LTptC10SacrumVia2NodeL;
    AnyRefNode &Via3 = ....Abdominal.Layer_L2.BaseSegPosterior.LTptC10SacrumVia3NodeL;
    AnyRefNode &Via4 = ....Abdominal.Layer_L3.BaseSegPosterior.LTptC10SacrumVia4NodeL;
    AnyRefNode &Via5 = ....Abdominal.Layer_L4.BaseSegPosterior.LTptC10SacrumVia5NodeL;
    AnyRefNode &Via6 = ....Abdominal.Layer_L5.BaseSegPosterior.LTptC10SacrumVia6NodeL;
//    AnyRefNode &Via7 = ....Abdominal.Layer_L5.BaseSegPosterior.LTptC10SacrumVia7NodeL;
    #else
    AnyRefNode &Via2 = ....Segments.Left.R12Seg.LTptC10SacrumVia2NodeL;
    AnyRefNode &Via3 = ....Segments.L1Seg.LTptC10SacrumVia3NodeL;
    AnyRefNode &Via4 = ....Segments.L2Seg.LTptC10SacrumVia4NodeL;
    AnyRefNode &Via5 = ....Segments.L3Seg.LTptC10SacrumVia5NodeL;
    AnyRefNode &Via6 = ....Segments.L4Seg.LTptC10SacrumVia6NodeL;
    AnyRefNode &Via7 = ....Segments.L5Seg.LTptC10SacrumVia7NodeL;
    #endif
    AnyRefNode &Ins = ....Segments.SacrumSeg.LTptC10SacrumNodeL;
    viewMuscle = {#include "../DrawSettings/MusDrawSettings.any"};
    viewForce.Visible ??= Off;
  };
  AnyMuscleViaPoint LTptC11Sacrum = {
    AnyMuscleModel &MusMdl = ....MuscleModels.Left.LongissimusThoracis.LTptC11Sacrum;
    AnyRefNode &Org = ....Segments.Left.R11Seg.LTptC11SacrumNodeL;
    #if BM_TRUNK_CAVITY_MODEL == _CAVITY_MODEL_VOLUME_
    AnyRefNode &Via1 = ....Abdominal.Layer_L1.BaseSegPosterior.LTptC11SacrumVia1NodeL;
    AnyRefNode &Via2 = ....Abdominal.Layer_L2.BaseSegPosterior.LTptC11SacrumVia2NodeL;
    AnyRefNode &Via3 = ....Abdominal.Layer_L3.BaseSegPosterior.LTptC11SacrumVia3NodeL;
    AnyRefNode &Via4 = ....Abdominal.Layer_L4.BaseSegPosterior.LTptC11SacrumVia4NodeL;
    AnyRefNode &Via5 = ....Abdominal.Layer_L5.BaseSegPosterior.LTptC11SacrumVia5NodeL;
//    AnyRefNode &Via6 = ....Abdominal.Layer_L5.BaseSegPosterior.LTptC11SacrumVia6NodeL;
    #else
    AnyRefNode &Via1 = ....Segments.Left.R12Seg.LTptC11SacrumVia1NodeL;
    AnyRefNode &Via2 = ....Segments.L1Seg.LTptC11SacrumVia2NodeL;
    AnyRefNode &Via3 = ....Segments.L2Seg.LTptC11SacrumVia3NodeL;
    AnyRefNode &Via4 = ....Segments.L3Seg.LTptC11SacrumVia4NodeL;
    AnyRefNode &Via5 = ....Segments.L4Seg.LTptC11SacrumVia5NodeL;
    AnyRefNode &Via6 = ....Segments.L5Seg.LTptC11SacrumVia6NodeL;
    #endif
    AnyRefNode &Ins = ....Segments.SacrumSeg.LTptC11SacrumNodeL;
    viewMuscle = {#include "../DrawSettings/MusDrawSettings.any"};
    viewForce.Visible ??= Off;
  };
  AnyMuscleViaPoint LTptC12Sacrum = {
    AnyMuscleModel &MusMdl = ....MuscleModels.Left.LongissimusThoracis.LTptC12Sacrum;
    AnyRefNode &Org = ....Segments.Left.R12Seg.LTptC12SacrumNodeL;
    #if BM_TRUNK_CAVITY_MODEL == _CAVITY_MODEL_VOLUME_
    AnyRefNode &Via1 = ....Abdominal.Layer_L2.BaseSegPosterior.LTptC12SacrumVia1NodeL;
    AnyRefNode &Via2 = ....Abdominal.Layer_L3.BaseSegPosterior.LTptC12SacrumVia2NodeL;
    AnyRefNode &Via3 = ....Abdominal.Layer_L4.BaseSegPosterior.LTptC12SacrumVia3NodeL;
    AnyRefNode &Via4 = ....Abdominal.Layer_L5.BaseSegPosterior.LTptC12SacrumVia4NodeL;
//    AnyRefNode &Via5 = ....Abdominal.Layer_L5.BaseSegPosterior.LTptC12SacrumVia5NodeL;
    #else
    AnyRefNode &Via1 = ....Segments.L1Seg.LTptC12SacrumVia1NodeL;
    AnyRefNode &Via2 = ....Segments.L2Seg.LTptC12SacrumVia2NodeL;
    AnyRefNode &Via3 = ....Segments.L3Seg.LTptC12SacrumVia3NodeL;
    AnyRefNode &Via4 = ....Segments.L4Seg.LTptC12SacrumVia4NodeL;
    AnyRefNode &Via5 = ....Segments.L5Seg.LTptC12SacrumVia5NodeL;
    #endif
    AnyRefNode &Ins = ....Segments.SacrumSeg.LTptC12SacrumNodeL;
    viewMuscle = {#include "../DrawSettings/MusDrawSettings.any"};
    viewForce.Visible ??= Off;
  };
  // End of Longissimus thoracis part thoracis
};

MuscleGroup LongusCapitis = {
  AnyMuscleViaPoint LongusCapitisC6C0 = {
    AnyMuscleModel &MusMdl = ....MuscleModels.Left.LongusCapitis.LongusCapitisC6C0;
    AnyRefNode &Org = ....Segments.C6Seg.LongusCapitisC6C0NodeL;
    AnyRefNode &Ins = ....Segments.SkullSeg.LongusCapitisC0NodeL;
    viewMuscle = {#include "../DrawSettings/MusDrawSettings.any"};
    viewForce.Visible ??= Off;
  };

  AnyMuscleViaPoint LongusCapitisC5C0 = {
    AnyMuscleModel &MusMdl = ....MuscleModels.Left.LongusCapitis.LongusCapitisC5C0;
    AnyRefNode &Org = ....Segments.C5Seg.LongusCapitisC5C0NodeL;
    AnyRefNode &Ins = ....Segments.SkullSeg.LongusCapitisC0NodeL;
    viewMuscle = {#include "../DrawSettings/MusDrawSettings.any"};
    viewForce.Visible ??= Off;
  };

  AnyMuscleViaPoint LongusCapitisC4C0 = {
    AnyMuscleModel &MusMdl = ....MuscleModels.Left.LongusCapitis.LongusCapitisC4C0;
    AnyRefNode &Org = ....Segments.C4Seg.LongusCapitisC4C0NodeL;
    AnyRefNode &Ins = ....Segments.SkullSeg.LongusCapitisC0NodeL;
    viewMuscle = {#include "../DrawSettings/MusDrawSettings.any"};
    viewForce.Visible ??= Off;
  };

  AnyMuscleViaPoint LongusCapitisC3C0 = {
    AnyMuscleModel &MusMdl = ....MuscleModels.Left.LongusCapitis.LongusCapitisC3C0;
    AnyRefNode &Org = ....Segments.C3Seg.LongusCapitisC3C0NodeL;
    AnyRefNode &Ins = ....Segments.SkullSeg.LongusCapitisC0NodeL;
    viewMuscle = {#include "../DrawSettings/MusDrawSettings.any"};
    viewForce.Visible ??= Off;
  };
};

MuscleGroup LongusColli = {
  // LongusColliVertical
  AnyMuscleViaPoint LongusColliT3C6 = {
    AnyMuscleModel &MusMdl = ....MuscleModels.Left.LongusColli.LongusColliT3C6;
    AnyRefNode &Org = ....Segments.T3Seg.Left.LongusColliT3C6Node;
    AnyRefNode &Via1 = ....Segments.T2Seg.Left.LongusColliT3C6Node;
    AnyRefNode &Via2 = ....Segments.T1Seg.Left.LongusColliT3C6Node;
    AnyRefNode &Via3 = ....Segments.C7Seg.Left.LongusColliT3C6Node;
    AnyRefNode &Ins = ....Segments.C6Seg.Left.LongusColliT3C6Node;
    viewMuscle = {#include "../DrawSettings/MusDrawSettings.any"};
    viewForce.Visible ??= Off;
  };
  AnyMuscleViaPoint LongusColliT2C5 = {
    AnyMuscleModel &MusMdl = ....MuscleModels.Left.LongusColli.LongusColliT2C5;
    AnyRefNode &Org = ....Segments.T2Seg.Left.LongusColliT2C5Node;
    AnyRefNode &Via1 = ....Segments.T1Seg.Left.LongusColliT2C5Node;
    AnyRefNode &Via2 = ....Segments.C7Seg.Left.LongusColliT2C5Node;
    AnyRefNode &Via3 = ....Segments.C6Seg.Left.LongusColliT2C5Node;
    AnyRefNode &Ins = ....Segments.C5Seg.Left.LongusColliT2C5Node;
    viewMuscle = {#include "../DrawSettings/MusDrawSettings.any"};
    viewForce.Visible ??= Off;
  };
  AnyMuscleViaPoint LongusColliT2C3 = {
    AnyMuscleModel &MusMdl = ....MuscleModels.Left.LongusColli.LongusColliT2C3;
    AnyRefNode &Org = ....Segments.T2Seg.Left.LongusColliT2C5Node;
    AnyRefNode &Via1 = ....Segments.T1Seg.Left.LongusColliT1C4Node;
    AnyRefNode &Via2 = ....Segments.C7Seg.Left.LongusColliT1C4Node;
    AnyRefNode &Via3 = ....Segments.C6Seg.Left.LongusColliT1C4Node;
    AnyRefNode &Via4 = ....Segments.C5Seg.Left.LongusColliT1C4Node;
    AnyRefNode &Via5 = ....Segments.C4Seg.Left.LongusColliC7C3Node;
    AnyRefNode &Ins = ....Segments.C3Seg.Left.LongusColliC7C3Node;
    viewMuscle = {#include "<ANYBODY_PATH_BODY>/drawSettings/MusDrawSettings.any"};
    viewForce.Visible ??= Off;
  };
  AnyMuscleViaPoint LongusColliT2C2 = {
    AnyMuscleModel &MusMdl = ....MuscleModels.Left.LongusColli.LongusColliT2C2;
    AnyRefNode &Org = ....Segments.T2Seg.Left.LongusColliT2C5Node;
    AnyRefNode &Via1 = ....Segments.T1Seg.Left.LongusColliT1C4Node;
    AnyRefNode &Via2 = ....Segments.C7Seg.Left.LongusColliT1C4Node;
    AnyRefNode &Via3 = ....Segments.C6Seg.Left.LongusColliT1C4Node;
    AnyRefNode &Via4 = ....Segments.C5Seg.Left.LongusColliT1C4Node;
    AnyRefNode &Via5 = ....Segments.C4Seg.Left.LongusColliC7C3Node;
    AnyRefNode &Via6 = ....Segments.C3Seg.Left.LongusColliC7C3Node;
    AnyRefNode &Ins = ....Segments.C2Seg.Left.LongusColliC6C2Node;
    viewMuscle = {#include "<ANYBODY_PATH_BODY>/drawSettings/MusDrawSettings.any"};
    viewForce.Visible ??= Off;
  };
  AnyMuscleViaPoint LongusColliT1C4 = {
    AnyMuscleModel &MusMdl = ....MuscleModels.Left.LongusColli.LongusColliT1C4;
    AnyRefNode &Org = ....Segments.T1Seg.Left.LongusColliT1C4Node;
    AnyRefNode &Via1 = ....Segments.C7Seg.Left.LongusColliT1C4Node;
    AnyRefNode &Via2 = ....Segments.C6Seg.Left.LongusColliT1C4Node;
    AnyRefNode &Via3 = ....Segments.C5Seg.Left.LongusColliT1C4Node;
    AnyRefNode &Ins = ....Segments.C4Seg.Left.LongusColliT1C4Node;
    viewMuscle = {#include "../DrawSettings/MusDrawSettings.any"};
    viewForce.Visible ??= Off;
  };
  AnyMuscleViaPoint LongusColliT1C3 = {
    AnyMuscleModel &MusMdl = ....MuscleModels.Left.LongusColli.LongusColliT1C3;
    AnyRefNode &Org = ....Segments.T1Seg.Left.LongusColliT1C4Node;
    AnyRefNode &Via1 = ....Segments.C7Seg.Left.LongusColliT1C4Node;
    AnyRefNode &Via2 = ....Segments.C6Seg.Left.LongusColliT1C4Node;
    AnyRefNode &Via3 = ....Segments.C5Seg.Left.LongusColliT1C4Node;
    AnyRefNode &Via4 = ....Segments.C4Seg.Left.LongusColliC7C3Node;
    AnyRefNode &Ins = ....Segments.C3Seg.Left.LongusColliC7C3Node;
    viewMuscle = {#include "<ANYBODY_PATH_BODY>/drawSettings/MusDrawSettings.any"};
    viewForce.Visible ??= Off;
  };
  AnyMuscleViaPoint LongusColliT1C2 = {
    AnyMuscleModel &MusMdl = ....MuscleModels.Left.LongusColli.LongusColliT1C2;
    AnyRefNode &Org = ....Segments.T1Seg.Left.LongusColliT1C4Node;
    AnyRefNode &Via1 = ....Segments.C7Seg.Left.LongusColliT1C4Node;
    AnyRefNode &Via2 = ....Segments.C6Seg.Left.LongusColliT1C4Node;
    AnyRefNode &Via3 = ....Segments.C5Seg.Left.LongusColliT1C4Node;
    AnyRefNode &Via4 = ....Segments.C4Seg.Left.LongusColliC7C3Node;
    AnyRefNode &Via5 = ....Segments.C3Seg.Left.LongusColliC7C3Node;
    AnyRefNode &Ins = ....Segments.C2Seg.Left.LongusColliC6C2Node;
    viewMuscle = {#include "<ANYBODY_PATH_BODY>/drawSettings/MusDrawSettings.any"};
    viewForce.Visible ??= Off;
  };
  AnyMuscleViaPoint LongusColliC7C3 = {
    AnyMuscleModel &MusMdl = ....MuscleModels.Left.LongusColli.LongusColliC7C3;
    AnyRefNode &Org = ....Segments.C7Seg.Left.LongusColliC7C3Node;
    AnyRefNode &Via1 = ....Segments.C6Seg.Left.LongusColliC7C3Node;
    AnyRefNode &Via2 = ....Segments.C5Seg.Left.LongusColliC7C3Node;
    AnyRefNode &Via3 = ....Segments.C4Seg.Left.LongusColliC7C3Node;
    AnyRefNode &Ins = ....Segments.C3Seg.Left.LongusColliC7C3Node;
    viewMuscle = {#include "../DrawSettings/MusDrawSettings.any"};
    viewForce.Visible ??= Off;
  };
  AnyMuscleViaPoint LongusColliC6C2 = {
    AnyMuscleModel &MusMdl = ....MuscleModels.Left.LongusColli.LongusColliC6C2;
    AnyRefNode &Org = ....Segments.C6Seg.Left.LongusColliC6C2Node;
    AnyRefNode &Via1 = ....Segments.C5Seg.Left.LongusColliC6C2Node;
    AnyRefNode &Via2 = ....Segments.C4Seg.Left.LongusColliC6C2Node;
    AnyRefNode &Via3 = ....Segments.C3Seg.Left.LongusColliC6C2Node;
    AnyRefNode &Ins = ....Segments.C2Seg.Left.LongusColliC6C2Node;
    viewMuscle = {#include "../DrawSettings/MusDrawSettings.any"};
    viewForce.Visible ??= Off;
  };
  AnyMuscleViaPoint LongusColliC5C1 = {
    AnyMuscleModel &MusMdl = ....MuscleModels.Left.LongusColli.LongusColliC5C1;
    AnyRefNode &Org = ....Segments.C5Seg.Left.LongusColliC5C1Node;
    AnyRefNode &Via1 = ....Segments.C4Seg.Left.LongusColliC5C1Node;
    AnyRefNode &Via2 = ....Segments.C3Seg.Left.LongusColliC5C1Node;
    AnyRefNode &Via3 = ....Segments.C2Seg.Left.LongusColliC5C1Node;
    AnyRefNode &Ins = ....Segments.C1Seg.Left.LongusColliC5C1Node;
    viewMuscle = {#include "../DrawSettings/MusDrawSettings.any"};
    viewForce.Visible ??= Off;
  };
  // LongusColliSuperiorOblique
  AnyMuscleViaPoint LongusColliSuperiorObliqueC3C1 = {
    AnyMuscleModel &MusMdl = ....MuscleModels.Left.LongusColli.LongusColliSuperiorObliqueC3C1;
    AnyRefNode &Org = ....Segments.C3Seg.LongusCapitisC3C0NodeL;
    AnyRefNode &Ins = ....Segments.C1Seg.Left.LongusColliC5C1Node;
    viewMuscle = {#include "<ANYBODY_PATH_BODY>/drawSettings/MusDrawSettings.any"};
    viewForce.Visible ??= Off;
  };
  AnyMuscleViaPoint LongusColliSuperiorObliqueC4C1 = {
    AnyMuscleModel &MusMdl = ....MuscleModels.Left.LongusColli.LongusColliSuperiorObliqueC4C1;
    AnyRefNode &Org = ....Segments.C4Seg.LongusCapitisC4C0NodeL;
    AnyRefNode &Ins = ....Segments.C1Seg.Left.LongusColliC5C1Node;
    viewMuscle = {#include "<ANYBODY_PATH_BODY>/drawSettings/MusDrawSettings.any"};
    viewForce.Visible ??= Off;
  };
  AnyMuscleViaPoint LongusColliSuperiorObliqueC5C1 = {
    AnyMuscleModel &MusMdl = ....MuscleModels.Left.LongusColli.LongusColliSuperiorObliqueC5C1;
    AnyRefNode &Org = ....Segments.C5Seg.LongusCapitisC5C0NodeL;
    AnyRefNode &Ins = ....Segments.C1Seg.Left.LongusColliC5C1Node;
    viewMuscle = {#include "<ANYBODY_PATH_BODY>/drawSettings/MusDrawSettings.any"};
    viewForce.Visible ??= Off;
  };
  AnyMuscleViaPoint LongusColliSuperiorObliqueC4C2 = {
    AnyMuscleModel &MusMdl = ....MuscleModels.Left.LongusColli.LongusColliSuperiorObliqueC4C2;
    AnyRefNode &Org = ....Segments.C4Seg.LongusCapitisC4C0NodeL;
    AnyRefNode &Ins = ....Segments.C2Seg.Left.LongusColliC6C2Node;
    viewMuscle = {#include "<ANYBODY_PATH_BODY>/drawSettings/MusDrawSettings.any"};
    viewForce.Visible ??= Off;
  };
  AnyMuscleViaPoint LongusColliSuperiorObliqueC5C2 = {
    AnyMuscleModel &MusMdl = ....MuscleModels.Left.LongusColli.LongusColliSuperiorObliqueC5C2;
    AnyRefNode &Org = ....Segments.C5Seg.LongusCapitisC5C0NodeL;
    AnyRefNode &Ins = ....Segments.C2Seg.Left.LongusColliC6C2Node;
    viewMuscle = {#include "<ANYBODY_PATH_BODY>/drawSettings/MusDrawSettings.any"};
    viewForce.Visible ??= Off;
  };
  AnyMuscleViaPoint LongusColliSuperiorObliqueC6C2 = {
    AnyMuscleModel &MusMdl = ....MuscleModels.Left.LongusColli.LongusColliSuperiorObliqueC6C2;
    AnyRefNode &Org = ....Segments.C6Seg.LongusCapitisC6C0NodeL;
    AnyRefNode &Ins = ....Segments.C2Seg.Left.LongusColliC6C2Node;
    viewMuscle = {#include "<ANYBODY_PATH_BODY>/drawSettings/MusDrawSettings.any"};
    viewForce.Visible ??= Off;
  };
  AnyMuscleViaPoint LongusColliSuperiorObliqueC6C3 = {
    AnyMuscleModel &MusMdl = ....MuscleModels.Left.LongusColli.LongusColliSuperiorObliqueC6C3;
    AnyRefNode &Org = ....Segments.C6Seg.LongusCapitisC6C0NodeL;
    AnyRefNode &Ins = ....Segments.C3Seg.Left.LongusColliC7C3Node;
    viewMuscle = {#include "<ANYBODY_PATH_BODY>/drawSettings/MusDrawSettings.any"};
    viewForce.Visible ??= Off;
  };

  // LongusColliInferiorOblique
  AnyMuscleViaPoint LongusColliInferiorObliqueT1C6 = {
    AnyMuscleModel &MusMdl = ....MuscleModels.Left.LongusColli.LongusColliInferiorObliqueT1C6;
    AnyRefNode &Org = ....Segments.T1Seg.Left.LongusColliT1C4Node;
    AnyRefNode &Ins = ....Segments.C6Seg.LongusCapitisC6C0NodeL;
    viewMuscle = {#include "<ANYBODY_PATH_BODY>/drawSettings/MusDrawSettings.any"};
    viewForce.Visible ??= Off;
  };
  AnyMuscleViaPoint LongusColliInferiorObliqueT2C6 = {
    AnyMuscleModel &MusMdl = ....MuscleModels.Left.LongusColli.LongusColliInferiorObliqueT2C6;
    AnyRefNode &Org = ....Segments.T2Seg.Left.LongusColliT2C5Node;
    AnyRefNode &Ins = ....Segments.C6Seg.LongusCapitisC6C0NodeL;
    viewMuscle = {#include "<ANYBODY_PATH_BODY>/drawSettings/MusDrawSettings.any"};
    viewForce.Visible ??= Off;
  };
  AnyMuscleViaPoint LongusColliInferiorObliqueT2C5 = {
    AnyMuscleModel &MusMdl = ....MuscleModels.Left.LongusColli.LongusColliInferiorObliqueT2C5;
    AnyRefNode &Org = ....Segments.T2Seg.Left.LongusColliT2C5Node;
    AnyRefNode &Ins = ....Segments.C5Seg.LongusCapitisC5C0NodeL;
    viewMuscle = {#include "<ANYBODY_PATH_BODY>/drawSettings/MusDrawSettings.any"};
    viewForce.Visible ??= Off;
  };
};

MuscleGroup MultifidusCervicis = {
  AnyMuscleViaPoint MultifidusCervicisC5C2 = {
    AnyMuscleModel &MusMdl = ....MuscleModels.Left.MultifidusCervicis.MultifidusCervicisC5C2;
    AnyRefNode &Org = ....Segments.C5Seg.MultifidusCervicisC5C2NodeL;
    AnyRefNode &Ins = ....Segments.C2Seg.MultifidusCervicisC2NodeL;
    viewMuscle = {#include "../DrawSettings/MusDrawSettings.any"};
    viewForce.Visible ??= Off;
  };

  AnyMuscleViaPoint MultifidusCervicisC6C2 = {
    AnyMuscleModel &MusMdl = ....MuscleModels.Left.MultifidusCervicis.MultifidusCervicisC6C2;
    AnyRefNode &Org = ....Segments.C6Seg.MultifidusCervicisC6C2NodeL;
    AnyRefNode &Ins = ....Segments.C2Seg.MultifidusCervicisC2NodeL;
    viewMuscle = {#include "../DrawSettings/MusDrawSettings.any"};
    viewForce.Visible ??= Off;
  };

  AnyMuscleViaPoint MultifidusCervicisC6C3 = {
    AnyMuscleModel &MusMdl = ....MuscleModels.Left.MultifidusCervicis.MultifidusCervicisC6C3;
    AnyRefNode &Org = ....Segments.C6Seg.MultifidusCervicisC6C2NodeL;
    AnyRefNode &Ins = ....Segments.C3Seg.MultifidusCervicisC3NodeL;
    viewMuscle = {#include "../DrawSettings/MusDrawSettings.any"};
    viewForce.Visible ??= Off;
  };

  AnyMuscleViaPoint MultifidusCervicisC7C3 = {
    AnyMuscleModel &MusMdl = ....MuscleModels.Left.MultifidusCervicis.MultifidusCervicisC7C3;
    AnyRefNode &Org = ....Segments.C7Seg.MultifidusCervicisC7C3NodeL;
    AnyRefNode &Ins = ....Segments.C3Seg.MultifidusCervicisC3NodeL;
    viewMuscle = {#include "../DrawSettings/MusDrawSettings.any"};
    viewForce.Visible ??= Off;
  };

  AnyMuscleViaPoint MultifidusCervicisC7C4 = {
    AnyMuscleModel &MusMdl = ....MuscleModels.Left.MultifidusCervicis.MultifidusCervicisC7C4;
    AnyRefNode &Org = ....Segments.C7Seg.MultifidusCervicisC7C4NodeL;
    AnyRefNode &Ins = ....Segments.C4Seg.MultifidusCervicisC4NodeL;
    viewMuscle = {#include "../DrawSettings/MusDrawSettings.any"};
    viewForce.Visible ??= Off;
  };

  AnyMuscleViaPoint MultifidusCervicisT1C4 = {
    AnyMuscleModel &MusMdl = ....MuscleModels.Left.MultifidusCervicis.MultifidusCervicisT1C4;
    AnyRefNode &Org = ....Segments.T1Seg.MultifidusCervicisT1C4NodeL;
    AnyRefNode &Ins = ....Segments.C4Seg.MultifidusCervicisC4NodeL;
    viewMuscle = {#include "../DrawSettings/MusDrawSettings.any"};
    viewForce.Visible ??= Off;
  };

  AnyMuscleViaPoint MultifidusCervicisT1C5 = {
    AnyMuscleModel &MusMdl = ....MuscleModels.Left.MultifidusCervicis.MultifidusCervicisT1C5;
    AnyRefNode &Org = ....Segments.T1Seg.MultifidusCervicisT1C5NodeL;
    AnyRefNode &Ins = ....Segments.C5Seg.MultifidusCervicisC5NodeL;
    viewMuscle = {#include "../DrawSettings/MusDrawSettings.any"};
    viewForce.Visible ??= Off;
  };

  AnyMuscleViaPoint MultifidusCervicisT2C5 = {
    AnyMuscleModel &MusMdl = ....MuscleModels.Left.MultifidusCervicis.MultifidusCervicisT2C5;
    AnyRefNode &Org = ....Segments.T2Seg.MultifidusCervicisT2C5NodeL;
    AnyRefNode &Ins = ....Segments.C5Seg.MultifidusCervicisC5NodeL;
    viewMuscle = {#include "../DrawSettings/MusDrawSettings.any"};
    viewForce.Visible ??= Off;
  };

  AnyMuscleViaPoint MultifidusCervicisT2C6 = {
    AnyMuscleModel &MusMdl = ....MuscleModels.Left.MultifidusCervicis.MultifidusCervicisT2C6;
    AnyRefNode &Org = ....Segments.T2Seg.MultifidusCervicisT2C6NodeL;
    AnyRefNode &Ins = ....Segments.C6Seg.MultifidusCervicisC6NodeL;
    viewMuscle = {#include "../DrawSettings/MusDrawSettings.any"};
    viewForce.Visible ??= Off;
  };

  AnyMuscleViaPoint MultifidusCervicisT3C6 = {
    AnyMuscleModel &MusMdl = ....MuscleModels.Left.MultifidusCervicis.MultifidusCervicisT3C6;
    AnyRefNode &Org = ....Segments.T3Seg.MultifidusCervicisT3C6NodeL;
    AnyRefNode &Ins = ....Segments.C6Seg.MultifidusCervicisC6NodeL;
    viewMuscle = {#include "../DrawSettings/MusDrawSettings.any"};
    viewForce.Visible ??= Off;
  };

  AnyMuscleViaPoint MultifidusCervicisT3C7 = {
    AnyMuscleModel &MusMdl = ....MuscleModels.Left.MultifidusCervicis.MultifidusCervicisT3C7;
    AnyRefNode &Org = ....Segments.T3Seg.MultifidusCervicisT3C7NodeL;
    AnyRefNode &Ins = ....Segments.C7Seg.MultifidusCervicisC7NodeL;
    viewMuscle = {#include "../DrawSettings/MusDrawSettings.any"};
    viewForce.Visible ??= Off;
  };

  AnyMuscleViaPoint MultifidusCervicisT4C7 = {
    AnyMuscleModel &MusMdl = ....MuscleModels.Left.MultifidusCervicis.MultifidusCervicisT4C7;
    AnyRefNode &Org = ....Segments.T4Seg.MultifidusCervicisT4C7NodeL;
    AnyRefNode &Ins = ....Segments.C7Seg.MultifidusCervicisC7NodeL;
    viewMuscle = {#include "../DrawSettings/MusDrawSettings.any"};
    viewForce.Visible ??= Off;
  };
};

MuscleGroup MultifidusLumborum = {
  AnyMuscleViaPoint MFdL1L3 = {
    AnyMuscleModel &MusMdl = ....MuscleModels.Left.Multifidi.MFdL1L3;
    AnyRefNode &Org = ....Segments.L1Seg.MFdL1L3NodeL;
    AnyRefNode &Ins = ....Segments.L3Seg.MFdL1L3NodeL;
    viewMuscle = {#include "../DrawSettings/MusDrawSettings.any"};
    viewForce.Visible ??= Off;
  };

  AnyMuscleViaPoint MFdL2L4 = {
    AnyMuscleModel &MusMdl = ....MuscleModels.Left.Multifidi.MFdL2L4;
    AnyRefNode &Org = ....Segments.L2Seg.MFdL2L4NodeL;
    AnyRefNode &Ins = ....Segments.L4Seg.MFdL2L4NodeL;
    viewMuscle = {#include "../DrawSettings/MusDrawSettings.any"};
    viewForce.Visible ??= Off;
  };

  AnyMuscleViaPoint MFdL3L5 = {
    AnyMuscleModel &MusMdl = ....MuscleModels.Left.Multifidi.MFdL3L5;
    AnyRefNode &Org = ....Segments.L3Seg.MFdL3L5NodeL;
    AnyRefNode &Ins = ....Segments.L5Seg.MFdL3L5NodeL;
    viewMuscle = {#include "../DrawSettings/MusDrawSettings.any"};
    viewForce.Visible ??= Off;
  };

  AnyMuscleViaPoint MFdL4S1 = {
    AnyMuscleModel &MusMdl = ....MuscleModels.Left.Multifidi.MFdL4S1;
    AnyRefNode &Org = ....Segments.L4Seg.MFdL4S1NodeL;
    AnyRefNode &Ins = ....Segments.SacrumSeg.MFdL4S1NodeL;
    viewMuscle = {#include "../DrawSettings/MusDrawSettings.any"};
    viewForce.Visible ??= Off;
  };

  AnyMuscleViaPoint MFdL5S1 = {
    AnyMuscleModel &MusMdl = ....MuscleModels.Left.Multifidi.MFdL5S1;
    AnyRefNode &Org = ....Segments.L5Seg.MFdL5S1NodeL;
    AnyRefNode &Ins = ....Segments.SacrumSeg.MFdL5S1NodeL;
    viewMuscle = {#include "../DrawSettings/MusDrawSettings.any"};
    viewForce.Visible ??= Off;
  };

  AnyMuscleViaPoint MFmL1L4 = {
    AnyMuscleModel &MusMdl = ....MuscleModels.Left.Multifidi.MFmL1L4;
    AnyRefNode &Org = ....Segments.L1Seg.MFmL1L4NodeL;
    AnyRefNode &Ins = ....Segments.L4Seg.MFmL1L4NodeL;
    viewMuscle = {#include "../DrawSettings/MusDrawSettings.any"};
    viewForce.Visible ??= Off;
  };

  AnyMuscleViaPoint MFmL2L5 = {
    AnyMuscleModel &MusMdl = ....MuscleModels.Left.Multifidi.MFmL2L5;
    AnyRefNode &Org = ....Segments.L2Seg.MFmL2L5NodeL;
    AnyRefNode &Ins = ....Segments.L5Seg.MFmL2L5NodeL;
    viewMuscle = {#include "../DrawSettings/MusDrawSettings.any"};
    viewForce.Visible ??= Off;
  };

  AnyMuscleViaPoint MFmL3S1 = {
    AnyMuscleModel &MusMdl = ....MuscleModels.Left.Multifidi.MFmL3S1;
    AnyRefNode &Org = ....Segments.L3Seg.MFmL3S1NodeL;
    AnyRefNode &Ins = ....Segments.SacrumSeg.MFmL3S1NodeL;
    viewMuscle = {#include "../DrawSettings/MusDrawSettings.any"};
    viewForce.Visible ??= Off;
  };

  AnyMuscleViaPoint MFmL4Sacrum = {
    AnyMuscleModel &MusMdl = ....MuscleModels.Left.Multifidi.MFmL4Sacrum;
    AnyRefNode &Org = ....Segments.L4Seg.MFmL4SacrumNodeL;
    AnyRefNode &Ins = ....Segments.SacrumSeg.MFmL4SacrumNodeL;
    viewMuscle = {#include "../DrawSettings/MusDrawSettings.any"};
    viewForce.Visible ??= Off;
  };

  AnyMuscleViaPoint MFmL5Sacrum = {
    AnyMuscleModel &MusMdl = ....MuscleModels.Left.Multifidi.MFmL5Sacrum;
    AnyRefNode &Org = ....Segments.L5Seg.MFmL5SacrumNodeL;
    AnyRefNode &Ins = ....Segments.SacrumSeg.MFmL5SacrumNodeL;
    viewMuscle = {#include "../DrawSettings/MusDrawSettings.any"};
    viewForce.Visible ??= Off;
  };

  AnyMuscleViaPoint MFtsL1L5 = {
    AnyMuscleModel &MusMdl = ....MuscleModels.Left.Multifidi.MFtsL1L5;
    AnyRefNode &Org = ....Segments.L1Seg.MFtsL1L5NodeL;
    AnyRefNode &Ins = ....Segments.L5Seg.MFtsL1L5NodeL;
    viewMuscle = {#include "../DrawSettings/MusDrawSettings.any"};
    viewForce.Visible ??= Off;
  };

  AnyMuscleViaPoint MFtsL1S1 = {
    AnyMuscleModel &MusMdl = ....MuscleModels.Left.Multifidi.MFtsL1S1;
    AnyRefNode &Org = ....Segments.L1Seg.MFtsL1S1NodeL;
    AnyRefNode &Ins = ....Segments.SacrumSeg.MFtsL1S1NodeL;
    viewMuscle = {#include "../DrawSettings/MusDrawSettings.any"};
    viewForce.Visible ??= Off;
  };

  AnyMuscleViaPoint MFtsL2L5 = {
    AnyMuscleModel &MusMdl = ....MuscleModels.Left.Multifidi.MFtsL2L5;
    AnyRefNode &Org = ....Segments.L2Seg.MFtsL2L5NodeL;
    AnyRefNode &Ins = ....Segments.L5Seg.MFtsL2L5NodeL;
    viewMuscle = {#include "../DrawSettings/MusDrawSettings.any"};
    viewForce.Visible ??= Off;
  };

  AnyMuscleViaPoint MFtsL2S1 = {
    AnyMuscleModel &MusMdl = ....MuscleModels.Left.Multifidi.MFtsL2S1;
    AnyRefNode &Org = ....Segments.L2Seg.MFtsL2S1NodeL;
    AnyRefNode &Ins = ....Segments.SacrumSeg.MFtsL2S1NodeL;
    viewMuscle = {#include "../DrawSettings/MusDrawSettings.any"};
    viewForce.Visible ??= Off;
  };

  AnyMuscleViaPoint MFtsL3Ligament = {
    AnyMuscleModel &MusMdl = ....MuscleModels.Left.Multifidi.MFtsL3Ligament;
    AnyRefNode &Org = ....Segments.L3Seg.MFtsL3LigamentNodeL;
    AnyRefNode &Via = ....Segments.SacrumSeg.MFtsL3LigamentNodeViaL;
    AnyRefNode &Ins = ....Segments.SacrumSeg.MFtsL3LigamentNodeL;
    viewMuscle = {#include "../DrawSettings/MusDrawSettings.any"};
    viewForce.Visible ??= Off;
  };

  AnyMuscleViaPoint MFtsL4Sacrum = {
    AnyMuscleModel &MusMdl = ....MuscleModels.Left.Multifidi.MFtsL4Sacrum;
    AnyRefNode &Org = ....Segments.L4Seg.MFtsL4SacrumNodeL;
    AnyRefNode &Via = ....Segments.SacrumSeg.MFtsL4SacrumViaNodeL;
    AnyRefNode &Ins = ....Segments.SacrumSeg.MFtsL4SacrumNodeL;
    viewMuscle = {#include "../DrawSettings/MusDrawSettings.any"};
    viewForce.Visible ??= Off;
  };

  AnyMuscleViaPoint MFtsL5Sacrum = {
    AnyMuscleModel &MusMdl = ....MuscleModels.Left.Multifidi.MFtsL5Sacrum;
    AnyRefNode &Org = ....Segments.L5Seg.MFtsL5SacrumNodeL;
    AnyRefNode &Via = ....Segments.SacrumSeg.MFtsL5SacrumViaNodeL;
    AnyRefNode &Ins = ....Segments.SacrumSeg.MFtsL5SacrumNodeL;
    viewMuscle = {#include "../DrawSettings/MusDrawSettings.any"};
    viewForce.Visible ??= Off;
  };

  AnyMuscleViaPoint MFtstL1SIPS = {
    AnyMuscleModel &MusMdl = ....MuscleModels.Left.Multifidi.MFtstL1SIPS;
    AnyRefNode &Org = ....Segments.L1Seg.MFtstL1SIPSNodeL;
    AnyRefNode &Via = ....Segments.PelvisSeg.MFtstL1SIPSViaNodeL;
    AnyRefNode &Ins = ....Segments.PelvisSeg.MFtstL1SIPSNodeL;
    viewMuscle = {#include "../DrawSettings/MusDrawSettings.any"};
    viewForce.Visible ??= Off;
  };

  AnyMuscleViaPoint MFtstL2SIPS = {
    AnyMuscleModel &MusMdl = ....MuscleModels.Left.Multifidi.MFtstL2SIPS;
    AnyRefNode &Org = ....Segments.L2Seg.MFtstL2SIPSNodeL;
    AnyRefNode &Via = ....Segments.PelvisSeg.MFtstL2SIPSViaNodeL;
    AnyRefNode &Ins = ....Segments.PelvisSeg.MFtstL2SIPSNodeL;
    viewMuscle = {#include "../DrawSettings/MusDrawSettings.any"};
    viewForce.Visible ??= Off;
  };
};

MuscleGroup MultifidusThoracis = {
  #if BM_TRUNK_THORACIC_MODEL == _THORACIC_MODEL_FLEXIBLE_
  AnyMuscleViaPoint MFT4T1 =   {
    AnyMuscleModel &MusMdl = ....MuscleModels.Left.ThoracicMultifidi.MFT4T1;
    AnyRefFrame &Org = ....Segments.T4Seg.MFT4T1NodeLOrg;
    AnyRefFrame &Ins = ....Segments.T1Seg.MFT4T1NodeLIns;
    viewMuscle = {#include "../DrawSettings/MusDrawSettings.any"};
    viewForce.Visible ??= Off;
  };

  AnyMuscleViaPoint MFT5T1 =   {
    AnyMuscleModel &MusMdl = ....MuscleModels.Left.ThoracicMultifidi.MFT5T1;
    AnyRefFrame &Org = ....Segments.T5Seg.MFT5T1NodeLOrg;
    AnyRefFrame &Ins = ....Segments.T1Seg.MFT5T1NodeLIns;
    viewMuscle = {#include "../DrawSettings/MusDrawSettings.any"};
    viewForce.Visible ??= Off;
  };

  AnyMuscleViaPoint MFT5T2 =   {
    AnyMuscleModel &MusMdl = ....MuscleModels.Left.ThoracicMultifidi.MFT5T2;
    AnyRefFrame &Org = ....Segments.T5Seg.MFT5T2NodeLOrg;
    AnyRefFrame &Ins = ....Segments.T2Seg.MFT5T2NodeLIns;
    viewMuscle = {#include "../DrawSettings/MusDrawSettings.any"};
    viewForce.Visible ??= Off;
  };

  AnyMuscleViaPoint MFT6T1 =   {
    AnyMuscleModel &MusMdl = ....MuscleModels.Left.ThoracicMultifidi.MFT6T1;
    AnyRefFrame &Org = ....Segments.T6Seg.MFT6T1NodeLOrg;
    AnyRefFrame &Ins = ....Segments.T1Seg.MFT6T1NodeLIns;
    viewMuscle = {#include "../DrawSettings/MusDrawSettings.any"};
    viewForce.Visible ??= Off;
  };

  AnyMuscleViaPoint MFT6T2 =   {
    AnyMuscleModel &MusMdl = ....MuscleModels.Left.ThoracicMultifidi.MFT6T2;
    AnyRefFrame &Org = ....Segments.T6Seg.MFT6T2NodeLOrg;
    AnyRefFrame &Ins = ....Segments.T2Seg.MFT6T2NodeLIns;
    viewMuscle = {#include "../DrawSettings/MusDrawSettings.any"};
    viewForce.Visible ??= Off;
  };

  AnyMuscleViaPoint MFT6T3 =   {
    AnyMuscleModel &MusMdl = ....MuscleModels.Left.ThoracicMultifidi.MFT6T3;
    AnyRefFrame &Org = ....Segments.T6Seg.MFT6T3NodeLOrg;
    AnyRefFrame &Ins = ....Segments.T3Seg.MFT6T3NodeLIns;
    viewMuscle = {#include "../DrawSettings/MusDrawSettings.any"};
    viewForce.Visible ??= Off;
  };

  AnyMuscleViaPoint MFT7T2 =   {
    AnyMuscleModel &MusMdl = ....MuscleModels.Left.ThoracicMultifidi.MFT7T2;
    AnyRefFrame &Org = ....Segments.T7Seg.MFT7T2NodeLOrg;
    AnyRefFrame &Ins = ....Segments.T2Seg.MFT7T2NodeLIns;
    viewMuscle = {#include "../DrawSettings/MusDrawSettings.any"};
    viewForce.Visible ??= Off;
  };

  AnyMuscleViaPoint MFT7T3 =   {
    AnyMuscleModel &MusMdl = ....MuscleModels.Left.ThoracicMultifidi.MFT7T3;
    AnyRefFrame &Org = ....Segments.T7Seg.MFT7T3NodeLOrg;
    AnyRefFrame &Ins = ....Segments.T3Seg.MFT7T3NodeLIns;
    viewMuscle = {#include "../DrawSettings/MusDrawSettings.any"};
    viewForce.Visible ??= Off;
  };

  AnyMuscleViaPoint MFT7T4 =   {
    AnyMuscleModel &MusMdl = ....MuscleModels.Left.ThoracicMultifidi.MFT7T4;
    AnyRefFrame &Org = ....Segments.T7Seg.MFT7T4NodeLOrg;
    AnyRefFrame &Ins = ....Segments.T4Seg.MFT7T4NodeLIns;
    viewMuscle = {#include "../DrawSettings/MusDrawSettings.any"};
    viewForce.Visible ??= Off;
  };

  AnyMuscleViaPoint MFT8T3 =   {
    AnyMuscleModel &MusMdl = ....MuscleModels.Left.ThoracicMultifidi.MFT8T3;
    AnyRefFrame &Org = ....Segments.T8Seg.MFT8T3NodeLOrg;
    AnyRefFrame &Ins = ....Segments.T3Seg.MFT8T3NodeLIns;
    viewMuscle = {#include "../DrawSettings/MusDrawSettings.any"};
    viewForce.Visible ??= Off;
  };

  AnyMuscleViaPoint MFT8T4 =   {
    AnyMuscleModel &MusMdl = ....MuscleModels.Left.ThoracicMultifidi.MFT8T4;
    AnyRefFrame &Org = ....Segments.T8Seg.MFT8T4NodeLOrg;
    AnyRefFrame &Ins = ....Segments.T4Seg.MFT8T4NodeLIns;
    viewMuscle = {#include "../DrawSettings/MusDrawSettings.any"};
    viewForce.Visible ??= Off;
  };

  AnyMuscleViaPoint MFT8T5 =   {
    AnyMuscleModel &MusMdl = ....MuscleModels.Left.ThoracicMultifidi.MFT8T5;
    AnyRefFrame &Org = ....Segments.T8Seg.MFT8T5NodeLOrg;
    AnyRefFrame &Ins = ....Segments.T5Seg.MFT8T5NodeLIns;
    viewMuscle = {#include "../DrawSettings/MusDrawSettings.any"};
    viewForce.Visible ??= Off;
  };

  AnyMuscleViaPoint MFT9T4 =   {
    AnyMuscleModel &MusMdl = ....MuscleModels.Left.ThoracicMultifidi.MFT9T4;
    AnyRefFrame &Org = ....Segments.T9Seg.MFT9T4NodeLOrg;
    AnyRefFrame &Ins = ....Segments.T4Seg.MFT9T4NodeLIns;
    viewMuscle = {#include "../DrawSettings/MusDrawSettings.any"};
    viewForce.Visible ??= Off;
  };

  AnyMuscleViaPoint MFT9T5 =   {
    AnyMuscleModel &MusMdl = ....MuscleModels.Left.ThoracicMultifidi.MFT9T5;
    AnyRefFrame &Org = ....Segments.T9Seg.MFT9T5NodeLOrg;
    AnyRefFrame &Ins = ....Segments.T5Seg.MFT9T5NodeLIns;
    viewMuscle = {#include "../DrawSettings/MusDrawSettings.any"};
    viewForce.Visible ??= Off;
  };

  AnyMuscleViaPoint MFT9T6 =   {
    AnyMuscleModel &MusMdl = ....MuscleModels.Left.ThoracicMultifidi.MFT9T6;
    AnyRefFrame &Org = ....Segments.T9Seg.MFT9T6NodeLOrg;
    AnyRefFrame &Ins = ....Segments.T6Seg.MFT9T6NodeLIns;
    viewMuscle = {#include "../DrawSettings/MusDrawSettings.any"};
    viewForce.Visible ??= Off;
  };

  AnyMuscleViaPoint MFT10T5 =   {
    AnyMuscleModel &MusMdl = ....MuscleModels.Left.ThoracicMultifidi.MFT10T5;
    AnyRefFrame &Org = ....Segments.T10Seg.MFT10T5NodeLOrg;
    AnyRefFrame &Ins = ....Segments.T5Seg.MFT10T5NodeLIns;
    viewMuscle = {#include "../DrawSettings/MusDrawSettings.any"};
    viewForce.Visible ??= Off;
  };

  AnyMuscleViaPoint MFT10T6 =   {
    AnyMuscleModel &MusMdl = ....MuscleModels.Left.ThoracicMultifidi.MFT10T6;
    AnyRefFrame &Org = ....Segments.T10Seg.MFT10T6NodeLOrg;
    AnyRefFrame &Ins = ....Segments.T6Seg.MFT10T6NodeLIns;
    viewMuscle = {#include "../DrawSettings/MusDrawSettings.any"};
    viewForce.Visible ??= Off;
  };

  AnyMuscleViaPoint MFT10T7 =   {
    AnyMuscleModel &MusMdl = ....MuscleModels.Left.ThoracicMultifidi.MFT10T7;
    AnyRefFrame &Org = ....Segments.T10Seg.MFT10T7NodeLOrg;
    AnyRefFrame &Ins = ....Segments.T7Seg.MFT10T7NodeLIns;
    viewMuscle = {#include "../DrawSettings/MusDrawSettings.any"};
    viewForce.Visible ??= Off;
  };

  AnyMuscleViaPoint MFT11T6 =   {
    AnyMuscleModel &MusMdl = ....MuscleModels.Left.ThoracicMultifidi.MFT11T6;
    AnyRefFrame &Org = ....Segments.T11Seg.MFT11T6NodeLOrg;
    AnyRefFrame &Ins = ....Segments.T6Seg.MFT11T6NodeLIns;
    viewMuscle = {#include "../DrawSettings/MusDrawSettings.any"};
    viewForce.Visible ??= Off;
  };

  AnyMuscleViaPoint MFT11T7 =   {
    AnyMuscleModel &MusMdl = ....MuscleModels.Left.ThoracicMultifidi.MFT11T7;
    AnyRefFrame &Org = ....Segments.T11Seg.MFT11T7NodeLOrg;
    AnyRefFrame &Ins = ....Segments.T7Seg.MFT11T7NodeLIns;
    viewMuscle = {#include "../DrawSettings/MusDrawSettings.any"};
    viewForce.Visible ??= Off;
  };

  AnyMuscleViaPoint MFT11T8 =   {
    AnyMuscleModel &MusMdl = ....MuscleModels.Left.ThoracicMultifidi.MFT11T8;
    AnyRefFrame &Org = ....Segments.T11Seg.MFT11T8NodeLOrg;
    AnyRefFrame &Ins = ....Segments.T8Seg.MFT11T8NodeLIns;
    viewMuscle = {#include "../DrawSettings/MusDrawSettings.any"};
    viewForce.Visible ??= Off;
  };

  AnyMuscleViaPoint MFT12T7 =   {
    AnyMuscleModel &MusMdl = ....MuscleModels.Left.ThoracicMultifidi.MFT12T7;
    AnyRefFrame &Org = ....Segments.T12Seg.MFT12T7NodeLOrg;
    AnyRefFrame &Ins = ....Segments.T7Seg.MFT12T7NodeLIns;
    viewMuscle = {#include "../DrawSettings/MusDrawSettings.any"};
    viewForce.Visible ??= Off;
  };

  AnyMuscleViaPoint MFT12T8 =   {
    AnyMuscleModel &MusMdl = ....MuscleModels.Left.ThoracicMultifidi.MFT12T8;
    AnyRefFrame &Org = ....Segments.T12Seg.MFT12T8NodeLOrg;
    AnyRefFrame &Ins = ....Segments.T8Seg.MFT12T8NodeLIns;
    viewMuscle = {#include "../DrawSettings/MusDrawSettings.any"};
    viewForce.Visible ??= Off;
  };

  AnyMuscleViaPoint MFT12T9 =   {
    AnyMuscleModel &MusMdl = ....MuscleModels.Left.ThoracicMultifidi.MFT12T9;
    AnyRefFrame &Org = ....Segments.T12Seg.MFT12T9NodeLOrg;
    AnyRefFrame &Ins = ....Segments.T9Seg.MFT12T9NodeLIns;
    viewMuscle = {#include "../DrawSettings/MusDrawSettings.any"};
    viewForce.Visible ??= Off;
  };
  #endif
  AnyMuscleViaPoint MFL1T8 =   {
    AnyMuscleModel &MusMdl = ....MuscleModels.Left.ThoracicMultifidi.MFL1T8;
    AnyRefFrame &Org = ....Segments.L1Seg.MFL1T8NodeLOrg;
    AnyRefFrame &Ins = ....Segments.T8Seg.MFL1T8NodeLIns;
    viewMuscle = {#include "../DrawSettings/MusDrawSettings.any"};
    viewForce.Visible ??= Off;
  };

  AnyMuscleViaPoint MFL1T9 =   {
    AnyMuscleModel &MusMdl = ....MuscleModels.Left.ThoracicMultifidi.MFL1T9;
    AnyRefFrame &Org = ....Segments.L1Seg.MFL1T9NodeLOrg;
    AnyRefFrame &Ins = ....Segments.T9Seg.MFL1T9NodeLIns;
    viewMuscle = {#include "../DrawSettings/MusDrawSettings.any"};
    viewForce.Visible ??= Off;

  };

  AnyMuscleViaPoint MFL1T10 =   {
    AnyMuscleModel &MusMdl = ....MuscleModels.Left.ThoracicMultifidi.MFL1T10;
    AnyRefFrame &Org = ....Segments.L1Seg.MFL1T10NodeLOrg;
    AnyRefFrame &Ins = ....Segments.T10Seg.MFL1T10NodeLIns;
    viewMuscle = {#include "../DrawSettings/MusDrawSettings.any"};
    viewForce.Visible ??= Off;

  };

  AnyMuscleViaPoint MFL2T9 =   {
    AnyMuscleModel &MusMdl = ....MuscleModels.Left.ThoracicMultifidi.MFL2T9;
    AnyRefFrame &Org = ....Segments.L2Seg.MFL2T9NodeLOrg;
    AnyRefFrame &Ins = ....Segments.T9Seg.MFL2T9NodeLIns;
    viewMuscle = {#include "../DrawSettings/MusDrawSettings.any"};
    viewForce.Visible ??= Off;

  };

  AnyMuscleViaPoint MFL2T10 =   {
    AnyMuscleModel &MusMdl = ....MuscleModels.Left.ThoracicMultifidi.MFL2T10;
    AnyRefFrame &Org = ....Segments.L2Seg.MFL2T10NodeLOrg;
    AnyRefFrame &Ins = ....Segments.T10Seg.MFL2T10NodeLIns;
    viewMuscle = {#include "../DrawSettings/MusDrawSettings.any"};
    viewForce.Visible ??= Off;

  };

  AnyMuscleViaPoint MFL2T11 =   {
    AnyMuscleModel &MusMdl = ....MuscleModels.Left.ThoracicMultifidi.MFL2T11;
    AnyRefFrame &Org = ....Segments.L2Seg.MFL2T11NodeLOrg;
    AnyRefFrame &Ins = ....Segments.T11Seg.MFL2T11NodeLIns;
    viewMuscle = {#include "../DrawSettings/MusDrawSettings.any"};
    viewForce.Visible ??= Off;

  };

  AnyMuscleViaPoint MFL3T10 =   {
    AnyMuscleModel &MusMdl = ....MuscleModels.Left.ThoracicMultifidi.MFL3T10;
    AnyRefFrame &Org = ....Segments.L3Seg.MFL3T10NodeLOrg;
    AnyRefFrame &Ins = ....Segments.T10Seg.MFL3T10NodeLIns;
    viewMuscle = {#include "../DrawSettings/MusDrawSettings.any"};
    viewForce.Visible ??= Off;

  };

  AnyMuscleViaPoint MFL3T11 =   {
    AnyMuscleModel &MusMdl = ....MuscleModels.Left.ThoracicMultifidi.MFL3T11;
    AnyRefFrame &Org = ....Segments.L3Seg.MFL3T11NodeLOrg;
    AnyRefFrame &Ins = ....Segments.T11Seg.MFL3T11NodeLIns;
    viewMuscle = {#include "../DrawSettings/MusDrawSettings.any"};
    viewForce.Visible ??= Off;

  };

  AnyMuscleViaPoint MFL3T12 =   {
    AnyMuscleModel &MusMdl = ....MuscleModels.Left.ThoracicMultifidi.MFL3T12;
    AnyRefFrame &Org = ....Segments.L3Seg.MFL3T12NodeLOrg;
    AnyRefFrame &Ins = ....Segments.T12Seg.MFL3T12NodeLIns;
    viewMuscle = {#include "../DrawSettings/MusDrawSettings.any"};
    viewForce.Visible ??= Off;

  };

  AnyMuscleViaPoint MFL4T11 =   {
    AnyMuscleModel &MusMdl = ....MuscleModels.Left.ThoracicMultifidi.MFL4T11;
    AnyRefFrame &Org = ....Segments.L4Seg.MFL4T11NodeLOrg;
    AnyRefFrame &Ins = ....Segments.T11Seg.MFL4T11NodeLIns;
    viewMuscle = {#include "../DrawSettings/MusDrawSettings.any"};
    viewForce.Visible ??= Off;

  };

  AnyMuscleViaPoint MFL4T12 =   {
    AnyMuscleModel &MusMdl = ....MuscleModels.Left.ThoracicMultifidi.MFL4T12;
    AnyRefFrame &Org = ....Segments.L4Seg.MFL4T12NodeLOrg;
    AnyRefFrame &Ins = ....Segments.T12Seg.MFL4T12NodeLIns;
    viewMuscle = {#include "../DrawSettings/MusDrawSettings.any"};
    viewForce.Visible ??= Off;

  };

  AnyMuscleViaPoint MFL5T12 =   {
    AnyMuscleModel &MusMdl = ....MuscleModels.Left.ThoracicMultifidi.MFL5T12;
    AnyRefFrame &Org = ....Segments.L5Seg.MFL5T12NodeLOrg;
    AnyRefFrame &Ins = ....Segments.T12Seg.MFL5T12NodeLIns;
    viewMuscle = {#include "../DrawSettings/MusDrawSettings.any"};
    viewForce.Visible ??= Off;

  };
};

MuscleGroup ObliquusExternus = {

  #if BM_TRUNK_CAVITY_MODEL == _CAVITY_MODEL_VOLUME_


  #ifdef OBLIQUUS_WRAP_ON_CYLS
  AnyMuscleShortestPath OEC_1 = {
    AnyMuscleModel &MusMdl = ....MuscleModels.Left.ObliquusExternus.OEC_1;
    AnyRefNode &Org = ....Segments.Left.R6Seg.ObliquusExternusNode;
    AnyRefNode &Ins = ....Abdominal.Layer_L1.BaseSegAnterior.mid;

    #if BM_TRUNK_THORACIC_STERNUM_TOPOLOGY == 4
    AnyParamSurf &srf1 =....Segments.Left.CostalCartilageSeg.WrappingTorusR10.Surf;
    #else
    AnyParamSurf &srf1 =....Segments.SternalBodySeg.Left.ObliquusWrapping.Surf;
    #endif

    SPLine.StringMesh=10;

    SPLine = {
      AnyMatrix InitWrapPos = {
        transf3D({0,.srf1.MajorRadius+.srf1.MinorRadius, 0}, &.srf1)
      };
      InitWrapPosVecArr = {&InitWrapPos};
    };
    viewMuscle = {#include "../DrawSettings/MusDrawSettings.any"};
    viewForce.Visible ??= Off;
  };

  AnyMuscleShortestPath OEC_2 = {
    AnyMuscleModel &MusMdl = ....MuscleModels.Left.ObliquusExternus.OEC_2;
    AnyRefNode &Org = ....Segments.Left.R7Seg.ObliquusExternusNode;
    AnyRefNode &Ins = ....Abdominal.Layer_L2.BaseSegAnterior.mid;

    #if BM_TRUNK_THORACIC_STERNUM_TOPOLOGY == 4
    AnyParamSurf &srf1 =....Segments.Left.CostalCartilageSeg.WrappingTorusR10.Surf;
    #else
    AnyParamSurf &srf1 =....Segments.SternalBodySeg.Left.ObliquusWrapping.Surf;
    #endif

    SPLine.StringMesh=60;

    SPLine = {
      AnyMatrix InitWrapPos = {
        transf3D({0,.srf1.MajorRadius+.srf1.MinorRadius, 0}, &.srf1)
      };
      InitWrapPosVecArr = {&InitWrapPos};
    };
    viewMuscle = {#include "../DrawSettings/MusDrawSettings.any"};
    viewForce.Visible ??= Off;
  };


  AnyMuscleShortestPath OEC_3 = {
    AnyMuscleModel &MusMdl = ....MuscleModels.Left.ObliquusExternus.OEC_3;
    AnyRefNode &Org = ....Segments.Left.R8Seg.ObliquusExternusNode;
    AnyRefNode &Ins = ....Abdominal.Layer_L3.BaseSegAnterior.mid;

    #if BM_TRUNK_THORACIC_STERNUM_TOPOLOGY == 4
    AnyParamSurf &srf1 =....Segments.Left.CostalCartilageSeg.WrappingTorusR10.Surf;
    #else
    AnyParamSurf &srf1 =....Segments.SternalBodySeg.Left.ObliquusWrapping.Surf;
    #endif

    SPLine.StringMesh=60;

    SPLine = {
      AnyMatrix InitWrapPos = {
        transf3D({0,.srf1.MajorRadius+.srf1.MinorRadius, 0}, &.srf1)
      };
      InitWrapPosVecArr = {&InitWrapPos};
    };
    viewMuscle = {#include "../DrawSettings/MusDrawSettings.any"};
    viewForce.Visible ??= Off;
  };


  AnyMuscleShortestPath OEC_4 = {
    AnyMuscleModel &MusMdl = ....MuscleModels.Left.ObliquusExternus.OEC_4;
    AnyRefNode &Org = ....Segments.Left.R9Seg.ObliquusExternusNode;
    AnyRefNode &Ins = ....Abdominal.Layer_L4.BaseSegAnterior.mid;

    #if BM_TRUNK_THORACIC_STERNUM_TOPOLOGY == 4
    AnyParamSurf &srf1 =....Segments.Left.CostalCartilageSeg.WrappingTorusR10.Surf;
    #else
    AnyParamSurf &srf1 =....Segments.SternalBodySeg.Left.ObliquusWrapping.Surf;
    #endif

    SPLine.StringMesh=60;

    SPLine = {
      AnyMatrix InitWrapPos = {
        transf3D({0,.srf1.MajorRadius+.srf1.MinorRadius, 0}, &.srf1)
      };
      InitWrapPosVecArr = {&InitWrapPos};
    };
    viewMuscle = {#include "../DrawSettings/MusDrawSettings.any"};
    viewForce.Visible ??= Off;
  };


  AnyMuscleShortestPath  OEC_5= {
    AnyMuscleModel &MusMdl = ....MuscleModels.Left.ObliquusExternus.OEC_5;
    AnyRefNode &Org = ....Segments.Left.R9Seg.ObliquusExternusNode_1;
    AnyRefNode &Ins = ....Abdominal.Layer_L5.BaseSegAnterior.mid;

    #if BM_TRUNK_THORACIC_STERNUM_TOPOLOGY == 4
    AnyParamSurf &srf0 =....Segments.Left.CostalCartilageSeg.WrappingTorusR10.Surf;
    #else
    AnyParamSurf &srf0 =....Segments.SternalBodySeg.Left.ObliquusWrapping.Surf;
    #endif
    AnyParamSurf  &srf1 =....Abdominal.ObliquusWrapping.WrappingSeg.Layer4WrappingPoints.Left.nn09.Translate.OutwardCyl;
    AnyParamSurf  &srf2 =....Abdominal.ObliquusWrapping.WrappingSeg.Layer5WrappingPoints.Left.nn10.Translate.OutwardCyl;

    SPLine.StringMesh=60;

    SPLine = {
      AnyMatrix InitWrapPos = {
        transf3D({0,-.srf1.radius, 0.5*.srf1.Length}, &.srf1),
        transf3D({0,-.srf2.radius, 0.5*.srf2.Length}, &.srf2)
      };
      InitWrapPosVecArr = {&InitWrapPos};
    };
    viewMuscle = {#include "../DrawSettings/MusDrawSettings.any"};
    viewForce.Visible ??= Off;
  };


  AnyMuscleShortestPath OEC_6 = {
    AnyMuscleModel &MusMdl = ....MuscleModels.Left.ObliquusExternus.OEC_6;
    AnyRefNode &Org = ....Segments.Left.R10Seg.ObliquusExternusNode_1;
    AnyRefNode &Ins =     ....Abdominal.Layer_Pelvic2.BaseSegAnterior.VolumePoints.Left.nn11;

    // AnyParamSurf &srf1 =....Abdominal.ObliquusWrapping.WrappingSeg.Layer4WrappingPoints.Left.nn09.Translate.VerticalCyl;
    AnyParamSurf &srf2 =....Abdominal.ObliquusWrapping.WrappingSeg.Layer4WrappingPoints.Left.nn10.Translate.OutwardCyl;

    SPLine.StringMesh=240;

    SPLine = {
      AnyMatrix InitWrapPos = {
        // transf3D({0,-.srf1.radius, 0.5*.srf1.Length}, &.srf1),
        transf3D({0,-1.1*.srf2.radius, 0.5*.srf2.Length}, &.srf2),
      };
      InitWrapPosVecArr = {&InitWrapPos};
    };

    viewMuscle = {#include "../DrawSettings/MusDrawSettings.any" };
    viewForce.Visible ??= Off;
  };


  AnyMuscleShortestPath OEC_7 = {
    AnyMuscleModel &MusMdl = ....MuscleModels.Left.ObliquusExternus.OEC_7;
    AnyRefNode &Org = ....Segments.Left.R10Seg.ObliquusExternusNode_2;
    AnyRefNode &Ins =     ....Abdominal.Layer_Pelvic2.BaseSegAnterior.VolumePoints.Left.nn10;

    // AnyParamSurf &srf1 =....Abdominal.ObliquusWrapping.WrappingSeg.Layer4WrappingPoints.Left.nn08.Translate.VerticalCyl;
    AnyParamSurf &srf2 =....Abdominal.ObliquusWrapping.WrappingSeg.Layer4WrappingPoints.Left.nn09.Translate.OutwardCyl;

    SPLine.StringMesh=240;

    SPLine = {
      AnyMatrix InitWrapPos = {
        // transf3D({0,-1.1*.srf1.radius, 0.5*.srf1.Length}, &.srf1),
        transf3D({0,-1.1*.srf2.radius, 0.5*.srf2.Length}, &.srf2),
      };
      InitWrapPosVecArr = {&InitWrapPos};
    };

    viewMuscle = {#include "../DrawSettings/MusDrawSettings.any"};
    viewForce.Visible ??= Off;
  };


  AnyMuscleViaPoint OEC_8= {
    AnyMuscleModel &MusMdl = ....MuscleModels.Left.ObliquusExternus.OEC_8;
    AnyRefNode &Org = ....Segments.Left.R10Seg.ObliquusExternusNode_00;
    AnyRefNode &Ins =    ....Segments.PelvisSeg.Left.ObliquusInternusNode_8;
    viewMuscle = {#include "../DrawSettings/MusDrawSettings.any"};
    viewForce.Visible ??= Off;
  };


  AnyMuscleViaPoint OEC_9= {
    AnyMuscleModel &MusMdl = ....MuscleModels.Left.ObliquusExternus.OEC_9;
    AnyRefNode &Org = ....Segments.Left.R10Seg.ObliquusExternusNode_0;
    AnyRefNode &Ins =    ....Segments.PelvisSeg.Left.ObliquusInternusNode_9;
    viewMuscle = {#include "../DrawSettings/MusDrawSettings.any"};
    viewForce.Visible ??= Off;
  };


  AnyMuscleViaPoint OEC_10 = {
    AnyMuscleModel &MusMdl = ....MuscleModels.Left.ObliquusExternus.OEC_10;
    AnyRefNode &Org = ....Segments.Left.R11Seg.ObliquusExternusNode;
    AnyRefNode &Ins =    ....Segments.PelvisSeg.Left.ObliquusInternusNode_7;
    viewMuscle = {#include "../DrawSettings/MusDrawSettings.any"};
    viewForce.Visible ??= Off;
  };


  AnyMuscleViaPoint OEC_11 = {
    AnyMuscleModel &MusMdl = ....MuscleModels.Left.ObliquusExternus.OEC_11;
    AnyRefNode &Org = ....Segments.Left.R11Seg.ObliquusExternusNode1;
    AnyRefNode &Ins =    ....Segments.PelvisSeg.Left.ObliquusInternusNode_5;
    viewMuscle = {#include "../DrawSettings/MusDrawSettings.any"};
    viewForce.Visible ??= Off;
  };


  AnyMuscleViaPoint OEC_12 = {
    AnyMuscleModel &MusMdl = ....MuscleModels.Left.ObliquusExternus.OEC_12;
    AnyRefNode &Org = ....Segments.Left.R12Seg.ObliquusExternusNode;
    AnyRefNode &Ins =    ....Segments.PelvisSeg.Left.ObliquusInternusNode_4;
    viewMuscle = {#include "../DrawSettings/MusDrawSettings.any"};
    viewForce.Visible ??= Off;
  };


  #endif


  #ifndef OBLIQUUS_WRAP_ON_CYLS

  AnyMuscleShortestPath OEC_1 = {
    AnyMuscleModel &MusMdl = ....MuscleModels.Left.ObliquusExternus.OEC_1;
    AnyRefNode &Org = ....Segments.Left.R6Seg.ObliquusExternusNode;
    AnyRefNode &Ins = ....Abdominal.Layer_L1.BaseSegAnterior.mid;

    #if BM_TRUNK_THORACIC_STERNUM_TOPOLOGY == 4
    AnyParamSurf &srf1 =....Segments.Left.CostalCartilageSeg.WrappingTorusR10.Surf;
    #else
    AnyParamSurf &srf1 =....Segments.SternalBodySeg.Left.ObliquusWrapping.Surf;
    #endif

    SPLine.StringMesh=60;

    SPLine = {
      AnyMatrix InitWrapPos = {
        transf3D({0,.srf1.MajorRadius+.srf1.MinorRadius, 0}, &.srf1)
      };


      InitWrapPosVecArr = {&InitWrapPos};
    };
    viewMuscle = {#include "../DrawSettings/MusDrawSettings.any"};
    viewForce.Visible ??= Off;
    #include "MusclesSharedCode_SPLine.any"
  };

  AnyMuscleShortestPath OEC_2 = {
    AnyMuscleModel &MusMdl = ....MuscleModels.Left.ObliquusExternus.OEC_2;
    AnyRefNode &Org = ....Segments.Left.R7Seg.ObliquusExternusNode;
    AnyRefNode &Ins = ....Abdominal.Layer_L2.BaseSegAnterior.mid;

    #if BM_TRUNK_THORACIC_STERNUM_TOPOLOGY == 4
    AnyParamSurf &srf1 =....Segments.Left.CostalCartilageSeg.WrappingTorusR10.Surf;
    #else
    AnyParamSurf &srf1 =....Segments.SternalBodySeg.Left.ObliquusWrapping.Surf;
    #endif

    SPLine.StringMesh=60;

    SPLine = {
      AnyMatrix InitWrapPos = {
        transf3D({0,.srf1.MajorRadius+.srf1.MinorRadius, 0}, &.srf1)
      };
      InitWrapPosVecArr = {&InitWrapPos};
    };
    viewMuscle = {#include "../DrawSettings/MusDrawSettings.any"};
    viewForce.Visible ??= Off;
    #include "MusclesSharedCode_SPLine.any"
  };


  AnyMuscleShortestPath OEC_3 = {
    AnyMuscleModel &MusMdl = ....MuscleModels.Left.ObliquusExternus.OEC_3;
    AnyRefNode &Org = ....Segments.Left.R8Seg.ObliquusExternusNode;
    AnyRefNode &Ins = ....Abdominal.Layer_L3.BaseSegAnterior.mid;

    #if BM_TRUNK_THORACIC_STERNUM_TOPOLOGY == 4
    AnyParamSurf &srf1 =....Segments.Left.CostalCartilageSeg.WrappingTorusR10.Surf;
    #else
    AnyParamSurf &srf1 =....Segments.SternalBodySeg.Left.ObliquusWrapping.Surf;
    #endif


    //  #if MESH_TYPE == "ELLIPSOID_SIDE"
    //  AnySurfEllipsoid &mesh2 = Main.HumanModel.BodyModel.Trunk.Abdominal.Layer_L2.BaseSegAnterior.Left.mesh;
    //  #else
    //  AnySurfTriCylMesh &mesh2 = Main.HumanModel.BodyModel.Trunk.Abdominal.Layer_L2.BaseSegAnterior.mesh;
    //  #endif
    AnySurfEllipsoid &mesh2 = Main.HumanModel.BodyModel.Trunk.Abdominal.Layer_L2.BaseSegAnterior.mesh3;


    SPLine.StringMesh=60;


    SPLine = {


      //   #if MESH_TYPE == "ELLIPSOID"
      //    AnyMatrix InitWrapPos = {
      //      transf3D({0,.srf1.MajorRadius+.srf1.MinorRadius, 0}, &.srf1),
      //      transf3D({.mesh2.Radius[0],0,0}, &.mesh2),
      //    };
      //    #endif
      //
      //    #if MESH_TYPE == "ELLIPSOID_SIDE"
      //    AnyMatrix InitWrapPos = {
      //       transf3D({0,.srf1.MajorRadius+.srf1.MinorRadius, 0}, &.srf1),
      //
      //      transf3D({0,.mesh2.Radius[1],0}, &.mesh2),
      //
      //    };
      //    #endif
      //
      //    #if MESH_TYPE == "QUAD"
      //    AnyMatrix InitWrapPos = {
      //      transf3D({0,.srf1.MajorRadius+.srf1.MinorRadius, 0}, &.srf1),
      //      transf3D(.mesh2.Points[floor(.mesh2.MeshSize*0.9)+2*.mesh2.MeshSize*6]+{0.02,0,0}, &.mesh2),
      //    };
      //    #endif

      AnyMatrix InitWrapPos = {
        transf3D({0,.srf1.MajorRadius+.srf1.MinorRadius, 0}, &.srf1),
        transf3D({.mesh2.Radius[0],0,0}, &.mesh2),
      };


      InitWrapPosVecArr = {&InitWrapPos};
    };
    viewMuscle = {#include "../DrawSettings/MusDrawSettings.any"};
    viewForce.Visible ??= Off;
    #include "MusclesSharedCode_SPLine.any"
  };


  AnyMuscleShortestPath OEC_4 = {
    AnyMuscleModel &MusMdl = ....MuscleModels.Left.ObliquusExternus.OEC_4;
    AnyRefNode &Org = ....Segments.Left.R9Seg.ObliquusExternusNode;
    AnyRefNode &Ins = ....Abdominal.Layer_L4.BaseSegAnterior.mid;


    #if BM_TRUNK_THORACIC_STERNUM_TOPOLOGY == 4
    AnyParamSurf &srf1 =....Segments.Left.CostalCartilageSeg.WrappingTorusR10.Surf;
    #else
    AnyParamSurf &srf1 =....Segments.SternalBodySeg.Left.ObliquusWrapping.Surf;
    #endif


    //  #if MESH_TYPE == "ELLIPSOID_SIDE"
    //  //AnySurfTriCylMesh &mesh2 = Main.HumanModel.BodyModel.Trunk.Abdominal.Layer_L2.BaseSegAnterior.mesh;
    //  AnySurfEllipsoid &mesh3 = Main.HumanModel.BodyModel.Trunk.Abdominal.Layer_L3.BaseSegAnterior.Left.mesh;
    //  //AnySurfTriCylMesh &mesh4 = Main.HumanModel.BodyModel.Trunk.Abdominal.Layer_L4.BaseSegAnterior.mesh;
    //  #else
    //  //AnySurfTriCylMesh &mesh2 = Main.HumanModel.BodyModel.Trunk.Abdominal.Layer_L2.BaseSegAnterior.mesh;
    //  AnySurfTriCylMesh &mesh3 = Main.HumanModel.BodyModel.Trunk.Abdominal.Layer_L3.BaseSegAnterior.mesh;
    //  //AnySurfTriCylMesh &mesh4 = Main.HumanModel.BodyModel.Trunk.Abdominal.Layer_L4.BaseSegAnterior.mesh;
    //  #endif
    AnySurfEllipsoid &mesh3 = Main.HumanModel.BodyModel.Trunk.Abdominal.Layer_L3.BaseSegAnterior.mesh3;

    SPLine.StringMesh=60;

    SPLine = {

      //    #if MESH_TYPE == "ELLIPSOID"
      //     AnyMatrix InitWrapPos = {
      //        transf3D({0,.srf1.MajorRadius+.srf1.MinorRadius, 0}, &.srf1),
      //      //transf3D({.mesh2.Radius[0],0,0}, &.mesh2),
      //        transf3D({.mesh3.Radius[0],0,0}, &.mesh3),
      //      //transf3D({.mesh4.Radius[0],0,0}, &.mesh4),
      //     };
      //    #endif
      //    #if MESH_TYPE == "ELLIPSOID_SIDE"
      //    AnyMatrix InitWrapPos = {
      //      transf3D({0,.srf1.MajorRadius+.srf1.MinorRadius, 0}, &.srf1),
      //      transf3D({0,.mesh3.Radius[1],0}, &.mesh3),
      //    };
      //    #endif
      //
      //    #if MESH_TYPE == "QUAD"
      //AnyMatrix InitWrapPos = {
      //      transf3D({0,.srf1.MajorRadius+.srf1.MinorRadius, 0}, &.srf1),
      //
      //     //  transf3D(.mesh2.Points[floor(.mesh2.MeshSize*0.85)+2*.mesh2.MeshSize*6]+{0.02,0,0}, &.mesh2),
      //     //  transf3D(.mesh3.Points[floor(.mesh3.MeshSize*0.95)+2*.mesh3.MeshSize*6]+{0.02,0,0}, &.mesh3)
      //       transf3D(.mesh4.Points[floor(.mesh4.MeshSize*0.95)+2*.mesh4.MeshSize*6]+{0.02,0,0}, &.mesh4)
      //    };
      //    #endif
      AnyMatrix InitWrapPos = {
        transf3D({0,.srf1.MajorRadius+.srf1.MinorRadius, 0}, &.srf1),
        //transf3D({.mesh2.Radius[0],0,0}, &.mesh2),
        transf3D({.mesh3.Radius[0],0,0}, &.mesh3),
        //transf3D({.mesh4.Radius[0],0,0}, &.mesh4),
      };

      InitWrapPosVecArr = {&InitWrapPos};
    };
    viewMuscle = {#include "../DrawSettings/MusDrawSettings.any"};
    viewForce.Visible ??= Off;
    #include "MusclesSharedCode_SPLine.any"
  };


  AnyMuscleShortestPath  OEC_5= {
    AnyMuscleModel &MusMdl = ....MuscleModels.Left.ObliquusExternus.OEC_5;
    AnyRefNode &Org = ....Segments.Left.R9Seg.ObliquusExternusNode_1;
    AnyRefNode &Ins = ....Abdominal.Layer_L5.BaseSegAnterior.mid;

    #if BM_TRUNK_THORACIC_STERNUM_TOPOLOGY == 4
    AnyParamSurf &srf0 =....Segments.Left.CostalCartilageSeg.WrappingTorusR10.Surf;
    #else
    AnyParamSurf &srf0 =....Segments.SternalBodySeg.Left.ObliquusWrapping.Surf;
    #endif

    //  AnySurfTriCylMesh &mesh3 = Main.HumanModel.BodyModel.Trunk.Abdominal.Layer_L3.BaseSegAnterior.mesh;


    //  #if MESH_TYPE == "ELLIPSOID_SIDE"
    //  AnySurfEllipsoid &mesh4 = Main.HumanModel.BodyModel.Trunk.Abdominal.Layer_L4.BaseSegAnterior.Left.mesh;
    //  #else
    //  AnySurfTriCylMesh &mesh4 = Main.HumanModel.BodyModel.Trunk.Abdominal.Layer_L4.BaseSegAnterior.mesh;
    //  #endif
    AnySurfEllipsoid &mesh3 = Main.HumanModel.BodyModel.Trunk.Abdominal.Layer_L3.BaseSegAnterior.mesh3;
    AnySurfEllipsoid &mesh4 = Main.HumanModel.BodyModel.Trunk.Abdominal.Layer_L4.BaseSegAnterior.mesh3;


    SPLine.StringMesh=240;

    SPLine = {

      //     #if MESH_TYPE == "ELLIPSOID"
      //    AnyMatrix InitWrapPos = {
      //     transf3D({0,.srf0.MajorRadius+.srf0.MinorRadius, 0}, &.srf0),
      //  //    transf3D({.mesh3.Radius[0],0,0}, &.mesh3),
      //        transf3D({.mesh4.Radius[0],0,0}, &.mesh4),
      //    };
      //    #endif
      //    #if MESH_TYPE == "ELLIPSOID_SIDE"
      //    AnyMatrix InitWrapPos = {
      //       transf3D({0,.srf0.MajorRadius+.srf0.MinorRadius, 0}, &.srf0),
      //
      //      transf3D({0,.mesh4.Radius[1],0}, &.mesh4),
      //
      //    };
      //    #endif
      //
      //    #if MESH_TYPE == "QUAD"
      //AnyMatrix InitWrapPos = {
      // transf3D({0,.srf0.MajorRadius+.srf0.MinorRadius, 0}, &.srf0),
      // //transf3D(.mesh3.Points[floor(.mesh3.MeshSize*0.85)+2*.mesh3.MeshSize*6]+{0.02,0,0}, &.mesh3),
      //       transf3D(.mesh4.Points[floor(.mesh4.MeshSize*0.85)+2*.mesh4.MeshSize*6]+{0.02,0,0}, &.mesh4)
      //    };
      //        #endif
      AnyMatrix InitWrapPos = {
        transf3D({0,.srf0.MajorRadius+.srf0.MinorRadius, 0}, &.srf0),
        transf3D({.mesh3.Radius[0],0,0}, &.mesh3),
        transf3D({.mesh4.Radius[0],0,0}, &.mesh4),
      };

      InitWrapPosVecArr = {&InitWrapPos};
    };
    viewMuscle = {#include "../DrawSettings/MusDrawSettings.any"};
    viewForce.Visible ??= Off;
    #include "MusclesSharedCode_SPLine.any"
  };

  //
  AnyMuscleShortestPath OEC_6 = {
    AnyMuscleModel &MusMdl = ....MuscleModels.Left.ObliquusExternus.OEC_6;
    AnyRefNode &Org = ....Segments.Left.R10Seg.ObliquusExternusNode_1;
    AnyRefNode &Ins =     ....Abdominal.Layer_Pelvic2.BaseSegAnterior.VolumePoints.Left.nn11;
    //AnySurfTriCylMesh &mesh4= Main.HumanModel.BodyModel.Trunk.Abdominal.Layer_L4.BaseSegAnterior.mesh;
    //  AnySurfTriCylMesh &mesh5 = Main.HumanModel.BodyModel.Trunk.Abdominal.Layer_L5.BaseSegAnterior.mesh;

    //   #if MESH_TYPE == "ELLIPSOID_SIDE"
    //  AnySurfEllipsoid &mesh5 = Main.HumanModel.BodyModel.Trunk.Abdominal.Layer_L5.BaseSegAnterior.Left.mesh;
    //  #else
    //  AnySurfTriCylMesh &mesh5 = Main.HumanModel.BodyModel.Trunk.Abdominal.Layer_L5.BaseSegAnterior.mesh;
    //  #endif
    AnySurfEllipsoid &mesh4 = Main.HumanModel.BodyModel.Trunk.Abdominal.Layer_L4.BaseSegAnterior.mesh3;
    AnySurfEllipsoid &mesh5 = Main.HumanModel.BodyModel.Trunk.Abdominal.Layer_L5.BaseSegAnterior.mesh3;


    SPLine.StringMesh=240;

    SPLine = {
      //      #if MESH_TYPE == "ELLIPSOID"
      //    AnyMatrix InitWrapPos = {
      //    //    transf3D({.mesh4.Radius[0],0,0}, &.mesh4),
      //        transf3D({.mesh5.Radius[0],0,0}, &.mesh5),
      //    };
      //    #endif
      //
      //    #if MESH_TYPE == "ELLIPSOID_SIDE"
      //    AnyMatrix InitWrapPos = {
      //               transf3D({0,.mesh5.Radius[1],0}, &.mesh5),
      //
      //    };
      //    #endif
      //
      //    #if MESH_TYPE == "QUAD"
      //
      //    AnyMatrix InitWrapPos = {
      //      // transf3D(.mesh4.Points[floor(.mesh4.MeshSize*0.8)+2*.mesh4.MeshSize*6]+{0.02,0,0}, &.mesh4),
      //       transf3D(.mesh5.Points[floor(.mesh5.MeshSize*0.85)+2*.mesh5.MeshSize*6]+{0.02,0,0}, &.mesh5)
      //
      //   };
      //        #endif
      AnyMatrix InitWrapPos = {
        transf3D({.mesh4.Radius[0],0,-.mesh4.Radius[2]}, &.mesh4),
        transf3D({.mesh5.Radius[0],0,-.mesh5.Radius[2]}, &.mesh5),
      };


      InitWrapPosVecArr = {&InitWrapPos};
    };

    viewMuscle = {#include "../DrawSettings/MusDrawSettings.any" };
    viewForce.Visible ??= Off;
    #include "MusclesSharedCode_SPLine.any"
  };


  AnyMuscleShortestPath OEC_7 = {
    AnyMuscleModel &MusMdl = ....MuscleModels.Left.ObliquusExternus.OEC_7;
    AnyRefNode &Org = ....Segments.Left.R10Seg.ObliquusExternusNode_2;
    AnyRefNode &Ins =     ....Abdominal.Layer_Pelvic2.BaseSegAnterior.VolumePoints.Left.nn10;
    // AnySurfTriCylMesh &mesh0 = Main.HumanModel.BodyModel.Trunk.Abdominal.Layer_L2.BaseSegAnterior.mesh;
    // AnySurfTriCylMesh &mesh1 = Main.HumanModel.BodyModel.Trunk.Abdominal.Layer_L3.BaseSegAnterior.mesh;
    //  AnySurfTriCylMesh &mesh4 = Main.HumanModel.BodyModel.Trunk.Abdominal.Layer_L4.BaseSegAnterior.mesh;
    //  AnySurfTriCylMesh &mesh5 = Main.HumanModel.BodyModel.Trunk.Abdominal.Layer_L5.BaseSegAnterior.mesh;
    //
    //   #if MESH_TYPE == "ELLIPSOID_SIDE"
    //   AnySurfEllipsoid &mesh4 = Main.HumanModel.BodyModel.Trunk.Abdominal.Layer_L4.BaseSegAnterior.Left.mesh;
    //   AnySurfEllipsoid  &mesh5 = Main.HumanModel.BodyModel.Trunk.Abdominal.Layer_L5.BaseSegAnterior.Left.mesh;
    //  #else
    //  AnySurfTriCylMesh &mesh4 = Main.HumanModel.BodyModel.Trunk.Abdominal.Layer_L4.BaseSegAnterior.mesh;
    //  AnySurfTriCylMesh &mesh5 = Main.HumanModel.BodyModel.Trunk.Abdominal.Layer_L5.BaseSegAnterior.mesh;
    //  #endif

    //   AnySurfEllipsoid &mesh3 = Main.HumanModel.BodyModel.Trunk.Abdominal.Layer_L3.BaseSegAnterior.mesh3;
    AnySurfEllipsoid &mesh4 = Main.HumanModel.BodyModel.Trunk.Abdominal.Layer_L4.BaseSegAnterior.mesh3;
    AnySurfEllipsoid  &mesh5 = Main.HumanModel.BodyModel.Trunk.Abdominal.Layer_L5.BaseSegAnterior.mesh3;


    SPLine.StringMesh=240;
    SPLine = {

      //    #if MESH_TYPE == "ELLIPSOID"
      //    AnyMatrix InitWrapPos = {
      //      transf3D({.mesh4.Radius[0],0,0}, &.mesh4),
      //      transf3D({.mesh5.Radius[0],0,0}, &.mesh5),
      //    };
      //    #endif
      //
      //   #if MESH_TYPE == "ELLIPSOID_SIDE"
      //    AnyMatrix InitWrapPos = {
      //            transf3D({0,.mesh4.Radius[1],0}, &.mesh4),
      //               transf3D({0,.mesh5.Radius[1],0}, &.mesh5),
      //
      //    };
      //    #endif
      //
      //
      //    #if MESH_TYPE == "QUAD"
      //
      //    AnyMatrix InitWrapPos = {
      //      transf3D(.mesh4.Points[floor(.mesh4.MeshSize*0.8)+2*20*4]+{0.01,0,0}, &.mesh4),
      //      transf3D(.mesh5.Points[floor(.mesh5.MeshSize*0.85)+2*20*4]+{0.01,0,0}, &.mesh5)
      //    };
      //    #endif

      AnyMatrix InitWrapPos = {
        //      transf3D({.mesh3.Radius[0],0,0}, &.mesh3),
        transf3D({.mesh4.Radius[0],0,-.mesh4.Radius[2]}, &.mesh4),
        transf3D({.mesh5.Radius[0],0,-.mesh5.Radius[2]}, &.mesh5),
      };

      InitWrapPosVecArr = {&InitWrapPos};
    };
    viewMuscle = {#include "../DrawSettings/MusDrawSettings.any"};
    viewForce.Visible ??= Off;
    #include "MusclesSharedCode_SPLine.any"
  };


  AnyMuscleViaPoint OEC_8= {
    AnyMuscleModel &MusMdl = ....MuscleModels.Left.ObliquusExternus.OEC_8;
    AnyRefNode &Org = ....Segments.Left.R10Seg.ObliquusExternusNode_00;
    AnyRefNode &Ins =    ....Segments.PelvisSeg.Left.ObliquusInternusNode_8;
    viewMuscle = {#include "../DrawSettings/MusDrawSettings.any"};
    viewForce.Visible ??= Off;
    #include "MusclesSharedCode.any"
  };


  AnyMuscleViaPoint OEC_9= {
    AnyMuscleModel &MusMdl = ....MuscleModels.Left.ObliquusExternus.OEC_9;
    AnyRefNode &Org = ....Segments.Left.R10Seg.ObliquusExternusNode_0;
    AnyRefNode &Ins =    ....Segments.PelvisSeg.Left.ObliquusInternusNode_9;
    viewMuscle = {#include "../DrawSettings/MusDrawSettings.any"};
    viewForce.Visible ??= Off;
    #include "MusclesSharedCode.any"
  };


  AnyMuscleViaPoint OEC_10 = {
    AnyMuscleModel &MusMdl = ....MuscleModels.Left.ObliquusExternus.OEC_10;
    AnyRefNode &Org = ....Segments.Left.R11Seg.ObliquusExternusNode;
    AnyRefNode &Ins =    ....Segments.PelvisSeg.Left.ObliquusInternusNode_7;
    viewMuscle = {#include "../DrawSettings/MusDrawSettings.any"};
    viewForce.Visible ??= Off;
    #include "MusclesSharedCode.any"
  };


  AnyMuscleViaPoint OEC_11 = {
    AnyMuscleModel &MusMdl = ....MuscleModels.Left.ObliquusExternus.OEC_11;
    AnyRefNode &Org = ....Segments.Left.R11Seg.ObliquusExternusNode1;
    AnyRefNode &Ins =    ....Segments.PelvisSeg.Left.ObliquusInternusNode_5;
    viewMuscle = {#include "../DrawSettings/MusDrawSettings.any"};
    viewForce.Visible ??= Off;
    #include "MusclesSharedCode.any"
  };


  AnyMuscleViaPoint OEC_12 = {
    AnyMuscleModel &MusMdl = ....MuscleModels.Left.ObliquusExternus.OEC_12;
    AnyRefNode &Org = ....Segments.Left.R12Seg.ObliquusExternusNode;
    AnyRefNode &Ins =    ....Segments.PelvisSeg.Left.ObliquusInternusNode_4;
    viewMuscle = {#include "../DrawSettings/MusDrawSettings.any"};
    viewForce.Visible ??= Off;
    #include "MusclesSharedCode.any"
  };


  #endif

  #endif


  #if BM_TRUNK_CAVITY_MODEL == _CAVITY_MODEL_BUCKLE_
  AnyMuscleViaPoint OEC_1 = {
    AnyMuscleModel &MusMdl = ....MuscleModels.Left.ObliquusExternus.OEC_1;
    AnyRefNode &Org = ....Segments.Left.R6Seg.ObliquusExternusNode;
    AnyRefNode &Ins = ....Buckle.Segments.BuckleSeg.Left.ObliquusExternusNode_1;
    viewMuscle = {#include "../DrawSettings/MusDrawSettings.any"};
    viewForce.Visible ??= Off;
  };
  AnyMuscleViaPoint OEC_2 = {
    AnyMuscleModel &MusMdl = ....MuscleModels.Left.ObliquusExternus.OEC_2;
    AnyRefNode &Org = ....Segments.Left.R7Seg.ObliquusExternusNode;
    AnyRefNode &Ins = ....Buckle.Segments.BuckleSeg.Left.ObliquusExternusNode_2;
    viewMuscle = {#include "../DrawSettings/MusDrawSettings.any"};
    viewForce.Visible ??= Off;
  };
  AnyMuscleViaPoint OEC_3 = {
    AnyMuscleModel &MusMdl = ....MuscleModels.Left.ObliquusExternus.OEC_3;
    AnyRefNode &Org = ....Segments.Left.R8Seg.ObliquusExternusNode;
    AnyRefNode &Ins = ....Buckle.Segments.BuckleSeg.Left.ObliquusExternusNode_3;
    viewMuscle = {#include "../DrawSettings/MusDrawSettings.any"};
    viewForce.Visible ??= Off;
  };
  AnyMuscleViaPoint OEC_4 = {
    AnyMuscleModel &MusMdl = ....MuscleModels.Left.ObliquusExternus.OEC_4;
    AnyRefNode &Org = ....Segments.Left.R9Seg.ObliquusExternusNode;
    AnyRefNode &Ins = ....Buckle.Segments.BuckleSeg.Left.ObliquusExternusNode_4;
    viewMuscle = {#include "../DrawSettings/MusDrawSettings.any"};
    viewForce.Visible ??= Off;
  };
  AnyMuscleViaPoint OEC_5 = {
    AnyMuscleModel &MusMdl = ....MuscleModels.Left.ObliquusExternus.OEC_5;
    AnyRefNode &Org = ....Segments.Left.R10Seg.ObliquusExternusNode_1;
    AnyRefNode &Ins = ....Buckle.Segments.BuckleSeg.Left.ObliquusExternusNode_5;
    viewMuscle = {#include "../DrawSettings/MusDrawSettings.any"};
    viewForce.Visible ??= Off;
  };
  AnyMuscleViaPoint OEC_6 = {
    AnyMuscleModel &MusMdl = ....MuscleModels.Left.ObliquusExternus.OEC_6;
    AnyRefNode &Org = ....Segments.Left.R10Seg.ObliquusExternusNode_2;
    AnyRefNode &Ins = ....Segments.PelvisSeg.Left.ObliquusExternusNode_1;
    viewMuscle = {#include "../DrawSettings/MusDrawSettings.any"};
    viewForce.Visible ??= Off;
  };
  AnyMuscleViaPoint OEC_7 = {
    AnyMuscleModel &MusMdl = ....MuscleModels.Left.ObliquusExternus.OEC_7;
    AnyRefNode &Org = ....Segments.Left.R11Seg.ObliquusExternusNode;
    AnyRefNode &Ins = ....Segments.PelvisSeg.Left.ObliquusExternusNode_2;
    viewMuscle = {#include "../DrawSettings/MusDrawSettings.any"};
    viewForce.Visible ??= Off;
  };
  AnyMuscleViaPoint OEC_8= {
    AnyMuscleModel &MusMdl = ....MuscleModels.Left.ObliquusExternus.OEC_8;
    AnyRefNode &Org = ....Segments.Left.R12Seg.ObliquusExternusNode;
    AnyRefNode &Ins = ....Segments.PelvisSeg.Left.ObliquusExternusNode_3;
    viewMuscle = {#include "../DrawSettings/MusDrawSettings.any"};
    viewForce.Visible ??= Off;
  };
  #endif
};
MuscleGroup ObliquusInternus = {

  #if BM_TRUNK_CAVITY_MODEL == _CAVITY_MODEL_VOLUME_


  #ifdef OBLIQUUS_WRAP_ON_CYLS

  AnyMuscleViaPoint OIC_1 = {
    AnyMuscleModel &MusMdl = ....MuscleModels.Left.ObliquusInternus.OIC_1;
    AnyRefNode &Org = ....Segments.Left.R12Seg.ObliquusExternusNode;
    AnyRefNode &Ins = ....Segments.PelvisSeg.Left.ObliquusInternusNode_1;
    viewMuscle = {#include "../DrawSettings/MusDrawSettings.any"};
    viewForce.Visible ??= Off;
  };


  AnyMuscleViaPoint OIC_2 = {
    AnyMuscleModel &MusMdl = ....MuscleModels.Left.ObliquusInternus.OIC_2;
    AnyRefNode &Org = ....Segments.Left.R11Seg.ObliquusExternusNode1;
    AnyRefNode &Ins = ....Segments.PelvisSeg.Left.ObliquusInternusNode_2;
    viewMuscle = {#include "../DrawSettings/MusDrawSettings.any"};
    viewForce.Visible ??= Off;
  };


  AnyMuscleViaPoint OIC_3 = {
    AnyMuscleModel &MusMdl = ....MuscleModels.Left.ObliquusInternus.OIC_3;
    AnyRefNode &Org = ....Segments.Left.R11Seg.ObliquusExternusNode;
    AnyRefNode &Ins = ....Segments.PelvisSeg.Left.ObliquusInternusNode_3;
    viewMuscle = {#include "../DrawSettings/MusDrawSettings.any"};
    viewForce.Visible ??= Off;
  };


  AnyMuscleViaPoint OIC_4 = {
    AnyMuscleModel &MusMdl = ....MuscleModels.Left.ObliquusInternus.OIC_4;
    AnyRefNode &Org = ....Segments.Left.R10Seg.ObliquusExternusNode_2;
    AnyRefNode &Ins = ....Segments.PelvisSeg.Left.ObliquusInternusNode_4;
    viewMuscle = {#include "../DrawSettings/MusDrawSettings.any"};
    viewForce.Visible ??= Off;
  };


  AnyMuscleViaPoint OIC_5 = {
    AnyMuscleModel &MusMdl = ....MuscleModels.Left.ObliquusInternus.OIC_5;
    AnyRefNode &Org = ....Segments.Left.R10Seg.ObliquusExternusNode_1;
    AnyRefNode &Ins = ....Segments.PelvisSeg.Left.ObliquusInternusNode_4_1;
    viewMuscle = {#include "../DrawSettings/MusDrawSettings.any"};
    viewForce.Visible ??= Off;
  };


  AnyMuscleShortestPath OIC_6 = {
    AnyMuscleModel &MusMdl = ....MuscleModels.Left.ObliquusInternus.OIC_6;
    #if BM_TRUNK_THORACIC_STERNUM_TOPOLOGY == 4
    AnyRefNode &Org = ....Segments.Left.CostalCartilageSeg.ObliquusInternus_1;
    #else
    AnyRefNode &Org = ....Segments.SternalBodySeg.Left.ObliquusInternusNode_1;
    #endif
    AnyRefNode &Ins = ....Segments.PelvisSeg.Left.ObliquusInternusNode_5;

    AnyParamSurf &srf4 =....Abdominal.ObliquusWrapping.WrappingSeg.Layer4WrappingPoints.Left.nn04.Translate.InwardCyl;

    SPLine.StringMesh=60;

    SPLine = {
      AnyMatrix InitWrapPos = {
        transf3D({0,-.srf4.radius, 0.5*.srf4.Length}, &.srf4)
      };
      InitWrapPosVecArr = {&InitWrapPos};
    };

    viewMuscle = {#include "../DrawSettings/MusDrawSettings.any"};
    viewForce.Visible ??= Off;
  };


  AnyMuscleShortestPath OIC_7 = {
    AnyMuscleModel &MusMdl = ....MuscleModels.Left.ObliquusInternus.OIC_7;
    #if BM_TRUNK_THORACIC_STERNUM_TOPOLOGY == 4
    AnyRefNode &Org = ....Segments.Left.CostalCartilageSeg.ObliquusInternus_2;
    #else
    AnyRefNode &Org = ....Segments.SternalBodySeg.Left.ObliquusInternusNode_2;
    #endif
    AnyRefNode &Ins = ....Segments.PelvisSeg.Left.ObliquusInternusNode_5;

    AnyParamSurf &srf3 =....Abdominal.ObliquusWrapping.WrappingSeg.Layer3WrappingPoints.Left.nn08.Translate.InwardCyl;

    SPLine.StringMesh=60;

    SPLine = {
      AnyMatrix InitWrapPos = {
        transf3D({0,-.srf3.radius, 0.5*.srf3.Length}, &.srf3)
      };
      InitWrapPosVecArr = {&InitWrapPos};
    };

    viewMuscle = {#include "../DrawSettings/MusDrawSettings.any"};
    viewForce.Visible ??= Off;
  };


  AnyMuscleShortestPath OIC_8 = {
    AnyMuscleModel &MusMdl = ....MuscleModels.Left.ObliquusInternus.OIC_8;
    AnyRefNode &Org = ....Segments.SternalBodySeg.Xiphoid_DiaphragmNodeL;
    AnyRefNode &Via = Main.HumanModel.BodyModel.Trunk.Abdominal.Layer_L1.BaseSegAnterior.TransversusPoints.Left.nn06;

    AnyRefNode &Ins = ....Segments.PelvisSeg.Left.ObliquusInternusNode_6;

    AnyParamSurf &srf2 =....Abdominal.ObliquusWrapping.WrappingSeg.Layer2WrappingPoints.Left.nn10.Translate.InwardCyl;
    AnyParamSurf &srf3 =....Abdominal.ObliquusWrapping.WrappingSeg.Layer3WrappingPoints.Left.nn08.Translate.InwardCyl;

    SPLine.StringMesh=240;

    SPLine = {
      AnyMatrix InitWrapPos = {
        transf3D({0,-.srf2.radius, 0.5*.srf2.Length}, &.srf2),
        transf3D({0,-.srf3.radius, 0.5*.srf3.Length}, &.srf3)
      };
      InitWrapPosVecArr = {&InitWrapPos};
    };
    viewMuscle = {#include "../DrawSettings/MusDrawSettings.any"};
    viewForce.Visible ??= Off;
  };


  AnyMuscleShortestPath OIC_8_extra = {
    AnyMuscleModel &MusMdl = ....MuscleModels.Left.ObliquusInternus.OIC_8;
    AnyRefNode &Org = ....Segments.SternalBodySeg.RACP_Via_2_L;
    AnyRefNode &Ins = ....Segments.PelvisSeg.Left.ObliquusInternusNode_6;

    AnyParamSurf &srf2 =....Abdominal.ObliquusWrapping.WrappingSeg.Layer2WrappingPoints.Left.nn10.Translate.InwardCyl;
    AnyParamSurf &srf3 =....Abdominal.ObliquusWrapping.WrappingSeg.Layer3WrappingPoints.Left.nn08.Translate.InwardCyl;

    SPLine.StringMesh=240;

    SPLine = {
      AnyMatrix InitWrapPos = {
        transf3D({0,-.srf2.radius, 0.5*.srf2.Length}, &.srf2),
        transf3D({0,-.srf3.radius, 0.5*.srf3.Length}, &.srf3)
      };
      InitWrapPosVecArr = {&InitWrapPos};
    };
    viewMuscle = {#include "../DrawSettings/MusDrawSettings.any"};
    viewForce.Visible ??= Off;
  };

  AnyMuscleShortestPath OIC_9 = {
    AnyMuscleModel &MusMdl = ....MuscleModels.Left.ObliquusInternus.OIC_9;
    AnyRefNode &Org =      ....Abdominal.Layer_L1.BaseSegAnterior.mid;
    AnyRefNode &Ins = ....Segments.PelvisSeg.Left.ObliquusInternusNode_6;

    // AnyParamSurf &srf1 =....Abdominal.ObliquusWrapping.WrappingSeg.Layer2WrappingPoints.Left.nn11.Translate.InwardCyl;
    AnyParamSurf &srf2 =....Abdominal.ObliquusWrapping.WrappingSeg.Layer3WrappingPoints.Left.nn10.Translate.InwardCyl;
    AnyParamSurf &srf3 =....Abdominal.ObliquusWrapping.WrappingSeg.Layer4WrappingPoints.Left.nn09.Translate.InwardCyl;

    SPLine.StringMesh=60;

    SPLine = {
      AnyMatrix InitWrapPos = {
        //   transf3D({0,-.srf1.radius, 0.5*.srf1.Length}, &.srf1),
        transf3D({0,-.srf2.radius, 0.5*.srf2.Length}, &.srf2),
        transf3D({0,-.srf3.radius, 0.5*.srf3.Length}, &.srf3)
      };
      InitWrapPosVecArr = {&InitWrapPos};
    };

    viewMuscle = {#include "../DrawSettings/MusDrawSettings.any"};
    viewForce.Visible ??= Off;
  };

  AnyMuscleShortestPath OIC_10 = {
    AnyMuscleModel &MusMdl = ....MuscleModels.Left.ObliquusInternus.OIC_10;
    AnyRefNode &Org =      ....Abdominal.Layer_L2.BaseSegAnterior.mid;
    AnyRefNode &Ins = ....Segments.PelvisSeg.Left.ObliquusInternusNode_6;

    AnyParamSurf &srf1 =....Abdominal.ObliquusWrapping.WrappingSeg.Layer3WrappingPoints.Left.nn11.Translate.InwardCyl;
    AnyParamSurf &srf2 =....Abdominal.ObliquusWrapping.WrappingSeg.Layer4WrappingPoints.Left.nn09.Translate.InwardCyl;

    SPLine.StringMesh=60;

    SPLine = {
      AnyMatrix InitWrapPos = {
        transf3D({0,-.srf1.radius, 0.5*.srf1.Length}, &.srf1),
        transf3D({0,-.srf2.radius, 0.5*.srf2.Length}, &.srf2)
      };
      InitWrapPosVecArr = {&InitWrapPos};
    };

    viewMuscle = {#include "../DrawSettings/MusDrawSettings.any"};
    viewForce.Visible ??= Off;
  };


  AnyMuscleShortestPath OIC_11 = {
    AnyMuscleModel &MusMdl = ....MuscleModels.Left.ObliquusInternus.OIC_11;
    AnyRefNode &Org = ....Abdominal.Layer_L3.BaseSegAnterior.mid;
    AnyRefNode &Ins = ....Segments.PelvisSeg.Left.ObliquusInternusNode_7;

    AnyParamSurf &srf1 =....Abdominal.ObliquusWrapping.WrappingSeg.Layer4WrappingPoints.Left.nn11.Translate.InwardCyl;
    AnyParamSurf &srf2 =....Abdominal.ObliquusWrapping.WrappingSeg.Layer5WrappingPoints.Left.nn08.Translate.InwardCyl;

    SPLine.StringMesh=60;

    SPLine = {
      AnyMatrix InitWrapPos = {
        transf3D({0,-.srf1.radius, 0.5*.srf1.Length}, &.srf1),
        transf3D({0,-.srf2.radius, 0.5*.srf2.Length}, &.srf2)
      };
      InitWrapPosVecArr = {&InitWrapPos};
    };

    viewMuscle = {#include "../DrawSettings/MusDrawSettings.any"};
    viewForce.Visible ??= Off;
  };


  AnyMuscleShortestPath OIC_12 = {
    AnyMuscleModel &MusMdl = ....MuscleModels.Left.ObliquusInternus.OIC_12;
    AnyRefNode &Org =      ....Abdominal.Layer_L4.BaseSegAnterior.mid;
    AnyRefNode &Ins = ....Segments.PelvisSeg.Left.ObliquusInternusNode_7;

    AnyParamSurf &srf1 =....Abdominal.ObliquusWrapping.WrappingSeg.Layer5WrappingPoints.Left.nn09.Translate.InwardCyl;

    SPLine.StringMesh=60;

    SPLine = {
      AnyMatrix InitWrapPos = {
        transf3D({0,-.srf1.radius, 0.5*.srf1.Length}, &.srf1)
      };
      InitWrapPosVecArr = {&InitWrapPos};
    };

    viewMuscle = {#include "../DrawSettings/MusDrawSettings.any"};
    viewForce.Visible ??= Off;
  };

  AnyMuscleShortestPath  OIC_13= {
    AnyMuscleModel &MusMdl = ....MuscleModels.Left.ObliquusInternus.OIC_13;
    AnyRefNode &Org = ....Abdominal.Layer_L5.BaseSegAnterior.mid;
    AnyRefNode &Ins = ....Segments.PelvisSeg.Left.ObliquusInternusNode_8;

    AnyParamSurf &srf1 =....Abdominal.ObliquusWrapping.WrappingSeg.Layer5WrappingPoints.Left.nn11.Translate.InwardCyl;

    SPLine.StringMesh=60;

    SPLine = {
      AnyMatrix InitWrapPos = {
        transf3D({0,-.srf1.radius, 0.5*.srf1.Length}, &.srf1)
      };
      InitWrapPosVecArr = {&InitWrapPos};
    };

    viewMuscle = {#include "../DrawSettings/MusDrawSettings.any"};
    viewForce.Visible ??= Off;
  };

  #endif

  #ifndef OBLIQUUS_WRAP_ON_CYLS


  AnyMuscleViaPoint OIC_1 = {
    AnyMuscleModel &MusMdl = ....MuscleModels.Left.ObliquusInternus.OIC_1;
    AnyRefNode &Org = ....Segments.Left.R12Seg.ObliquusExternusNode;
    AnyRefNode &Ins = ....Segments.PelvisSeg.Left.ObliquusInternusNode_1;
    viewMuscle = {#include "../DrawSettings/MusDrawSettings.any"};
    viewForce.Visible ??= Off;
    #include "MusclesSharedCode.any"
  };


  AnyMuscleViaPoint OIC_2 = {
    AnyMuscleModel &MusMdl = ....MuscleModels.Left.ObliquusInternus.OIC_2;
    AnyRefNode &Org = ....Segments.Left.R11Seg.ObliquusExternusNode1;
    AnyRefNode &Ins = ....Segments.PelvisSeg.Left.ObliquusInternusNode_2;
    viewMuscle = {#include "../DrawSettings/MusDrawSettings.any"};
    viewForce.Visible ??= Off;
    #include "MusclesSharedCode.any"
  };


  AnyMuscleViaPoint OIC_3 = {
    AnyMuscleModel &MusMdl = ....MuscleModels.Left.ObliquusInternus.OIC_3;
    AnyRefNode &Org = ....Segments.Left.R11Seg.ObliquusExternusNode;
    AnyRefNode &Ins = ....Segments.PelvisSeg.Left.ObliquusInternusNode_3;
    viewMuscle = {#include "../DrawSettings/MusDrawSettings.any"};
    viewForce.Visible ??= Off;
    #include "MusclesSharedCode.any"
  };


  AnyMuscleViaPoint OIC_4 = {
    AnyMuscleModel &MusMdl = ....MuscleModels.Left.ObliquusInternus.OIC_4;
    AnyRefNode &Org = ....Segments.Left.R10Seg.ObliquusExternusNode_2;
    AnyRefNode &Ins = ....Segments.PelvisSeg.Left.ObliquusInternusNode_4;
    viewMuscle = {#include "../DrawSettings/MusDrawSettings.any"};
    viewForce.Visible ??= Off;
    #include "MusclesSharedCode.any"
  };


  AnyMuscleViaPoint OIC_5 = {
    AnyMuscleModel &MusMdl = ....MuscleModels.Left.ObliquusInternus.OIC_5;
    AnyRefNode &Org = ....Segments.Left.R10Seg.ObliquusExternusNode_1;
    AnyRefNode &Ins = ....Segments.PelvisSeg.Left.ObliquusInternusNode_4_1;
    viewMuscle = {#include "../DrawSettings/MusDrawSettings.any"};
    viewForce.Visible ??= Off;
    #include "MusclesSharedCode.any"
  };


  AnyMuscleShortestPath OIC_6 = {
    AnyMuscleModel &MusMdl = ....MuscleModels.Left.ObliquusInternus.OIC_6;
    #if BM_TRUNK_THORACIC_STERNUM_TOPOLOGY == 4
    AnyRefNode &Org = ....Segments.Left.CostalCartilageSeg.ObliquusInternus_1;
    #else
    AnyRefNode &Org = ....Segments.SternalBodySeg.Left.ObliquusInternusNode_1;
    #endif
    AnyRefNode &Ins = ....Segments.PelvisSeg.Left.ObliquusInternusNode_5;
    // AnySurfTriCylMesh &mesh2 = Main.HumanModel.BodyModel.Trunk.Abdominal.Layer_L2.BaseSegAnterior.mesh;
    // AnySurfTriCylMesh &mesh3 = Main.HumanModel.BodyModel.Trunk.Abdominal.Layer_L3.BaseSegAnterior.mesh;
    //AnySurfTriCylMesh &mesh4 = Main.HumanModel.BodyModel.Trunk.Abdominal.Layer_L4.BaseSegAnterior.mesh;
    //AnySurfTriCylMesh  &mesh5 = Main.HumanModel.BodyModel.Trunk.Abdominal.Layer_L5.BaseSegAnterior.mesh;

    //    #if MESH_TYPE == "ELLIPSOID_SIDE"
    //   AnySurfEllipsoid &mesh3 = Main.HumanModel.BodyModel.Trunk.Abdominal.Layer_L3.BaseSegAnterior.Left.mesh;
    //  #else
    //  AnySurfTriCylMesh &mesh3 = Main.HumanModel.BodyModel.Trunk.Abdominal.Layer_L3.BaseSegAnterior.mesh;
    //  #endif
    AnySurfEllipsoid &mesh3 = Main.HumanModel.BodyModel.Trunk.Abdominal.Layer_L3.BaseSegAnterior.mesh3;


    SPLine.StringMesh=60;

    SPLine = {

      //  #if MESH_TYPE == "ELLIPSOID"
      //    AnyMatrix InitWrapPos = {
      //   //   transf3D({.mesh2.Radius[0],0,0}, &.mesh2),
      //      transf3D({.mesh3.Radius[0],0,0}, &.mesh3),
      //    //  transf3D({.mesh4.Radius[0],0,0}, &.mesh4),
      //     // transf3D({.mesh5.Radius[0],0,0}, &.mesh5),
      //    };
      //    #endif
      //       #if MESH_TYPE == "ELLIPSOID_SIDE"
      //    AnyMatrix InitWrapPos = {
      //
      //      transf3D({0,.mesh3.Radius[1],0}, &.mesh3),
      //      //transf3D({0,.mesh4.Radius[1],0}, &.mesh4),
      //    };
      //    #endif
      //
      //
      //    #if MESH_TYPE == "QUAD"
      //    AnyMatrix InitWrapPos = {
      //     // transf3D(.mesh2.Points[floor(.mesh2.MeshSize*0.75)+2*.mesh2.MeshSize*6]+{0.02,0,0}, &.mesh2),
      //      transf3D(.mesh3.Points[floor(.mesh3.MeshSize*0.75)+2*.mesh3.MeshSize*6]+{0.02,0,0}, &.mesh3),
      //      transf3D(.mesh4.Points[floor(.mesh4.MeshSize*0.7)+2*.mesh4.MeshSize*6]+{0.02,0,0}, &.mesh4),
      //     // transf3D(.mesh5.Points[floor(.mesh5.MeshSize*0.65)+2*.mesh5.MeshSize*6]+{0.02,0,0}, &.mesh5)
      //    };
      //    #endif
      AnyMatrix InitWrapPos = {
        transf3D({.mesh3.Radius[0],0,-.mesh3.Radius[2]}, &.mesh3),
      };

      InitWrapPosVecArr = {&InitWrapPos};
    };
    viewMuscle = {#include "../DrawSettings/MusDrawSettings.any"};
    viewForce.Visible ??= Off;
    #include "MusclesSharedCode_SPLine.any"
  };

  AnyMuscleShortestPath OIC_7 = {
    AnyMuscleModel &MusMdl = ....MuscleModels.Left.ObliquusInternus.OIC_7;
    #if BM_TRUNK_THORACIC_STERNUM_TOPOLOGY == 4
    AnyRefNode &Org = ....Segments.Left.CostalCartilageSeg.ObliquusInternus_2;
    #else
    AnyRefNode &Org = ....Segments.SternalBodySeg.Left.ObliquusInternusNode_2;
    #endif
    AnyRefNode &Ins = ....Segments.PelvisSeg.Left.ObliquusInternusNode_5;

    ////  AnySurfTriCylMesh &mesh2 = Main.HumanModel.BodyModel.Trunk.Abdominal.Layer_L2.BaseSegAnterior.mesh;
    ////  AnySurfTriCylMesh &mesh3 = Main.HumanModel.BodyModel.Trunk.Abdominal.Layer_L3.BaseSegAnterior.mesh;
    ////  AnySurfTriCylMesh &mesh4 = Main.HumanModel.BodyModel.Trunk.Abdominal.Layer_L4.BaseSegAnterior.mesh;
    //// AnySurfTriCylMesh &mesh5 = Main.HumanModel.BodyModel.Trunk.Abdominal.Layer_L5.BaseSegAnterior.mesh;
    // #if MESH_TYPE == "ELLIPSOID_SIDE"
    //   AnySurfEllipsoid &mesh2 = Main.HumanModel.BodyModel.Trunk.Abdominal.Layer_L2.BaseSegAnterior.Left.mesh;
    //   AnySurfEllipsoid &mesh3 = Main.HumanModel.BodyModel.Trunk.Abdominal.Layer_L3.BaseSegAnterior.Left.mesh;
    //   AnySurfEllipsoid &mesh4 = Main.HumanModel.BodyModel.Trunk.Abdominal.Layer_L4.BaseSegAnterior.Left.mesh;
    // #else
    //    AnySurfTriCylMesh &mesh2 = Main.HumanModel.BodyModel.Trunk.Abdominal.Layer_L2.BaseSegAnterior.mesh;
    //    AnySurfTriCylMesh &mesh3 = Main.HumanModel.BodyModel.Trunk.Abdominal.Layer_L3.BaseSegAnterior.mesh;
    //    AnySurfTriCylMesh &mesh4 = Main.HumanModel.BodyModel.Trunk.Abdominal.Layer_L4.BaseSegAnterior.mesh;
    //  #endif
    //   AnySurfEllipsoid &mesh2 = Main.HumanModel.BodyModel.Trunk.Abdominal.Layer_L2.BaseSegAnterior.mesh3;
    AnySurfEllipsoid &mesh3 = Main.HumanModel.BodyModel.Trunk.Abdominal.Layer_L3.BaseSegAnterior.mesh3;
    AnySurfEllipsoid &mesh4 = Main.HumanModel.BodyModel.Trunk.Abdominal.Layer_L4.BaseSegAnterior.mesh3;


    SPLine.StringMesh=240;

    SPLine = {

      //   #if MESH_TYPE == "ELLIPSOID"
      //    AnyMatrix InitWrapPos = {
      //      transf3D({.mesh2.Radius[0],0,0}, &.mesh2),
      //      transf3D({.mesh3.Radius[0],0,0}, &.mesh3),
      //      transf3D({.mesh4.Radius[0],0,0}, &.mesh4),
      //    //  transf3D({.mesh5.Radius[0],0,0}, &.mesh5),
      //    };
      //    #endif
      //
      //       #if MESH_TYPE == "ELLIPSOID_SIDE"
      //    AnyMatrix InitWrapPos = {
      //      transf3D({0,.mesh2.Radius[1],0}, &.mesh2),
      //      transf3D({0,.mesh3.Radius[1],0}, &.mesh3),
      //      transf3D({0,.mesh4.Radius[1],0}, &.mesh4),
      //    };
      //    #endif
      //
      //    #if MESH_TYPE == "QUAD"
      //    AnyMatrix InitWrapPos = {
      //      transf3D(.mesh2.Points[floor(.mesh2.MeshSize*0.75)+2*.mesh2.MeshSize*6]+{0.02,0,0}, &.mesh2),
      //      transf3D(.mesh3.Points[floor(.mesh3.MeshSize*0.75)+2*.mesh3.MeshSize*6]+{0.02,0,0}, &.mesh3),
      //      transf3D(.mesh4.Points[floor(.mesh4.MeshSize*0.7)+2*.mesh4.MeshSize*6]+{0.02,0,0}, &.mesh4),
      //     // transf3D(.mesh5.Points[floor(.mesh5.MeshSize*0.65)+2*.mesh5.MeshSize*6]+{0.02,0,0}, &.mesh5)
      //    };
      //    #endif
      AnyMatrix InitWrapPos = {
        //      transf3D({.mesh2.Radius[0],0,0}, &.mesh2),
        transf3D({.mesh3.Radius[0],0,-.mesh3.Radius[2]}, &.mesh3),
        transf3D({.mesh4.Radius[0],0,-.mesh4.Radius[2]}, &.mesh4),
        //  transf3D({.mesh5.Radius[0],0,0}, &.mesh5),
      };

      InitWrapPosVecArr = {&InitWrapPos};
    };
    viewMuscle = {#include "../DrawSettings/MusDrawSettings.any"};
    viewForce.Visible ??= Off;
    #include "MusclesSharedCode_SPLine.any"
  };


  AnyMuscleShortestPath OIC_8 = {
    AnyMuscleModel &MusMdl = ....MuscleModels.Left.ObliquusInternus.OIC_8;
    AnyRefNode &Org = ....Segments.SternalBodySeg.RACP_Via_2_L;
    // AnyRefNode &Via = Main.HumanModel.BodyModel.Trunk.Abdominal.Layer_L1.BaseSegAnterior.TransversusPoints.Left.nn05;

    AnyRefNode &Ins = ....Segments.PelvisSeg.Left.ObliquusInternusNode_6;
    //// AnySurfTriCylMesh &mesh2 = Main.HumanModel.BodyModel.Trunk.Abdominal.Layer_L2.BaseSegAnterior.mesh;
    //// AnySurfTriCylMesh &mesh3 = Main.HumanModel.BodyModel.Trunk.Abdominal.Layer_L3.BaseSegAnterior.mesh;
    //// AnySurfTriCylMesh &mesh4 = Main.HumanModel.BodyModel.Trunk.Abdominal.Layer_L4.BaseSegAnterior.mesh;
    // #if MESH_TYPE == "ELLIPSOID_SIDE"
    //   AnySurfEllipsoid &mesh2 = Main.HumanModel.BodyModel.Trunk.Abdominal.Layer_L2.BaseSegAnterior.Left.mesh;
    //   AnySurfEllipsoid &mesh3 = Main.HumanModel.BodyModel.Trunk.Abdominal.Layer_L3.BaseSegAnterior.Left.mesh;
    //   AnySurfEllipsoid &mesh4 = Main.HumanModel.BodyModel.Trunk.Abdominal.Layer_L4.BaseSegAnterior.Left.mesh;
    // #else
    //    AnySurfTriCylMesh &mesh2 = Main.HumanModel.BodyModel.Trunk.Abdominal.Layer_L2.BaseSegAnterior.mesh;
    //    AnySurfTriCylMesh &mesh3 = Main.HumanModel.BodyModel.Trunk.Abdominal.Layer_L3.BaseSegAnterior.mesh;
    //    AnySurfTriCylMesh &mesh4 = Main.HumanModel.BodyModel.Trunk.Abdominal.Layer_L4.BaseSegAnterior.mesh;
    //  #endif

    //   AnySurfEllipsoid &mesh1 = Main.HumanModel.BodyModel.Trunk.Abdominal.Layer_L1.BaseSegAnterior.mesh3;
    //   AnySurfEllipsoid &mesh2 = Main.HumanModel.BodyModel.Trunk.Abdominal.Layer_L2.BaseSegAnterior.mesh3;
    AnySurfEllipsoid &mesh3 = Main.HumanModel.BodyModel.Trunk.Abdominal.Layer_L3.BaseSegAnterior.mesh3;
    AnySurfEllipsoid &mesh4 = Main.HumanModel.BodyModel.Trunk.Abdominal.Layer_L4.BaseSegAnterior.mesh3;


    SPLine.StringMesh=240;

    SPLine = {
      //    SolverVersion=3;
      // StringSurfaceMap= {{Off,Off,Off,Off},{On,On,On,On}};  //no wrap before after via


      //  #if MESH_TYPE == "ELLIPSOID"
      //    AnyMatrix InitWrapPos = {
      //      transf3D({.mesh2.Radius[0],0,0}, &.mesh2),
      //      transf3D({.mesh3.Radius[0],0,0}, &.mesh3),
      //      transf3D({.mesh4.Radius[0],0,0}, &.mesh4),
      //    };
      //    #endif
      //       #if MESH_TYPE == "ELLIPSOID_SIDE"
      //    AnyMatrix InitWrapPos = {
      //      transf3D({0,.mesh2.Radius[1],0}, &.mesh2),
      //      transf3D({0,.mesh3.Radius[1],0}, &.mesh3),
      //      transf3D({0,.mesh4.Radius[1],0}, &.mesh4),
      //    };
      //    #endif

      //    #if MESH_TYPE == "QUAD"
      //  AnyMatrix InitWrapPos = {
      //    //      transf3D({0.0,2*.srf1.MajorRadius,-.srf1.MajorRadius}, &.srf1),
      //    //      transf3D(.mesh1.Points[52]+{0.03,0,0}, &.mesh1),
      //    //   transf3D(.mesh1.Points[floor(.mesh2.MeshSize*0.8)+2*.mesh2.MeshSize*4]+{0.01,0,0}, &.mesh1),
      //    transf3D(.mesh2.Points[floor(.mesh2.MeshSize*0.75)+2*.mesh2.MeshSize*6]+{0.02,0,0}, &.mesh2),
      //    transf3D(.mesh3.Points[floor(.mesh3.MeshSize*0.7)+2*.mesh3.MeshSize*6]+{0.02,0,0}, &.mesh3),
      //     transf3D(.mesh4.Points[floor(.mesh4.MeshSize*0.65)+2*.mesh4.MeshSize*6]+{0.02,0,0}, &.mesh4),
      ////     transf3D(mesh.Points[floor(.mesh.MeshSize*4]+{0.01,0,0}, &.mesh),
      //
      //   //      transf3D(.mesh5.Points[floor(.mesh5.MeshSize*0.65)+2*.mesh5.MeshSize*6]+{0.02,0,0}, &.mesh5)
      //  };
      //
      //    #endif

      AnyMatrix InitWrapPos = {
        //      transf3D({.mesh1.Radius[0],0,0}, &.mesh1),
        //      transf3D({.mesh2.Radius[0],0,0}, &.mesh2),
        transf3D({.mesh3.Radius[0],0,-.mesh3.Radius[2]}, &.mesh3),
        transf3D({.mesh4.Radius[0],0,-.mesh4.Radius[2]}, &.mesh4),
      };


      InitWrapPosVecArr = {&InitWrapPos};
      //InitWrapPosVecArr = {&InitWrapPos};


    };
    viewMuscle = {#include "../DrawSettings/MusDrawSettings.any"};
    viewForce.Visible ??= Off;
    #include "MusclesSharedCode_SPLine.any"
  };

  AnyMuscleShortestPath OIC_9 = {
    AnyMuscleModel &MusMdl = ....MuscleModels.Left.ObliquusInternus.OIC_9;
    AnyRefNode &Org = ....Segments.SternalBodySeg.Xiphoid_DiaphragmNodeL;
    AnyRefNode &Via = Main.HumanModel.BodyModel.Trunk.Abdominal.Layer_L1.BaseSegAnterior.TransversusPoints.Left.nn06;

    AnyRefNode &Ins = ....Segments.PelvisSeg.Left.ObliquusInternusNode_6;

    //AnySurfTriCylMesh &mesh2 = Main.HumanModel.BodyModel.Trunk.Abdominal.Layer_L2.BaseSegAnterior.mesh;
    //AnySurfTriCylMesh &mesh3 = Main.HumanModel.BodyModel.Trunk.Abdominal.Layer_L3.BaseSegAnterior.mesh;
    //AnySurfTriCylMesh &mesh4 = Main.HumanModel.BodyModel.Trunk.Abdominal.Layer_L4.BaseSegAnterior.mesh;
    // AnySurfTriCylMesh &mesh5 = Main.HumanModel.BodyModel.Trunk.Abdominal.Layer_L5.BaseSegAnterior.mesh;

    // #if MESH_TYPE == "ELLIPSOID_SIDE"
    //   AnySurfEllipsoid &mesh2 = Main.HumanModel.BodyModel.Trunk.Abdominal.Layer_L2.BaseSegAnterior.Left.mesh;
    //   AnySurfEllipsoid &mesh3 = Main.HumanModel.BodyModel.Trunk.Abdominal.Layer_L3.BaseSegAnterior.Left.mesh;
    //   AnySurfEllipsoid &mesh4 = Main.HumanModel.BodyModel.Trunk.Abdominal.Layer_L4.BaseSegAnterior.Left.mesh;
    // #else
    //    AnySurfTriCylMesh &mesh2 = Main.HumanModel.BodyModel.Trunk.Abdominal.Layer_L2.BaseSegAnterior.mesh;
    //    AnySurfTriCylMesh &mesh3 = Main.HumanModel.BodyModel.Trunk.Abdominal.Layer_L3.BaseSegAnterior.mesh;
    //    AnySurfTriCylMesh &mesh4 = Main.HumanModel.BodyModel.Trunk.Abdominal.Layer_L4.BaseSegAnterior.mesh;
    //  #endif

    //   AnySurfEllipsoid &mesh2 = Main.HumanModel.BodyModel.Trunk.Abdominal.Layer_L2.BaseSegAnterior.mesh3;
    AnySurfEllipsoid &mesh3 = Main.HumanModel.BodyModel.Trunk.Abdominal.Layer_L3.BaseSegAnterior.mesh3;
    AnySurfEllipsoid &mesh4 = Main.HumanModel.BodyModel.Trunk.Abdominal.Layer_L4.BaseSegAnterior.mesh3;


    SPLine.StringMesh=240;

    SPLine = {
      //    StringSurfaceMap= {{Off,Off,Off},{On,On,On}};  //no wrap before after via
      StringSurfaceMap= {{Off,Off},{On,On}};  //no wrap before after via

      //   #if MESH_TYPE == "ELLIPSOID"
      //    AnyMatrix InitWrapPos = {
      //      transf3D({.mesh2.Radius[0],0,0}, &.mesh2),
      //      transf3D({.mesh3.Radius[0],0,0}, &.mesh3),
      //      transf3D({.mesh4.Radius[0],0,0}, &.mesh4),
      //  //    transf3D({.mesh5.Radius[0],0,0}, &.mesh5),
      //    };
      //    #endif
      //       #if MESH_TYPE == "ELLIPSOID_SIDE"
      //    AnyMatrix InitWrapPos = {
      //      transf3D({0,.mesh2.Radius[1],0}, &.mesh2),
      //      transf3D({0,.mesh3.Radius[1],0}, &.mesh3),
      //      transf3D({0,.mesh4.Radius[1],0}, &.mesh4),
      //    };
      //    #endif
      //
      //    #if MESH_TYPE == "QUAD"
      //    AnyMatrix InitWrapPos = {
      //       transf3D(.mesh2.Points[floor(.mesh2.MeshSize*0.8)+2*.mesh2.MeshSize*6]+{0.02,0,0}, &.mesh2),
      //       transf3D(.mesh3.Points[floor(.mesh3.MeshSize*0.7)+2*.mesh3.MeshSize*6]+{0.02,0,0}, &.mesh3),
      //      transf3D(.mesh4.Points[floor(.mesh4.MeshSize*0.6)+2*.mesh4.MeshSize*6]+{0.02,0,0}, &.mesh4),
      //  //    transf3D(.mesh5.Points[floor(.mesh5.MeshSize*0.6)+2*.mesh5.MeshSize*6]+{0.02,0,0}, &.mesh5)
      //    };
      //
      //    #endif
      AnyMatrix InitWrapPos = {
        //      transf3D({.mesh2.Radius[0],0,0}, &.mesh2),
        transf3D({.mesh3.Radius[0],0,-.mesh3.Radius[2]}, &.mesh3),
        transf3D({.mesh4.Radius[0],0,-.mesh4.Radius[2]}, &.mesh4),
        //    transf3D({.mesh5.Radius[0],0,0}, &.mesh5),
      };

      InitWrapPosVecArr = {None,&InitWrapPos};
    };
    viewMuscle = {#include "../DrawSettings/MusDrawSettings.any"};
    viewForce.Visible ??= Off;
    #include "MusclesSharedCode_SPLine.any"
  };

  AnyMuscleShortestPath OIC_10 = {
    AnyMuscleModel &MusMdl = ....MuscleModels.Left.ObliquusInternus.OIC_10;
    AnyRefNode &Org =      ....Abdominal.Layer_L1.BaseSegAnterior.mid;
    AnyRefNode &Ins = ....Segments.PelvisSeg.Left.ObliquusInternusNode_6;

    ////  AnySurfTriCylMesh &mesh2 = Main.HumanModel.BodyModel.Trunk.Abdominal.Layer_L2.BaseSegAnterior.mesh;
    ////  AnySurfTriCylMesh &mesh3 = Main.HumanModel.BodyModel.Trunk.Abdominal.Layer_L3.BaseSegAnterior.mesh;
    // // AnySurfTriCylMesh &mesh4 = Main.HumanModel.BodyModel.Trunk.Abdominal.Layer_L4.BaseSegAnterior.mesh;
    //  //AnySurfTriCylMesh &mesh5 = Main.HumanModel.BodyModel.Trunk.Abdominal.Layer_L5.BaseSegAnterior.mesh;
    //
    //
    //   #if MESH_TYPE == "ELLIPSOID_SIDE"
    //   AnySurfEllipsoid &mesh2 = Main.HumanModel.BodyModel.Trunk.Abdominal.Layer_L2.BaseSegAnterior.Left.mesh;
    //   AnySurfEllipsoid &mesh3 = Main.HumanModel.BodyModel.Trunk.Abdominal.Layer_L3.BaseSegAnterior.Left.mesh;
    //   AnySurfEllipsoid &mesh4 = Main.HumanModel.BodyModel.Trunk.Abdominal.Layer_L4.BaseSegAnterior.Left.mesh;
    //   AnySurfEllipsoid &meshpelvis = Main.HumanModel.BodyModel.Trunk.Abdominal.Layer_Pelvic1.BaseSegAnterior.mesh;
    // #else
    //    AnySurfTriCylMesh &mesh2 = Main.HumanModel.BodyModel.Trunk.Abdominal.Layer_L2.BaseSegAnterior.mesh;
    //    AnySurfTriCylMesh &mesh3 = Main.HumanModel.BodyModel.Trunk.Abdominal.Layer_L3.BaseSegAnterior.mesh;
    //    AnySurfTriCylMesh &mesh4 = Main.HumanModel.BodyModel.Trunk.Abdominal.Layer_L4.BaseSegAnterior.mesh;
    //  #endif

    AnySurfEllipsoid &mesh2 = Main.HumanModel.BodyModel.Trunk.Abdominal.Layer_L2.BaseSegAnterior.mesh3;
    AnySurfEllipsoid &mesh3 = Main.HumanModel.BodyModel.Trunk.Abdominal.Layer_L3.BaseSegAnterior.mesh3;
    AnySurfEllipsoid &mesh4 = Main.HumanModel.BodyModel.Trunk.Abdominal.Layer_L4.BaseSegAnterior.mesh3;


    SPLine.StringMesh=240;

    SPLine = {


      //    #if MESH_TYPE == "ELLIPSOID"
      //    AnyMatrix InitWrapPos = {
      //      transf3D({.mesh2.Radius[0],0,0}, &.mesh2),
      //      transf3D({.mesh3.Radius[0],0,0}, &.mesh3),
      //      transf3D({.mesh4.Radius[0],0,0}, &.mesh4),
      //   //   transf3D({.mesh5.Radius[0],0,0}, &.mesh5),
      //
      //    };
      //    #endif
      //
      //
      //   #if MESH_TYPE == "ELLIPSOID_SIDE"
      //    AnyMatrix InitWrapPos = {
      //      transf3D({0,.mesh2.Radius[1],0}, &.mesh2),
      //      transf3D({0,.mesh3.Radius[1],0}, &.mesh3),
      //      transf3D({0,.mesh4.Radius[1],0}, &.mesh4),
      //    };
      //    #endif
      //
      //
      //
      //    #if MESH_TYPE == "QUAD"
      //    AnyMatrix InitWrapPos = {
      //      transf3D(.mesh2.Points[floor(.mesh2.MeshSize*0.75)+2*.mesh2.MeshSize*6]+{0.02,0,0}, &.mesh2),
      //      transf3D(.mesh3.Points[floor(.mesh3.MeshSize*0.7) +2*.mesh3.MeshSize*6]+{0.02,0,0}, &.mesh3),
      //      transf3D(.mesh4.Points[floor(.mesh4.MeshSize*0.65)+2*.mesh4.MeshSize*6]+{0.02,0,0}, &.mesh4),
      //   //   transf3D(.mesh5.Points[floor(.mesh5.MeshSize*0.6) +2*.mesh5.MeshSize*6]+{0.02,0,0}, &.mesh5)
      //    };
      //    #endif
      AnyMatrix InitWrapPos = {
        transf3D({.mesh2.Radius[0],0,-.mesh2.Radius[2]}, &.mesh2),
        transf3D({.mesh3.Radius[0],0,-.mesh3.Radius[2]}, &.mesh3),
        transf3D({.mesh4.Radius[0],0,-.mesh4.Radius[2]}, &.mesh4),
        //   transf3D({.mesh5.Radius[0],0,0}, &.mesh5),

      };

      InitWrapPosVecArr = {&InitWrapPos};
    };

    viewMuscle = {#include "../DrawSettings/MusDrawSettings.any"};
    viewForce.Visible ??= Off;
    #include "MusclesSharedCode_SPLine.any"
  };


  AnyMuscleShortestPath OIC_11 = {
    AnyMuscleModel &MusMdl = ....MuscleModels.Left.ObliquusInternus.OIC_11;
    AnyRefNode &Org =      ....Abdominal.Layer_L2.BaseSegAnterior.mid;
    AnyRefNode &Ins = ....Segments.PelvisSeg.Left.ObliquusInternusNode_6;

    ////  AnySurfTriCylMesh &mesh3 = Main.HumanModel.BodyModel.Trunk.Abdominal.Layer_L3.BaseSegAnterior.mesh;
    ////  AnySurfTriCylMesh &mesh4 = Main.HumanModel.BodyModel.Trunk.Abdominal.Layer_L4.BaseSegAnterior.mesh;
    ////  AnySurfTriCylMesh &mesh5 = Main.HumanModel.BodyModel.Trunk.Abdominal.Layer_L5.BaseSegAnterior.mesh;
    //
    //   #if MESH_TYPE == "ELLIPSOID_SIDE"
    //   AnySurfEllipsoid &mesh3 = Main.HumanModel.BodyModel.Trunk.Abdominal.Layer_L3.BaseSegAnterior.Left.mesh;
    //   AnySurfEllipsoid &mesh4 = Main.HumanModel.BodyModel.Trunk.Abdominal.Layer_L4.BaseSegAnterior.Left.mesh;
    //   AnySurfEllipsoid &mesh5 = Main.HumanModel.BodyModel.Trunk.Abdominal.Layer_L5.BaseSegAnterior.Left.mesh;
    //   AnySurfEllipsoid &meshpelvis = Main.HumanModel.BodyModel.Trunk.Abdominal.Layer_Pelvic1.BaseSegAnterior.mesh;
    //
    //   #else
    //    AnySurfTriCylMesh &mesh3 = Main.HumanModel.BodyModel.Trunk.Abdominal.Layer_L3.BaseSegAnterior.mesh;
    //    AnySurfTriCylMesh &mesh4 = Main.HumanModel.BodyModel.Trunk.Abdominal.Layer_L4.BaseSegAnterior.mesh;
    //    AnySurfTriCylMesh &mesh5 = Main.HumanModel.BodyModel.Trunk.Abdominal.Layer_L5.BaseSegAnterior.mesh;
    //
    //    #endif

    AnySurfEllipsoid &mesh3 = Main.HumanModel.BodyModel.Trunk.Abdominal.Layer_L3.BaseSegAnterior.mesh3;
    AnySurfEllipsoid &mesh4 = Main.HumanModel.BodyModel.Trunk.Abdominal.Layer_L4.BaseSegAnterior.mesh3;
    //   AnySurfEllipsoid &mesh5 = Main.HumanModel.BodyModel.Trunk.Abdominal.Layer_L5.BaseSegAnterior.mesh3;


    SPLine.StringMesh=300;


    SPLine = {


      //    #if MESH_TYPE == "ELLIPSOID"
      //    AnyMatrix InitWrapPos = {
      //
      //      transf3D({.mesh3.Radius[0],0,0}, &.mesh3),
      //      transf3D({.mesh4.Radius[0],0,0}, &.mesh4),
      //      transf3D({.mesh5.Radius[0],0,0}, &.mesh5),
      //
      //    };
      //    #endif
      //
      //
      //
      //  #if MESH_TYPE == "ELLIPSOID_SIDE"
      //    AnyMatrix InitWrapPos = {
      //           transf3D({0,.mesh3.Radius[1],0}, &.mesh3),
      //            transf3D({0,.mesh4.Radius[1],0}, &.mesh4),
      //            transf3D({0,.mesh5.Radius[1],0}, &.mesh5),
      //
      //          };
      //    #endif
      //
      //
      //
      //    #if MESH_TYPE == "QUAD"
      //    AnyMatrix InitWrapPos = {
      //
      //      transf3D(.mesh3.Points[floor(.mesh3.MeshSize*0.75)+2*.mesh3.MeshSize*6]+{0.02,0,0}, &.mesh3),
      //      transf3D(.mesh4.Points[floor(.mesh4.MeshSize*0.7)+2*.mesh4.MeshSize*6]+{0.02,0,0}, &.mesh4),
      //      transf3D(.mesh5.Points[floor(.mesh5.MeshSize*0.65)+2*.mesh5.MeshSize*6]+{0.02,0,0}, &.mesh5)
      //    };
      //    #endif

      AnyMatrix InitWrapPos = {

        transf3D({.mesh3.Radius[0],0,-.mesh3.Radius[2]}, &.mesh3),
        transf3D({.mesh4.Radius[0],0,-.mesh4.Radius[2]}, &.mesh4),
        //      transf3D({.mesh5.Radius[0],0,0}, &.mesh5),

      };


      InitWrapPosVecArr = {&InitWrapPos};
    };

    viewMuscle = {#include "../DrawSettings/MusDrawSettings.any"};
    viewForce.Visible ??= Off;
    #include "MusclesSharedCode_SPLine.any"
  };


  //

  AnyMuscleShortestPath OIC_12 = {
    AnyMuscleModel &MusMdl = ....MuscleModels.Left.ObliquusInternus.OIC_12;
    AnyRefNode &Org = ....Abdominal.Layer_L3.BaseSegAnterior.mid;
    AnyRefNode &Ins = ....Segments.PelvisSeg.Left.ObliquusInternusNode_7;

    //  //  AnyParamSurf &srf1 =....Abdominal.ObliquusWrapping.WrappingSeg.Layer4WrappingPoints.Left.nn11.Translate.InwardCyl;
    //  //  AnyParamSurf &srf2 =....Abdominal.ObliquusWrapping.WrappingSeg.Layer5WrappingPoints.Left.nn08.Translate.InwardCyl;
    ////  AnySurfTriCylMesh &mesh4 = Main.HumanModel.BodyModel.Trunk.Abdominal.Layer_L4.BaseSegAnterior.mesh;
    ////  AnySurfTriCylMesh &mesh5 = Main.HumanModel.BodyModel.Trunk.Abdominal.Layer_L5.BaseSegAnterior.mesh;
    //
    // #if MESH_TYPE == "ELLIPSOID_SIDE"
    //   AnySurfEllipsoid &mesh4 = Main.HumanModel.BodyModel.Trunk.Abdominal.Layer_L4.BaseSegAnterior.Left.mesh;
    //   AnySurfEllipsoid &mesh5 = Main.HumanModel.BodyModel.Trunk.Abdominal.Layer_L5.BaseSegAnterior.Left.mesh;
    //   AnySurfEllipsoid &meshpelvis = Main.HumanModel.BodyModel.Trunk.Abdominal.Layer_Pelvic1.BaseSegAnterior.mesh;
    //
    //   #else
    //    AnySurfTriCylMesh &mesh4 = Main.HumanModel.BodyModel.Trunk.Abdominal.Layer_L4.BaseSegAnterior.mesh;
    //    AnySurfTriCylMesh &mesh5 = Main.HumanModel.BodyModel.Trunk.Abdominal.Layer_L5.BaseSegAnterior.mesh;
    //
    //    #endif

    AnySurfEllipsoid &mesh4 = Main.HumanModel.BodyModel.Trunk.Abdominal.Layer_L4.BaseSegAnterior.mesh3;
    AnySurfEllipsoid &mesh5 = Main.HumanModel.BodyModel.Trunk.Abdominal.Layer_L5.BaseSegAnterior.mesh3;


    SPLine.StringMesh=240;

    SPLine = {


      //    #if MESH_TYPE == "ELLIPSOID"
      //    AnyMatrix InitWrapPos = {
      //
      //      transf3D({.mesh4.Radius[0],0,0}, &.mesh4),
      //      transf3D({.mesh5.Radius[0],0,0}, &.mesh5),
      //
      //    };
      //    #endif
      //
      //       #if MESH_TYPE == "ELLIPSOID_SIDE"
      //    AnyMatrix InitWrapPos = {
      //           transf3D({0,.mesh4.Radius[1],0}, &.mesh4),
      //            transf3D({0,.mesh5.Radius[1],0}, &.mesh5),
      //    };
      //    #endif
      //
      //    #if MESH_TYPE == "QUAD"
      //    AnyMatrix InitWrapPos = {
      //
      //      transf3D(.mesh4.Points[floor(.mesh4.MeshSize*0.75)+2*.mesh4.MeshSize*6]+{0.02,0,0}, &.mesh4),
      //      transf3D(.mesh5.Points[floor(.mesh5.MeshSize*0.65)+2*.mesh5.MeshSize*6]+{0.02,0,0}, &.mesh5)
      //    };
      //
      //    #endif
      AnyMatrix InitWrapPos = {

        transf3D({.mesh4.Radius[0],0,-.mesh4.Radius[2]}, &.mesh4),
        transf3D({.mesh5.Radius[0],0,-.mesh5.Radius[2]}, &.mesh5),

      };


      InitWrapPosVecArr = {&InitWrapPos};
    };
    viewMuscle = {#include "../DrawSettings/MusDrawSettings.any"};
    viewForce.Visible ??= Off;
    #include "MusclesSharedCode_SPLine.any"
  };


  AnyMuscleShortestPath OIC_13 = {
    AnyMuscleModel &MusMdl = ....MuscleModels.Left.ObliquusInternus.OIC_13;
    AnyRefNode &Org =      ....Abdominal.Layer_L4.BaseSegAnterior.mid;
    AnyRefNode &Ins = ....Segments.PelvisSeg.Left.ObliquusInternusNode_7;


    ////  AnySurfTriCylMesh &mesh5 = Main.HumanModel.BodyModel.Trunk.Abdominal.Layer_L5.BaseSegAnterior.mesh;
    //
    //   #if MESH_TYPE == "ELLIPSOID_SIDE"
    //   AnySurfEllipsoid &mesh5 = Main.HumanModel.BodyModel.Trunk.Abdominal.Layer_L5.BaseSegAnterior.Left.mesh;
    //   AnySurfEllipsoid &meshpelvis = Main.HumanModel.BodyModel.Trunk.Abdominal.Layer_Pelvic1.BaseSegAnterior.mesh;
    //
    //   #else
    //    AnySurfTriCylMesh &mesh5 = Main.HumanModel.BodyModel.Trunk.Abdominal.Layer_L5.BaseSegAnterior.mesh;
    //
    //    #endif
    AnySurfEllipsoid &mesh5 = Main.HumanModel.BodyModel.Trunk.Abdominal.Layer_L5.BaseSegAnterior.mesh3;


    SPLine.StringMesh=60;

    SPLine = {


      //    #if MESH_TYPE == "ELLIPSOID"
      //    AnyMatrix InitWrapPos = {
      //      transf3D({.mesh5.Radius[0],0,0}, &.mesh5),
      //    };
      //    #endif
      //       #if MESH_TYPE == "ELLIPSOID_SIDE"
      //    AnyMatrix InitWrapPos = {
      //      transf3D({0,.mesh5.Radius[1],0}, &.mesh5),
      //    };
      //    #endif
      //
      //
      //    #if MESH_TYPE == "QUAD"
      //    AnyMatrix InitWrapPos = {
      //
      //      transf3D(.mesh5.Points[floor(.mesh5.MeshSize*0.65)+2*.mesh5.MeshSize*6]+{0.02,0,0}, &.mesh5)
      //    };
      //
      //    #endif
      AnyMatrix InitWrapPos = {
        transf3D({.mesh5.Radius[0],0,-.mesh5.Radius[2]}, &.mesh5),
      };


      InitWrapPosVecArr = {&InitWrapPos};
    };

    viewMuscle = {#include "../DrawSettings/MusDrawSettings.any"};
    viewForce.Visible ??= Off;
    #include "MusclesSharedCode_SPLine.any"
  };

  AnyMuscleViaPoint  OIC_14= {
    AnyMuscleModel &MusMdl = ....MuscleModels.Left.ObliquusInternus.OIC_14;
    AnyRefNode &Org = ....Abdominal.Layer_L5.BaseSegAnterior.mid;
    AnyRefNode &Ins = ....Segments.PelvisSeg.Left.ObliquusInternusNode_8;

    //  AnySurfTriCylMesh &mesh5 = Main.HumanModel.BodyModel.Trunk.Abdominal.Layer_L5.BaseSegAnterior.mesh;
    //
    //  SPLine.StringMesh=60;
    //
    //  SPLine = {
    //    AnyMatrix InitWrapPos = {
    //      transf3D(.mesh5.Points[floor(.mesh5.MeshSize*0.65)+2*.mesh5.MeshSize*4]+{0.01,0,0}, &.mesh5)
    //
    //    };
    //    InitWrapPosVecArr = {&InitWrapPos};
    //  };
    //
    viewMuscle = {#include "../DrawSettings/MusDrawSettings.any"};
    viewForce.Visible ??= Off;
    #include "MusclesSharedCode.any"
  };
  #endif

  #endif

  #if BM_TRUNK_CAVITY_MODEL == _CAVITY_MODEL_BUCKLE_
  AnyMuscleViaPoint OIC_1 = {
    AnyMuscleModel &MusMdl = ....MuscleModels.Left.ObliquusInternus.OIC_1;
    AnyRefNode &Org = ....Segments.Left.R11Seg.ObliquusInternusNode;
    AnyRefNode &Ins = ....Segments.PelvisSeg.Left.ObliquusInternusNode_1;
    viewMuscle = {#include "../DrawSettings/MusDrawSettings.any"};
    viewForce.Visible ??= Off;
  };

  AnyMuscleViaPoint OIC_2 = {
    AnyMuscleModel &MusMdl = ....MuscleModels.Left.ObliquusInternus.OIC_2;
    AnyRefNode &Org = ....Segments.Left.R10Seg.ObliquusInternusNode_2;
    AnyRefNode &Ins = ....Segments.PelvisSeg.Left.ObliquusInternusNode_2;
    viewMuscle = {#include "../DrawSettings/MusDrawSettings.any"};
    viewForce.Visible ??= Off;
  };

  AnyMuscleViaPoint OIC_3 = {
    AnyMuscleModel &MusMdl = ....MuscleModels.Left.ObliquusInternus.OIC_3;
    AnyRefNode &Org = ....Segments.Left.R10Seg.ObliquusInternusNode_1;
    AnyRefNode &Ins = ....Segments.PelvisSeg.Left.ObliquusInternusNode_3;
    viewMuscle = {#include "../DrawSettings/MusDrawSettings.any"};
    viewForce.Visible ??= Off;
  };

  AnyMuscleViaPoint OIC_4 = {
    AnyMuscleModel &MusMdl = ....MuscleModels.Left.ObliquusInternus.OIC_4;
    AnyRefNode &Org = ....Segments.SternalBodySeg.Left.ObliquusInternusNode_1;
    AnyRefNode &Ins = ....Segments.PelvisSeg.Left.ObliquusInternusNode_4;
    viewMuscle = {#include "../DrawSettings/MusDrawSettings.any"};
    viewForce.Visible ??= Off;
  };

  AnyMuscleViaPoint OIC_5 = {
    AnyMuscleModel &MusMdl = ....MuscleModels.Left.ObliquusInternus.OIC_5;
    AnyRefNode &Org = ....Segments.SternalBodySeg.Left.ObliquusInternusNode_2;
    AnyRefNode &Ins = ....Segments.PelvisSeg.Left.ObliquusInternusNode_5;
    viewMuscle = {#include "../DrawSettings/MusDrawSettings.any"};
    viewForce.Visible ??= Off;
  };

  AnyMuscleViaPoint OIC_6 = {
    AnyMuscleModel &MusMdl = ....MuscleModels.Left.ObliquusInternus.OIC_6;
    AnyRefNode &Org = ....Buckle.Segments.BuckleSeg.Left.ObliquusInternusNode_1;
    AnyRefNode &Ins = ....Segments.PelvisSeg.Left.ObliquusInternusNode_6;
    viewMuscle = {#include "../DrawSettings/MusDrawSettings.any"};
    viewForce.Visible ??= Off;
  };

  AnyMuscleViaPoint OIC_7 = {
    AnyMuscleModel &MusMdl = ....MuscleModels.Left.ObliquusInternus.OIC_7;
    AnyRefNode &Org = ....Buckle.Segments.BuckleSeg.Left.ObliquusInternusNode_2;
    AnyRefNode &Ins = ....Segments.PelvisSeg.Left.ObliquusInternusNode_7;
    viewMuscle = {#include "../DrawSettings/MusDrawSettings.any"};
    viewForce.Visible ??= Off;
  };

  AnyMuscleViaPoint OIC_8 = {
    AnyMuscleModel &MusMdl = ....MuscleModels.Left.ObliquusInternus.OIC_8;
    AnyRefNode &Org = ....Buckle.Segments.BuckleSeg.Left.ObliquusInternusNode_3;
    AnyRefNode &Ins = ....Segments.PelvisSeg.Left.ObliquusInternusNode_8;
    viewMuscle = {#include "../DrawSettings/MusDrawSettings.any"};
    viewForce.Visible ??= Off;
  };

  AnyMuscleViaPoint OIC_9 = {
    AnyMuscleModel &MusMdl = ....MuscleModels.Left.ObliquusInternus.OIC_9;
    AnyRefNode &Org = ....Buckle.Segments.BuckleSeg.Left.ObliquusInternusNode_4;
    AnyRefNode &Ins = ....Segments.PelvisSeg.Left.ObliquusInternusNode_9;
    viewMuscle = {#include "../DrawSettings/MusDrawSettings.any"};
    viewForce.Visible ??= Off;
  };

  AnyMuscleViaPoint OIC_10 = {
    AnyMuscleModel &MusMdl = ....MuscleModels.Left.ObliquusInternus.OIC_10;
    AnyRefNode &Org = ....Buckle.Segments.BuckleSeg.Left.ObliquusInternusNode_5;
    AnyRefNode &Ins = ....Segments.PelvisSeg.Left.ObliquusInternusNode_10;
    viewMuscle = {#include "../DrawSettings/MusDrawSettings.any"};
    viewForce.Visible ??= Off;
  };
  #endif
};

#if BM_TRUNK_MUSCLES & BM_TRUNK_CAVITY_MODEL == _CAVITY_MODEL_VOLUME_
MuscleGroup PelvicFloor = {
  AnyMuscleViaPoint Puporectalis1= {
    AnyMuscleModel &MusMdl = ....MuscleModels.Left.Puporectalis.Puporectalis_1;
    AnyRefNode &Org = ....Segments.PelvisSeg.Puporectalis1NodeL;
    AnyRefNode &Ins = ....Segments.SacrumSeg.Puporectalis1NodeL;
    viewMuscle = {#include "../DrawSettings/MusDrawSettings.any"};
    viewForce.Visible ??= Off;
  };
  AnyMuscleViaPoint Puporectalis2= {
    AnyMuscleModel &MusMdl = ....MuscleModels.Left.Puporectalis.Puporectalis_2;
    AnyRefNode &Org = ....Segments.PelvisSeg.Puporectalis2NodeL;
    AnyRefNode &Ins = ....Segments.SacrumSeg.Puporectalis2NodeL;
    viewMuscle = {#include "../DrawSettings/MusDrawSettings.any"};
    viewForce.Visible ??= Off;
  };

  AnyMuscleViaPoint Pupococcygeus1= {
    AnyMuscleModel &MusMdl = ....MuscleModels.Left.Pupococcygeus.Pupococcygeus_1;
    AnyRefNode &Org = ....Segments.PelvisSeg.Pupococcygeus1NodeL;
    AnyRefNode &Ins = ....Segments.SacrumSeg.Pupococcygeus1NodeL;
    viewMuscle = {#include "../DrawSettings/MusDrawSettings.any"};
    viewForce.Visible ??= Off;
  };
  AnyMuscleViaPoint Pupococcygeus2= {
    AnyMuscleModel &MusMdl = ....MuscleModels.Left.Pupococcygeus.Pupococcygeus_2;
    AnyRefNode &Org = ....Segments.PelvisSeg.Pupococcygeus2NodeL;
    AnyRefNode &Ins = ....Segments.SacrumSeg.Pupococcygeus2NodeL;
    viewMuscle = {#include "../DrawSettings/MusDrawSettings.any"};
    viewForce.Visible ??= Off;
  };
};
//  AnyMuscleViaPoint Puporectalis2= {
//    AnyMuscleModel &MusMdl = ....MuscleModels.Left.PelvicFloor.Puporectalis_2;
//    AnyRefNode &Org = ....Segments.PelvisSeg.Puporectalis2NodeL;
//    AnyRefNode &Ins = ....Segments.SacrumSeg.Puporectalis2NodeL;
//    viewMuscle = {#include "../DrawSettings/MusDrawSettings.any"};
//    viewForce.Visible ??= Off;
//  };
//
//  AnyMuscleViaPoint Pupococcygeus1= {
//    AnyMuscleModel &MusMdl = ....MuscleModels.Left.PelvicFloor.Pupococcygeus_1;
//    AnyRefNode &Org = ....Segments.PelvisSeg.Pupococcygeus1NodeL;
//    AnyRefNode &Ins = ....Segments.SacrumSeg.Pupococcygeus1NodeL;
//    viewMuscle = {#include "../DrawSettings/MusDrawSettings.any"};
//    viewForce.Visible ??= Off;
//  };
//  AnyMuscleViaPoint Pupococcygeus2= {
//    AnyMuscleModel &MusMdl = ....MuscleModels.Left.PelvicFloor.Pupococcygeus_2;
//    AnyRefNode &Org = ....Segments.PelvisSeg.Pupococcygeus2NodeL;
//    AnyRefNode &Ins = ....Segments.SacrumSeg.Pupococcygeus2NodeL;
//    viewMuscle = {#include "../DrawSettings/MusDrawSettings.any"};
//    viewForce.Visible ??= Off;
//  };
//};
#endif

// Psoas is separated since it is used by the legs in certain BM configurations
#include "PsoasMajorLeft.any"

MuscleGroup QuadratusLumborum = {
  AnyMuscleViaPoint QLC12Lat_CILat = {
    AnyMuscleModel &MusMdl = ....MuscleModels.Left.QuadratusLumborum.QL_1;
    AnyRefNode &Org = ....Segments.Left.R12Seg.QLC12Lat_CINode1L;
    AnyRefNode &Ins = ....Segments.PelvisSeg.QLLatNode1L;
    viewMuscle = {#include "../DrawSettings/MusDrawSettings.any"};
    viewForce.Visible ??= Off;
  };
  AnyMuscleViaPoint QLC12InterMedian_CILat = {
    AnyMuscleModel &MusMdl = ....MuscleModels.Left.QuadratusLumborum.QL_2;
    AnyRefNode &Org = ....Segments.Left.R12Seg.QLC12Lat_CINode3L;
    AnyRefNode &Ins = ....Segments.PelvisSeg.QLLatNode2L;
    viewMuscle = {#include "../DrawSettings/MusDrawSettings.any"};


  };
  AnyMuscleViaPoint QLC12Median_CILat = {
    AnyMuscleModel &MusMdl = ....MuscleModels.Left.QuadratusLumborum.QL_3;
    AnyRefNode &Org = ....Segments.Left.R12Seg.QLC12InterMedian_CINode1L;
    AnyRefNode &Ins = ....Segments.PelvisSeg.QLLatNode3L;
    viewMuscle = {#include "../DrawSettings/MusDrawSettings.any"};


  };

  AnyMuscleViaPoint QLC12InterMedian_CIInterMedian = {
    AnyMuscleModel &MusMdl = ....MuscleModels.Left.QuadratusLumborum.QL_4;
    AnyRefNode &Org = ....Segments.Left.R12Seg.QLC12InterMedian_CINode3L;
    AnyRefNode &Ins = ....Segments.PelvisSeg.QLLatNode5L;
    viewMuscle = {#include "../DrawSettings/MusDrawSettings.any"};


  };
  AnyMuscleViaPoint QLC12Median_CIInterMedian = {
    AnyMuscleModel &MusMdl = ....MuscleModels.Left.QuadratusLumborum.QL_5;
    AnyRefNode &Org = ....Segments.Left.R12Seg.QLC12Median_CINode1L;
    AnyRefNode &Ins = ....Segments.PelvisSeg.QLInterMedianNode1L;
    viewMuscle = {#include "../DrawSettings/MusDrawSettings.any"};


  };

  AnyMuscleViaPoint QLT12_CILat = {
    AnyMuscleModel &MusMdl = ....MuscleModels.Left.QuadratusLumborum.QL_6;
    AnyRefNode &Org = ....Segments.T12Seg.QLT12_CINodeL;
    AnyRefNode &Ins = ....Segments.PelvisSeg.QLLatNode3L;
    viewMuscle = {#include "../DrawSettings/MusDrawSettings.any"};


  };

  AnyMuscleViaPoint QLL1_CILat = {
    AnyMuscleModel &MusMdl = ....MuscleModels.Left.QuadratusLumborum.QL_7;
    AnyRefNode &Org = ....Segments.L1Seg.QLL1_CINodeL;
    AnyRefNode &Ins = ....Segments.PelvisSeg.QLLatNode4L;
    viewMuscle = {#include "../DrawSettings/MusDrawSettings.any"};
    viewForce.Visible ??= Off;
  };

  AnyMuscleViaPoint QLL2_CILat = {
    AnyMuscleModel &MusMdl = ....MuscleModels.Left.QuadratusLumborum.QL_8;
    AnyRefNode &Org = ....Segments.L2Seg.QLL2_CINodeL;
    AnyRefNode &Ins = ....Segments.PelvisSeg.QLLatNode4L;
    viewMuscle = {#include "../DrawSettings/MusDrawSettings.any"};
    viewForce.Visible ??= Off;
  };

  AnyMuscleViaPoint QLL3_CILat = {
    AnyMuscleModel &MusMdl = ....MuscleModels.Left.QuadratusLumborum.QL_9;
    AnyRefNode &Org = ....Segments.L3Seg.QLL3_CINodeL;
    AnyRefNode &Ins = ....Segments.PelvisSeg.QLLatNode5L;
    viewMuscle = {#include "../DrawSettings/MusDrawSettings.any"};
    viewForce.Visible ??= Off;
  };

  AnyMuscleViaPoint QLT12_CIInterMedian = {
    AnyMuscleModel &MusMdl = ....MuscleModels.Left.QuadratusLumborum.QL_10;
    AnyRefNode &Org = ....Segments.T12Seg.QLT12_CINodeL;
    AnyRefNode &Ins = ....Segments.PelvisSeg.QLInterMedianNode1L;
    viewMuscle = {#include "../DrawSettings/MusDrawSettings.any"};


  };

  AnyMuscleViaPoint QLL1_CIInterMedian = {
    AnyMuscleModel &MusMdl = ....MuscleModels.Left.QuadratusLumborum.QL_11;
    AnyRefNode &Org = ....Segments.L1Seg.QLL1_CINodeL;
    AnyRefNode &Ins = ....Segments.PelvisSeg.QLInterMedianNode2L;
    viewMuscle = {#include "../DrawSettings/MusDrawSettings.any"};


  };

  AnyMuscleViaPoint QLL2_CIInterMedian = {
    AnyMuscleModel &MusMdl = ....MuscleModels.Left.QuadratusLumborum.QL_12;
    AnyRefNode &Org = ....Segments.L2Seg.QLL2_CINodeL;
    AnyRefNode &Ins = ....Segments.PelvisSeg.QLInterMedianNode2L;
    viewMuscle = {#include "../DrawSettings/MusDrawSettings.any"};


  };

  AnyMuscleViaPoint QLL3_CIInterMedian = {
    AnyMuscleModel &MusMdl = ....MuscleModels.Left.QuadratusLumborum.QL_13;
    AnyRefNode &Org = ....Segments.L3Seg.QLL3_CINodeL;
    AnyRefNode &Ins = ....Segments.PelvisSeg.QLInterMedianNode3L;
    viewMuscle = {#include "../DrawSettings/MusDrawSettings.any"};


  };

  AnyMuscleViaPoint QLL4_CIInterMedian = {
    AnyMuscleModel &MusMdl = ....MuscleModels.Left.QuadratusLumborum.QL_14;
    AnyRefNode &Org = ....Segments.L4Seg.QLL4_CINodeL;
    AnyRefNode &Ins = ....Segments.PelvisSeg.QLInterMedianNode3L;
    viewMuscle = {#include "../DrawSettings/MusDrawSettings.any"};
    viewForce.Visible ??= Off;
  };

  AnyMuscleViaPoint QLT12_CIMedian = {
    AnyMuscleModel &MusMdl = ....MuscleModels.Left.QuadratusLumborum.QL_15;
    AnyRefNode &Org = ....Segments.T12Seg.QLT12_CINodeL;
    AnyRefNode &Ins = ....Segments.PelvisSeg.QLInterMedianNode4L;
    viewMuscle = {#include "../DrawSettings/MusDrawSettings.any"};


  };

  AnyMuscleViaPoint QLL1_CIMedian = {
    AnyMuscleModel &MusMdl = ....MuscleModels.Left.QuadratusLumborum.QL_16;
    AnyRefNode &Org = ....Segments.L1Seg.QLL1_CINodeL;
    AnyRefNode &Ins = ....Segments.PelvisSeg.QLInterMedianNode4L;
    viewMuscle = {#include "../DrawSettings/MusDrawSettings.any"};


  };

  AnyMuscleViaPoint QLL2_CIMedian = {
    AnyMuscleModel &MusMdl = ....MuscleModels.Left.QuadratusLumborum.QL_17;
    AnyRefNode &Org = ....Segments.L2Seg.QLL2_CINodeL;
    AnyRefNode &Ins = ....Segments.PelvisSeg.QLInterMedianNode5L;
    viewMuscle = {#include "../DrawSettings/MusDrawSettings.any"};


  };

  AnyMuscleViaPoint QLL3_CIMedian = {
    AnyMuscleModel &MusMdl = ....MuscleModels.Left.QuadratusLumborum.QL_18;
    AnyRefNode &Org = ....Segments.L3Seg.QLL3_CINodeL;
    AnyRefNode &Ins = ....Segments.PelvisSeg.QLInterMedianNode5L;
    viewMuscle = {#include "../DrawSettings/MusDrawSettings.any"};


  };

  AnyMuscleViaPoint QLL4_CIMedian = {
    AnyMuscleModel &MusMdl = ....MuscleModels.Left.QuadratusLumborum.QL_19;
    AnyRefNode &Org = ....Segments.L4Seg.QLL4_CINodeL;
    AnyRefNode &Ins = ....Segments.PelvisSeg.QLMedianNodeL;
    viewMuscle = {#include "../DrawSettings/MusDrawSettings.any"};


  };

  AnyMuscleViaPoint QLC12Lat_L4 = {
    AnyMuscleModel &MusMdl = ....MuscleModels.Left.QuadratusLumborum.QL_20;
    AnyRefNode &Org = ....Segments.L4Seg.QLL4_CINodeL;
    AnyRefNode &Ins = ....Segments.Left.R12Seg.QLC12Lat_CINode2L;
    viewMuscle = {#include "../DrawSettings/MusDrawSettings.any"};


  };
  AnyMuscleViaPoint QLC12Lat_L3 = {
    AnyMuscleModel &MusMdl = ....MuscleModels.Left.QuadratusLumborum.QL_21;
    AnyRefNode &Org = ....Segments.L3Seg.QLL3_CINodeL;
    AnyRefNode &Ins = ....Segments.Left.R12Seg.QLC12Lat_CINode4L;
    viewMuscle = {#include "../DrawSettings/MusDrawSettings.any"};


  };
  AnyMuscleViaPoint QLC12Lat_L2 = {
    AnyMuscleModel &MusMdl = ....MuscleModels.Left.QuadratusLumborum.QL_22;
    AnyRefNode &Org = ....Segments.L2Seg.QLL2_CINodeL;
    AnyRefNode &Ins = ....Segments.Left.R12Seg.QLC12Lat_CINode5L;
    viewMuscle = {#include "../DrawSettings/MusDrawSettings.any"};


  };

  AnyMuscleViaPoint QLC12InterMedian_L4 = {
    AnyMuscleModel &MusMdl = ....MuscleModels.Left.QuadratusLumborum.QL_23;
    AnyRefNode &Org = ....Segments.L4Seg.QLL4_CINodeL;
    AnyRefNode &Ins = ....Segments.Left.R12Seg.QLC12InterMedian_CINode2L;
    viewMuscle = {#include "../DrawSettings/MusDrawSettings.any"};


  };
  AnyMuscleViaPoint QLC12InterMedian_L3 = {
    AnyMuscleModel &MusMdl = ....MuscleModels.Left.QuadratusLumborum.QL_24;
    AnyRefNode &Org = ....Segments.L3Seg.QLL3_CINodeL;
    AnyRefNode &Ins = ....Segments.Left.R12Seg.QLC12InterMedian_CINode4L;
    viewMuscle = {#include "../DrawSettings/MusDrawSettings.any"};


  };
  AnyMuscleViaPoint QLC12InterMedian_L2 = {
    AnyMuscleModel &MusMdl = ....MuscleModels.Left.QuadratusLumborum.QL_25;
    AnyRefNode &Org = ....Segments.L2Seg.QLL2_CINodeL;
    AnyRefNode &Ins = ....Segments.Left.R12Seg.QLC12InterMedian_CINode5L;
    viewMuscle = {#include "../DrawSettings/MusDrawSettings.any"};


  };

  AnyMuscleViaPoint QLC12Median_L4 = {
    AnyMuscleModel &MusMdl = ....MuscleModels.Left.QuadratusLumborum.QL_26;
    AnyRefNode &Org = ....Segments.L4Seg.QLL4_CINodeL;
    AnyRefNode &Ins = ....Segments.Left.R12Seg.QLC12Median_CINode2L;
    viewMuscle = {#include "../DrawSettings/MusDrawSettings.any"};


  };
  AnyMuscleViaPoint QLC12Median_L3 = {
    AnyMuscleModel &MusMdl = ....MuscleModels.Left.QuadratusLumborum.QL_27;
    AnyRefNode &Org = ....Segments.L3Seg.QLL3_CINodeL;
    AnyRefNode &Ins = ....Segments.Left.R12Seg.QLC12Median_CINode3L;
    viewMuscle = {#include "../DrawSettings/MusDrawSettings.any"};


  };
  AnyMuscleViaPoint QLC12Median_L2 = {
    AnyMuscleModel &MusMdl = ....MuscleModels.Left.QuadratusLumborum.QL_28;
    AnyRefNode &Org = ....Segments.L2Seg.QLL2_CINodeL;
    AnyRefNode &Ins = ....Segments.Left.R12Seg.QLC12Median_CINode4L;
    viewMuscle = {#include "../DrawSettings/MusDrawSettings.any"};


  };

};

MuscleGroup RectusAbdominis = {

  #if BM_TRUNK_CAVITY_MODEL == _CAVITY_MODEL_BUCKLE_

  AnyMuscleViaPoint RA_1= {
    AnyMuscleModel &MusMdl = ....MuscleModels.Left.RectusAbdominis.RA_1;
    AnyRefNode &Org = ....Segments.SternalBodySeg.RACP_CO6_2_L;
    AnyRefNode& Via3 = ....Segments.PelvisSeg.RA_1_ViaL;
    AnyRefNode &Ins = ....Segments.PelvisSeg.RA_1_L;
    viewMuscle = {#include "../DrawSettings/MusDrawSettings.any"};
    viewForce.Visible ??= Off;
  };

  AnyMuscleViaPoint RA_2 = {
    AnyMuscleModel &MusMdl = ....MuscleModels.Left.RectusAbdominis.RA_2;
    AnyRefNode &Org = ....Segments.SternalBodySeg.RACP_CO5_2_L;
    AnyRefNode &Via1 = ....Segments.SternalBodySeg.RACP_Via_2_L;
    AnyRefNode& Via3 = ....Segments.PelvisSeg.RA_2_ViaL;
    AnyRefNode &Ins = ....Segments.PelvisSeg.RA_2_L;
    viewMuscle = {#include "../DrawSettings/MusDrawSettings.any"};
    viewForce.Visible ??= Off;
  };
  #endif

  #if BM_TRUNK_CAVITY_MODEL == _CAVITY_MODEL_VOLUME_

  #if BM_TRUNK_EXPERIMENTAL_RECTUS_ABDOMINIS == ON


  #if RECTUS_MUSCLE_LINE == SP

  AnyMuscleShortestPath RA_1 = {
    AnyRefNode &Org = ....Segments.SternalBodySeg.RACP_CO6_2_L;

    AnySurfEllipsoid &mesh1 = Main.HumanModel.BodyModel.Trunk.Abdominal.Layer_L1.BaseSegAnterior.mesh;
    AnySurfEllipsoid &mesh2 = Main.HumanModel.BodyModel.Trunk.Abdominal.Layer_L2.BaseSegAnterior.mesh;
    AnySurfEllipsoid &mesh3 = Main.HumanModel.BodyModel.Trunk.Abdominal.Layer_L3.BaseSegAnterior.mesh;
    AnySurfEllipsoid &mesh4 = Main.HumanModel.BodyModel.Trunk.Abdominal.Layer_L4.BaseSegAnterior.mesh;
    AnySurfEllipsoid &mesh5 = Main.HumanModel.BodyModel.Trunk.Abdominal.Layer_L5.BaseSegAnterior.mesh;


    SPLine.StringMesh=100;
    SPLine = {
      AnyMatrix InitWrapPos = {
        transf3D({.mesh1.Radius,0,0}, &.mesh1),
        transf3D({.mesh2.Radius,0,0}, &.mesh2),
        transf3D({.mesh3.Radius,0,0}, &.mesh3),
        transf3D({.mesh4.Radius,0,0}, &.mesh4),
        transf3D({.mesh5.Radius,0,0}, &.mesh5),
      };
    };


    AnyRefNode &Ins = ....Segments.PelvisSeg.RA_1_L;
    viewMuscle = {#include "../DrawSettings/MusDrawSettings.any"};
    viewForce.Visible ??= Off;
    AnyMuscleModel& MusMdl = ....MuscleModels.Left.RectusAbdominis.RA_1;
  };
  AnyMuscleViaPoint RA_2_1 = {
    AnyRefNode &Org = ....Segments.SternalBodySeg.RACP_CO5_2_L;
    #if BM_TRUNK_THORACIC_STERNUM_TOPOLOGY == 4
    AnyRefNode &Via1 = ....Segments.Left.CostalCartilageSeg.RACP_Via_2_L;
    #else
    AnyRefNode &Via1 = ....Segments.SternalBodySeg.RACP_Via_2_L;
    #endif
    AnyRefNode &Ins = ....Abdominal.Layer_L1.BaseSegAnterior.rectus2L;
    viewMuscle = {#include "../DrawSettings/MusDrawSettings.any"};
    viewForce.Visible ??= Off;
    /// The rectus abdominis in the cavity model needs use simple muscle models
    /// since the muscle is attached between the abdominal layers which leads to
    /// short muscle length.
    AnyMuscleModel MusMdl = {
      Lf0 = .....MuscleModels.Left.RectusAbdominis.RA_2.Lf0/6;
      Vol0 = .....MuscleModels.Left.RectusAbdominis.RA_2.Vol0/6;
      F0 =  .....MuscleModels.Left.RectusAbdominis.RA_2.F0;
    };
  };

  AnyMuscleViaPoint RA_2_2 = {
    AnyRefNode &Org = ....Abdominal.Layer_L1.BaseSegAnterior.rectus2L;
    AnyRefNode &Ins = ....Abdominal.Layer_L2.BaseSegAnterior.rectus2L;
    viewMuscle = {#include "../DrawSettings/MusDrawSettings.any"};
    viewForce.Visible ??= Off;
    /// The rectus abdominis in the cavity model needs use simple muscle models
    /// since the muscle is attached between the abdominal layers which leads to
    /// short muscle length.
    AnyMuscleModel MusMdl = {
      Lf0 = .....MuscleModels.Left.RectusAbdominis.RA_2.Lf0/6;
      Vol0 = .....MuscleModels.Left.RectusAbdominis.RA_2.Vol0/6;
      F0 =  .....MuscleModels.Left.RectusAbdominis.RA_2.F0;
    };
  };

  AnyMuscleViaPoint RA_2_3 = {
    AnyRefNode &Org = ....Abdominal.Layer_L2.BaseSegAnterior.rectus2L;
    AnyRefNode &Ins = ....Abdominal.Layer_L3.BaseSegAnterior.rectus2L;
    viewMuscle = {#include "../DrawSettings/MusDrawSettings.any"};
    viewForce.Visible ??= Off;
    /// The rectus abdominis in the cavity model needs use simple muscle models
    /// since the muscle is attached between the abdominal layers which leads to
    /// short muscle length.
    AnyMuscleModel MusMdl = {
      Lf0 = .....MuscleModels.Left.RectusAbdominis.RA_2.Lf0/6;
      Vol0 = .....MuscleModels.Left.RectusAbdominis.RA_2.Vol0/6;
      F0 =  .....MuscleModels.Left.RectusAbdominis.RA_2.F0;
    };
  };

  AnyMuscleViaPoint RA_2_4 = {
    AnyRefNode &Org = ....Abdominal.Layer_L3.BaseSegAnterior.rectus2L;
    AnyRefNode &Ins = ....Abdominal.Layer_L4.BaseSegAnterior.rectus2L;
    viewMuscle = {#include "../DrawSettings/MusDrawSettings.any"};
    viewForce.Visible ??= Off;
    /// The rectus abdominis in the cavity model needs use simple muscle models
    /// since the muscle is attached between the abdominal layers which leads to
    /// short muscle length.
    AnyMuscleModel MusMdl = {
      Lf0 = .....MuscleModels.Left.RectusAbdominis.RA_2.Lf0/6;
      Vol0 = .....MuscleModels.Left.RectusAbdominis.RA_2.Vol0/6;
      F0 =  .....MuscleModels.Left.RectusAbdominis.RA_2.F0;
    };
  };

  AnyMuscleViaPoint RA_2_5 = {
    AnyRefNode &Org = ....Abdominal.Layer_L4.BaseSegAnterior.rectus2L;
    AnyRefNode &Ins = ....Abdominal.Layer_L5.BaseSegAnterior.rectus2L;
    viewMuscle = {#include "../DrawSettings/MusDrawSettings.any"};
    viewForce.Visible ??= Off;
    /// The rectus abdominis in the cavity model needs use simple muscle models
    /// since the muscle is attached between the abdominal layers which leads to
    /// short muscle length.
    AnyMuscleModel MusMdl = {
      Lf0 = .....MuscleModels.Left.RectusAbdominis.RA_2.Lf0/6;
      Vol0 = .....MuscleModels.Left.RectusAbdominis.RA_2.Vol0/6;
      F0 =  .....MuscleModels.Left.RectusAbdominis.RA_2.F0;
    };
  };

  AnyMuscleViaPoint RA_2_6 = {
    AnyRefNode &Org = ....Abdominal.Layer_L5.BaseSegAnterior.rectus2L;
    AnyRefNode &Ins = ....Segments.PelvisSeg.RA_2_L;
    viewMuscle = {#include "../DrawSettings/MusDrawSettings.any"};
    viewForce.Visible ??= Off;
    /// The rectus abdominis in the cavity model needs use simple muscle models
    /// since the muscle is attached between the abdominal layers which leads to
    /// short muscle length.
    AnyMuscleModel MusMdl = {
      Lf0 = .....MuscleModels.Left.RectusAbdominis.RA_2.Lf0/6;
      Vol0 = .....MuscleModels.Left.RectusAbdominis.RA_2.Vol0/6;
      F0 =  .....MuscleModels.Left.RectusAbdominis.RA_2.F0;
    };
  };

  #else

  //    #if RECTUS_MUSCLE_LINE == VIA

  AnyMuscleViaPoint RA_1 = {
    viewMuscle = {#include "../DrawSettings/MusDrawSettings.any"};
    viewForce.Visible ??= Off;
    AnyMuscleModel& MusMdl = ....MuscleModels.Left.RectusAbdominis.RA_1;

    AnyRefNode &Org = ....Segments.SternalBodySeg.RACP_CO6_2_L;
    AnyRefNode &Via2 = ....Abdominal.Layer_L1.BaseSegAnterior.rectus1L;
    AnyRefNode &Via3 = ....Abdominal.Layer_L2.BaseSegAnterior.rectus1L;
    AnyRefNode &Via4 = ....Abdominal.Layer_L3.BaseSegAnterior.rectus1L;
    AnyRefNode &Via5 = ....Abdominal.Layer_L4.BaseSegAnterior.rectus1L;
    AnyRefNode &Via6 = ....Abdominal.Layer_L5.BaseSegAnterior.rectus1L;
    AnyRefNode &Ins = ....Segments.PelvisSeg.RA_1_L;
  };

  AnyMuscleViaPoint RA_2 = {
    viewMuscle = {#include "../DrawSettings/MusDrawSettings.any"};
    viewForce.Visible ??= Off;
    AnyMuscleModel& MusMdl = ....MuscleModels.Left.RectusAbdominis.RA_2;

    AnyRefNode &Org = ....Segments.SternalBodySeg.RACP_CO5_2_L;
    AnyRefNode &Via2 = ....Abdominal.Layer_L1.BaseSegAnterior.rectus2L;
    AnyRefNode &Via3 = ....Abdominal.Layer_L2.BaseSegAnterior.rectus2L;
    AnyRefNode &Via4 = ....Abdominal.Layer_L3.BaseSegAnterior.rectus2L;
    AnyRefNode &Via5 = ....Abdominal.Layer_L4.BaseSegAnterior.rectus2L;
    AnyRefNode &Via6 = ....Abdominal.Layer_L5.BaseSegAnterior.rectus2L;
    AnyRefNode &Ins = ....Segments.PelvisSeg.RA_2_L;
  };
  #endif

  #endif


  #if BM_TRUNK_EXPERIMENTAL_RECTUS_ABDOMINIS == OFF

  AnyMuscleViaPoint RA_1_1 = {
    AnyRefNode &Org = ....Segments.SternalBodySeg.RACP_CO6_2_L;
    //      #if BM_TRUNK_THORACIC_STERNUM_TOPOLOGY == 4
    //        AnyRefNode &Via1 = ....Segments.Left.CostalCartilageSeg.RACP_Via_2_L;
    //      #else
    //        AnyRefNode &Via1 = ....Segments.SternalBodySeg.RACP_Via_2_L;
    //      #endif

    AnyRefNode &Ins = ....Abdominal.Layer_L1.BaseSegAnterior.rectus1L;
    viewMuscle = {#include "../DrawSettings/MusDrawSettings.any"};
    viewForce.Visible ??= Off;

    /// The rectus abdominis in the cavity model needs use simple muscle models
    /// since the muscle is attached between the abdominal layers which leads to
    /// short muscle length.
    AnyMuscleModel MusMdl = {
      Lf0 = .....MuscleModels.Left.RectusAbdominis.RA_1.Lf0/6;
      Vol0 = .....MuscleModels.Left.RectusAbdominis.RA_1.Vol0/6;
      F0 =  .....MuscleModels.Left.RectusAbdominis.RA_1.F0;
    };
  };

  AnyMuscleViaPoint RA_1_2 = {
    AnyRefNode &Org = ....Abdominal.Layer_L1.BaseSegAnterior.rectus1L;
    AnyRefNode &Ins = ....Abdominal.Layer_L2.BaseSegAnterior.rectus1L;
    viewMuscle = {#include "../DrawSettings/MusDrawSettings.any"};
    viewForce.Visible ??= Off;
    /// The rectus abdominis in the cavity model needs use simple muscle models
    /// since the muscle is attached between the abdominal layers which leads to
    /// short muscle length.
    AnyMuscleModel MusMdl = {
      Lf0 = .....MuscleModels.Left.RectusAbdominis.RA_1.Lf0/6;
      Vol0 = .....MuscleModels.Left.RectusAbdominis.RA_1.Vol0/6;
      F0 =  .....MuscleModels.Left.RectusAbdominis.RA_1.F0;
    };
  };

  AnyMuscleViaPoint RA_1_3 = {
    AnyRefNode &Org = ....Abdominal.Layer_L2.BaseSegAnterior.rectus1L;
    AnyRefNode &Ins = ....Abdominal.Layer_L3.BaseSegAnterior.rectus1L;
    viewMuscle = {#include "../DrawSettings/MusDrawSettings.any"};
    viewForce.Visible ??= Off;
    /// The rectus abdominis in the cavity model needs use simple muscle models
    /// since the muscle is attached between the abdominal layers which leads to
    /// short muscle length.
    AnyMuscleModel MusMdl = {
      Lf0 = .....MuscleModels.Left.RectusAbdominis.RA_1.Lf0/6;
      Vol0 = .....MuscleModels.Left.RectusAbdominis.RA_1.Vol0/6;
      F0 =  .....MuscleModels.Left.RectusAbdominis.RA_1.F0;
    };
  };

  AnyMuscleViaPoint RA_1_4 = {
    AnyRefNode &Org = ....Abdominal.Layer_L3.BaseSegAnterior.rectus1L;
    AnyRefNode &Ins = ....Abdominal.Layer_L4.BaseSegAnterior.rectus1L;
    viewMuscle = {#include "../DrawSettings/MusDrawSettings.any"};
    viewForce.Visible ??= Off;
    /// The rectus abdominis in the cavity model needs use simple muscle models
    /// since the muscle is attached between the abdominal layers which leads to
    /// short muscle length.
    AnyMuscleModel MusMdl = {
      Lf0 = .....MuscleModels.Left.RectusAbdominis.RA_1.Lf0/6;
      Vol0 = .....MuscleModels.Left.RectusAbdominis.RA_1.Vol0/6;
      F0 =  .....MuscleModels.Left.RectusAbdominis.RA_1.F0;
    };
  };

  AnyMuscleViaPoint RA_1_5 = {
    AnyRefNode &Org = ....Abdominal.Layer_L4.BaseSegAnterior.rectus1L;
    AnyRefNode &Ins = ....Abdominal.Layer_L5.BaseSegAnterior.rectus1L;
    viewMuscle = {#include "../DrawSettings/MusDrawSettings.any"};
    viewForce.Visible ??= Off;
    /// The rectus abdominis in the cavity model needs use simple muscle models
    /// since the muscle is attached between the abdominal layers which leads to
    /// short muscle length.
    AnyMuscleModel MusMdl = {
      Lf0 = .....MuscleModels.Left.RectusAbdominis.RA_1.Lf0/6;
      Vol0 = .....MuscleModels.Left.RectusAbdominis.RA_1.Vol0/6;
      F0 =  .....MuscleModels.Left.RectusAbdominis.RA_1.F0;
    };
  };

  AnyMuscleViaPoint RA_1_6 = {
    AnyRefNode &Org = ....Abdominal.Layer_L5.BaseSegAnterior.rectus1L;
    AnyRefNode &Ins = ....Segments.PelvisSeg.RA_1_L;
    viewMuscle = {#include "../DrawSettings/MusDrawSettings.any"};
    viewForce.Visible ??= Off;
    /// The rectus abdominis in the cavity model needs use simple muscle models
    /// since the muscle is attached between the abdominal layers which leads to
    /// short muscle length.
    AnyMuscleModel MusMdl = {
      Lf0 = .....MuscleModels.Left.RectusAbdominis.RA_1.Lf0/6;
      Vol0 = .....MuscleModels.Left.RectusAbdominis.RA_1.Vol0/6;
      F0 =  .....MuscleModels.Left.RectusAbdominis.RA_1.F0;
    };
  };

  AnyMuscleViaPoint RA_2_1 = {
    AnyRefNode &Org = ....Segments.SternalBodySeg.RACP_CO5_2_L;
    #if BM_TRUNK_THORACIC_STERNUM_TOPOLOGY == 4
    AnyRefNode &Via1 = ....Segments.Left.CostalCartilageSeg.RACP_Via_2_L;
    #else
    AnyRefNode &Via1 = ....Segments.SternalBodySeg.RACP_Via_2_L;
    #endif
    AnyRefNode &Ins = ....Abdominal.Layer_L1.BaseSegAnterior.rectus2L;
    viewMuscle = {#include "../DrawSettings/MusDrawSettings.any"};
    viewForce.Visible ??= Off;
    /// The rectus abdominis in the cavity model needs use simple muscle models
    /// since the muscle is attached between the abdominal layers which leads to
    /// short muscle length.
    AnyMuscleModel MusMdl = {
      Lf0 = .....MuscleModels.Left.RectusAbdominis.RA_2.Lf0/6;
      Vol0 = .....MuscleModels.Left.RectusAbdominis.RA_2.Vol0/6;
      F0 =  .....MuscleModels.Left.RectusAbdominis.RA_2.F0;
    };
  };

  AnyMuscleViaPoint RA_2_2 = {
    AnyRefNode &Org = ....Abdominal.Layer_L1.BaseSegAnterior.rectus2L;
    AnyRefNode &Ins = ....Abdominal.Layer_L2.BaseSegAnterior.rectus2L;
    viewMuscle = {#include "../DrawSettings/MusDrawSettings.any"};
    viewForce.Visible ??= Off;
    /// The rectus abdominis in the cavity model needs use simple muscle models
    /// since the muscle is attached between the abdominal layers which leads to
    /// short muscle length.
    AnyMuscleModel MusMdl = {
      Lf0 = .....MuscleModels.Left.RectusAbdominis.RA_2.Lf0/6;
      Vol0 = .....MuscleModels.Left.RectusAbdominis.RA_2.Vol0/6;
      F0 =  .....MuscleModels.Left.RectusAbdominis.RA_2.F0;
    };
  };

  AnyMuscleViaPoint RA_2_3 = {
    AnyRefNode &Org = ....Abdominal.Layer_L2.BaseSegAnterior.rectus2L;
    AnyRefNode &Ins = ....Abdominal.Layer_L3.BaseSegAnterior.rectus2L;
    viewMuscle = {#include "../DrawSettings/MusDrawSettings.any"};
    viewForce.Visible ??= Off;
    /// The rectus abdominis in the cavity model needs use simple muscle models
    /// since the muscle is attached between the abdominal layers which leads to
    /// short muscle length.
    AnyMuscleModel MusMdl = {
      Lf0 = .....MuscleModels.Left.RectusAbdominis.RA_2.Lf0/6;
      Vol0 = .....MuscleModels.Left.RectusAbdominis.RA_2.Vol0/6;
      F0 =  .....MuscleModels.Left.RectusAbdominis.RA_2.F0;
    };
  };

  AnyMuscleViaPoint RA_2_4 = {
    AnyRefNode &Org = ....Abdominal.Layer_L3.BaseSegAnterior.rectus2L;
    AnyRefNode &Ins = ....Abdominal.Layer_L4.BaseSegAnterior.rectus2L;
    viewMuscle = {#include "../DrawSettings/MusDrawSettings.any"};
    viewForce.Visible ??= Off;
    /// The rectus abdominis in the cavity model needs use simple muscle models
    /// since the muscle is attached between the abdominal layers which leads to
    /// short muscle length.
    AnyMuscleModel MusMdl = {
      Lf0 = .....MuscleModels.Left.RectusAbdominis.RA_2.Lf0/6;
      Vol0 = .....MuscleModels.Left.RectusAbdominis.RA_2.Vol0/6;
      F0 =  .....MuscleModels.Left.RectusAbdominis.RA_2.F0;
    };
  };

  AnyMuscleViaPoint RA_2_5 = {
    AnyRefNode &Org = ....Abdominal.Layer_L4.BaseSegAnterior.rectus2L;
    AnyRefNode &Ins = ....Abdominal.Layer_L5.BaseSegAnterior.rectus2L;
    viewMuscle = {#include "../DrawSettings/MusDrawSettings.any"};
    viewForce.Visible ??= Off;
    /// The rectus abdominis in the cavity model needs use simple muscle models
    /// since the muscle is attached between the abdominal layers which leads to
    /// short muscle length.
    AnyMuscleModel MusMdl = {
      Lf0 = .....MuscleModels.Left.RectusAbdominis.RA_2.Lf0/6;
      Vol0 = .....MuscleModels.Left.RectusAbdominis.RA_2.Vol0/6;
      F0 =  .....MuscleModels.Left.RectusAbdominis.RA_2.F0;
    };
  };

  AnyMuscleViaPoint RA_2_6 = {
    AnyRefNode &Org = ....Abdominal.Layer_L5.BaseSegAnterior.rectus2L;
    AnyRefNode &Ins = ....Segments.PelvisSeg.RA_2_L;
    viewMuscle = {#include "../DrawSettings/MusDrawSettings.any"};
    viewForce.Visible ??= Off;
    /// The rectus abdominis in the cavity model needs use simple muscle models
    /// since the muscle is attached between the abdominal layers which leads to
    /// short muscle length.
    AnyMuscleModel MusMdl = {
      Lf0 = .....MuscleModels.Left.RectusAbdominis.RA_2.Lf0/6;
      Vol0 = .....MuscleModels.Left.RectusAbdominis.RA_2.Vol0/6;
      F0 =  .....MuscleModels.Left.RectusAbdominis.RA_2.F0;
    };
  };
  #endif

  #endif
};

MuscleGroup RotatoresBrevis = {
  AnyMuscleViaPoint RotatoresBrevisT1C7 =   {
    AnyMuscleModel &MusMdl = ....MuscleModels.Left.RotatoresBrevis.RotatoresBrevis_1;
    AnyRefFrame &Org = ....Segments.T1Seg.Left.RotatoresBrevisT1C7Node;
    AnyRefFrame &Ins = ....Segments.C7Seg.Left.RotatoresBrevisT1C7Node;
    viewMuscle = {#include "../DrawSettings/MusDrawSettings.any"};
    viewForce.Visible ??= Off;
  };
  #if BM_TRUNK_THORACIC_MODEL == _THORACIC_MODEL_FLEXIBLE_
  AnyMuscleViaPoint RotatoresBrevisT2T1 =   {
    AnyMuscleModel &MusMdl = ....MuscleModels.Left.RotatoresBrevis.RotatoresBrevis_2;
    AnyRefFrame &Org = ....Segments.T2Seg.Left.RotatoresBrevisT2T1Node;
    AnyRefFrame &Ins = ....Segments.T1Seg.Left.RotatoresBrevisT2T1Node;
    viewMuscle = {#include "../DrawSettings/MusDrawSettings.any"};
    viewForce.Visible ??= Off;
  };
  AnyMuscleViaPoint RotatoresBrevisT3T2 =   {
    AnyMuscleModel &MusMdl = ....MuscleModels.Left.RotatoresBrevis.RotatoresBrevis_3;
    AnyRefFrame &Org = ....Segments.T3Seg.Left.RotatoresBrevisT3T2Node;
    AnyRefFrame &Ins = ....Segments.T2Seg.Left.RotatoresBrevisT3T2Node;
    viewMuscle = {#include "../DrawSettings/MusDrawSettings.any"};
    viewForce.Visible ??= Off;
  };
  AnyMuscleViaPoint RotatoresBrevisT4T3 =   {
    AnyMuscleModel &MusMdl = ....MuscleModels.Left.RotatoresBrevis.RotatoresBrevis_4;
    AnyRefFrame &Org = ....Segments.T4Seg.Left.RotatoresBrevisT4T3Node;
    AnyRefFrame &Ins = ....Segments.T3Seg.Left.RotatoresBrevisT4T3Node;
    viewMuscle = {#include "../DrawSettings/MusDrawSettings.any"};
    viewForce.Visible ??= Off;
  };
  AnyMuscleViaPoint RotatoresBrevisT5T4 =   {
    AnyMuscleModel &MusMdl = ....MuscleModels.Left.RotatoresBrevis.RotatoresBrevis_5;
    AnyRefFrame &Org = ....Segments.T5Seg.Left.RotatoresBrevisT5T4Node;
    AnyRefFrame &Ins = ....Segments.T4Seg.Left.RotatoresBrevisT5T4Node;
    viewMuscle = {#include "../DrawSettings/MusDrawSettings.any"};
    viewForce.Visible ??= Off;
  };
  AnyMuscleViaPoint RotatoresBrevisT6T5 =   {
    AnyMuscleModel &MusMdl = ....MuscleModels.Left.RotatoresBrevis.RotatoresBrevis_6;
    AnyRefFrame &Org = ....Segments.T6Seg.Left.RotatoresBrevisT6T5Node;
    AnyRefFrame &Ins = ....Segments.T5Seg.Left.RotatoresBrevisT6T5Node;
    viewMuscle = {#include "../DrawSettings/MusDrawSettings.any"};
    viewForce.Visible ??= Off;
  };
  AnyMuscleViaPoint RotatoresBrevisT7T6 =   {
    AnyMuscleModel &MusMdl = ....MuscleModels.Left.RotatoresBrevis.RotatoresBrevis_7;
    AnyRefFrame &Org = ....Segments.T7Seg.Left.RotatoresBrevisT7T6Node;
    AnyRefFrame &Ins = ....Segments.T6Seg.Left.RotatoresBrevisT7T6Node;
    viewMuscle = {#include "../DrawSettings/MusDrawSettings.any"};
    viewForce.Visible ??= Off;
  };
  AnyMuscleViaPoint RotatoresBrevisT8T7 =   {
    AnyMuscleModel &MusMdl = ....MuscleModels.Left.RotatoresBrevis.RotatoresBrevis_8;
    AnyRefFrame &Org = ....Segments.T8Seg.Left.RotatoresBrevisT8T7Node;
    AnyRefFrame &Ins = ....Segments.T7Seg.Left.RotatoresBrevisT8T7Node;
    viewMuscle = {#include "../DrawSettings/MusDrawSettings.any"};
    viewForce.Visible ??= Off;
  };
  AnyMuscleViaPoint RotatoresBrevisT9T8 =   {
    AnyMuscleModel &MusMdl = ....MuscleModels.Left.RotatoresBrevis.RotatoresBrevis_9;
    AnyRefFrame &Org = ....Segments.T9Seg.Left.RotatoresBrevisT9T8Node;
    AnyRefFrame &Ins = ....Segments.T8Seg.Left.RotatoresBrevisT9T8Node;
    viewMuscle = {#include "../DrawSettings/MusDrawSettings.any"};
    viewForce.Visible ??= Off;
  };
  AnyMuscleViaPoint RotatoresBrevisT10T9 =   {
    AnyMuscleModel &MusMdl = ....MuscleModels.Left.RotatoresBrevis.RotatoresBrevis_10;
    AnyRefFrame &Org = ....Segments.T10Seg.Left.RotatoresBrevisT10T9Node;
    AnyRefFrame &Ins = ....Segments.T9Seg.Left.RotatoresBrevisT10T9Node;
    viewMuscle = {#include "../DrawSettings/MusDrawSettings.any"};
    viewForce.Visible ??= Off;
  };
  AnyMuscleViaPoint RotatoresBrevisT11T10 =   {
    AnyMuscleModel &MusMdl = ....MuscleModels.Left.RotatoresBrevis.RotatoresBrevis_11;
    AnyRefFrame &Org = ....Segments.T11Seg.Left.RotatoresBrevisT11T10Node;
    AnyRefFrame &Ins = ....Segments.T10Seg.Left.RotatoresBrevisT11T10Node;
    viewMuscle = {#include "../DrawSettings/MusDrawSettings.any"};
    viewForce.Visible ??= Off;
  };
  AnyMuscleViaPoint RotatoresBrevisT12T11 =   {
    AnyMuscleModel &MusMdl = ....MuscleModels.Left.RotatoresBrevis.RotatoresBrevis_12;
    AnyRefFrame &Org = ....Segments.T12Seg.Left.RotatoresBrevisT12T11Node;
    AnyRefFrame &Ins = ....Segments.T11Seg.Left.RotatoresBrevisT12T11Node;
    viewMuscle = {#include "../DrawSettings/MusDrawSettings.any"};
    viewForce.Visible ??= Off;
  };
  #endif
};

MuscleGroup RotatoresLongus = {
  AnyMuscleViaPoint RotatoresLongusT2C7 =   {
    AnyMuscleModel &MusMdl = ....MuscleModels.Left.RotatoresLongus.RotatoresLongus_1;
    AnyRefFrame &Org = ....Segments.T2Seg.Left.RotatoresLongusT2C7Node;
    AnyRefFrame &Ins = ....Segments.C7Seg.Left.RotatoresLongusT2C7Node;
    viewMuscle = {#include "../DrawSettings/MusDrawSettings.any"};
    viewForce.Visible ??= Off;
  };
  #if BM_TRUNK_THORACIC_MODEL == _THORACIC_MODEL_FLEXIBLE_
  AnyMuscleViaPoint RotatoresLongusT3T1 =   {
    AnyMuscleModel &MusMdl = ....MuscleModels.Left.RotatoresLongus.RotatoresLongus_2;
    AnyRefFrame &Org = ....Segments.T3Seg.Left.RotatoresLongusT3T1Node;
    AnyRefFrame &Ins = ....Segments.T1Seg.Left.RotatoresLongusT3T1Node;
    viewMuscle = {#include "../DrawSettings/MusDrawSettings.any"};
    viewForce.Visible ??= Off;
  };
  AnyMuscleViaPoint RotatoresLongusT4T2 =   {
    AnyMuscleModel &MusMdl = ....MuscleModels.Left.RotatoresLongus.RotatoresLongus_3;
    AnyRefFrame &Org = ....Segments.T4Seg.Left.RotatoresLongusT4T2Node;
    AnyRefFrame &Ins = ....Segments.T2Seg.Left.RotatoresLongusT4T2Node;
    viewMuscle = {#include "../DrawSettings/MusDrawSettings.any"};
    viewForce.Visible ??= Off;
  };
  AnyMuscleViaPoint RotatoresLongusT5T3 =   {
    AnyMuscleModel &MusMdl = ....MuscleModels.Left.RotatoresLongus.RotatoresLongus_4;
    AnyRefFrame &Org = ....Segments.T5Seg.Left.RotatoresLongusT5T3Node;
    AnyRefFrame &Ins = ....Segments.T3Seg.Left.RotatoresLongusT5T3Node;
    viewMuscle = {#include "../DrawSettings/MusDrawSettings.any"};
    viewForce.Visible ??= Off;
  };
  AnyMuscleViaPoint RotatoresLongusT6T4 =   {
    AnyMuscleModel &MusMdl = ....MuscleModels.Left.RotatoresLongus.RotatoresLongus_5;
    AnyRefFrame &Org = ....Segments.T6Seg.Left.RotatoresLongusT6T4Node;
    AnyRefFrame &Ins = ....Segments.T4Seg.Left.RotatoresLongusT6T4Node;
    viewMuscle = {#include "../DrawSettings/MusDrawSettings.any"};
    viewForce.Visible ??= Off;
  };
  AnyMuscleViaPoint RotatoresLongusT7T5 =   {
    AnyMuscleModel &MusMdl = ....MuscleModels.Left.RotatoresLongus.RotatoresLongus_6;
    AnyRefFrame &Org = ....Segments.T7Seg.Left.RotatoresLongusT7T5Node;
    AnyRefFrame &Ins = ....Segments.T5Seg.Left.RotatoresLongusT7T5Node;
    viewMuscle = {#include "../DrawSettings/MusDrawSettings.any"};
    viewForce.Visible ??= Off;
  };
  AnyMuscleViaPoint RotatoresLongusT8T6 =   {
    AnyMuscleModel &MusMdl = ....MuscleModels.Left.RotatoresLongus.RotatoresLongus_7;
    AnyRefFrame &Org = ....Segments.T8Seg.Left.RotatoresLongusT8T6Node;
    AnyRefFrame &Ins = ....Segments.T6Seg.Left.RotatoresLongusT8T6Node;
    viewMuscle = {#include "../DrawSettings/MusDrawSettings.any"};
    viewForce.Visible ??= Off;
  };
  AnyMuscleViaPoint RotatoresLongusT9T7 =   {
    AnyMuscleModel &MusMdl = ....MuscleModels.Left.RotatoresLongus.RotatoresLongus_8;
    AnyRefFrame &Org = ....Segments.T9Seg.Left.RotatoresLongusT9T7Node;
    AnyRefFrame &Ins = ....Segments.T7Seg.Left.RotatoresLongusT9T7Node;
    viewMuscle = {#include "../DrawSettings/MusDrawSettings.any"};
    viewForce.Visible ??= Off;
  };
  AnyMuscleViaPoint RotatoresLongusT10T8 =   {
    AnyMuscleModel &MusMdl = ....MuscleModels.Left.RotatoresLongus.RotatoresLongus_9;
    AnyRefFrame &Org = ....Segments.T10Seg.Left.RotatoresLongusT10T8Node;
    AnyRefFrame &Ins = ....Segments.T8Seg.Left.RotatoresLongusT10T8Node;
    viewMuscle = {#include "../DrawSettings/MusDrawSettings.any"};
    viewForce.Visible ??= Off;
  };
  AnyMuscleViaPoint RotatoresLongusT11T9 =   {
    AnyMuscleModel &MusMdl = ....MuscleModels.Left.RotatoresLongus.RotatoresLongus_10;
    AnyRefFrame &Org = ....Segments.T11Seg.Left.RotatoresLongusT11T9Node;
    AnyRefFrame &Ins = ....Segments.T9Seg.Left.RotatoresLongusT11T9Node;
    viewMuscle = {#include "../DrawSettings/MusDrawSettings.any"};
    viewForce.Visible ??= Off;
  };
  AnyMuscleViaPoint RotatoresLongusT12T10 =   {
    AnyMuscleModel &MusMdl = ....MuscleModels.Left.RotatoresLongus.RotatoresLongus_11;
    AnyRefFrame &Org = ....Segments.T12Seg.Left.RotatoresLongusT12T10Node;
    AnyRefFrame &Ins = ....Segments.T10Seg.Left.RotatoresLongusT12T10Node;
    viewMuscle = {#include "../DrawSettings/MusDrawSettings.any"};
    viewForce.Visible ??= Off;
  };
  #endif
};

MuscleGroup Scalenus = {
  AnyMuscleViaPoint ScalenusAnteriorR1C6 = {
    AnyMuscleModel &MusMdl= ....MuscleModels.Left.Scalenus.ScalenusAnteriorR1C6;
    AnyRefNode &Org = ....Segments.C6Seg.Left.ScalenusAnteriorR1C6Node;
    AnyRefNode &Ins = ....Segments.Left.R1Seg.ScalenusAnteriorR1C6Node;
    viewMuscle = {#include "../DrawSettings/MusDrawSettings.any"};
    viewForce.Visible ??= Off;
  };
  AnyMuscleViaPoint ScalenusAnteriorR1C5 = {
    AnyMuscleModel &MusMdl= ....MuscleModels.Left.Scalenus.ScalenusAnteriorR1C5;
    AnyRefNode &Org = ....Segments.C5Seg.Left.ScalenusAnteriorR1C5Node;
    AnyRefNode &Ins = ....Segments.Left.R1Seg.ScalenusAnteriorR1C5Node;
    viewMuscle = {#include "../DrawSettings/MusDrawSettings.any"};
    viewForce.Visible ??= Off;
  };
  AnyMuscleViaPoint ScalenusAnteriorR1C4 = {
    AnyMuscleModel &MusMdl= ....MuscleModels.Left.Scalenus.ScalenusAnteriorR1C4;
    AnyRefNode &Org = ....Segments.C4Seg.Left.ScalenusAnteriorR1C4Node;
    AnyRefNode &Ins = ....Segments.Left.R1Seg.ScalenusAnteriorR1C4Node;
    viewMuscle = {#include "../DrawSettings/MusDrawSettings.any"};
    viewForce.Visible ??= Off;
  };
  AnyMuscleViaPoint ScalenusAnteriorR1C3 = {
    AnyMuscleModel &MusMdl= ....MuscleModels.Left.Scalenus.ScalenusAnteriorR1C3;
    AnyRefNode &Org = ....Segments.C3Seg.Left.ScalenusAnteriorR1C3Node;
    AnyRefNode &Ins = ....Segments.Left.R1Seg.ScalenusAnteriorR1C3Node;
    viewMuscle = {#include "../DrawSettings/MusDrawSettings.any"};
    viewForce.Visible ??= Off;
  };
  AnyMuscleViaPoint ScalenusMediusR1C7 = {
    AnyMuscleModel &MusMdl =....MuscleModels.Left.Scalenus.ScalenusMediusR1C7;
    AnyRefNode &Org = ....Segments.C7Seg.Left.ScalenusMediusR1C7Node;
    AnyRefNode &Ins = ....Segments.Left.R1Seg.ScalenusMediusR1C7Node;
    viewMuscle = {#include "../DrawSettings/MusDrawSettings.any"};
    viewForce.Visible ??= Off;
  };
  AnyMuscleViaPoint ScalenusMediusR1C6 = {
    AnyMuscleModel &MusMdl =....MuscleModels.Left.Scalenus.ScalenusMediusR1C6;
    AnyRefNode &Org = ....Segments.C6Seg.Left.ScalenusMediusR1C6Node;
    AnyRefNode &Ins = ....Segments.Left.R1Seg.ScalenusMediusR1C6Node;
    viewMuscle = {#include "../DrawSettings/MusDrawSettings.any"};
    viewForce.Visible ??= Off;
  };
  AnyMuscleViaPoint ScalenusMediusR1C5 = {
    AnyMuscleModel &MusMdl =....MuscleModels.Left.Scalenus.ScalenusMediusR1C5;
    AnyRefNode &Org = ....Segments.C5Seg.Left.ScalenusMediusR1C5Node;
    AnyRefNode &Ins = ....Segments.Left.R1Seg.ScalenusMediusR1C5Node;
    viewMuscle = {#include "../DrawSettings/MusDrawSettings.any"};
    viewForce.Visible ??= Off;
  };
  AnyMuscleViaPoint ScalenusMediusR1C4 = {
    AnyMuscleModel &MusMdl =....MuscleModels.Left.Scalenus.ScalenusMediusR1C4;
    AnyRefNode &Org = ....Segments.C4Seg.Left.ScalenusMediusR1C4Node;
    AnyRefNode &Ins = ....Segments.Left.R1Seg.ScalenusMediusR1C4Node;
    viewMuscle = {#include "../DrawSettings/MusDrawSettings.any"};
    viewForce.Visible ??= Off;
  };
  AnyMuscleViaPoint ScalenusMediusR1C3 = {
    AnyMuscleModel &MusMdl =....MuscleModels.Left.Scalenus.ScalenusMediusR1C3;
    AnyRefNode &Org = ....Segments.C3Seg.Left.ScalenusMediusR1C3Node;
    AnyRefNode &Ins = ....Segments.Left.R1Seg.ScalenusMediusR1C3Node;
    viewMuscle = {#include "../DrawSettings/MusDrawSettings.any"};
    viewForce.Visible ??= Off;
  };
  AnyMuscleViaPoint ScalenusMediusR1C2 = {
    AnyMuscleModel &MusMdl =....MuscleModels.Left.Scalenus.ScalenusMediusR1C2;
    AnyRefNode &Org = ....Segments.C2Seg.Left.ScalenusMediusR1C2Node;
    AnyRefNode &Ins = ....Segments.Left.R1Seg.ScalenusMediusR1C2Node;
    viewMuscle = {#include "../DrawSettings/MusDrawSettings.any"};
    viewForce.Visible ??= Off;
  };
  AnyMuscleViaPoint ScalenusPosteriorR2C7 = {
    AnyMuscleModel &MusMdl =....MuscleModels.Left.Scalenus.ScalenusPosteriorR2C7;
    AnyRefNode &Org = ....Segments.C7Seg.Left.ScalenusPosteriorR2C7Node;
    AnyRefNode &Ins = ....Segments.Left.R2Seg.ScalenusPosteriorR2C7Node;
    viewMuscle = {#include "../DrawSettings/MusDrawSettings.any"};
    viewForce.Visible ??= Off;
  };
  AnyMuscleViaPoint ScalenusPosteriorR2C6 = {
    AnyMuscleModel &MusMdl =....MuscleModels.Left.Scalenus.ScalenusPosteriorR2C6;
    AnyRefNode &Org = ....Segments.C6Seg.Left.ScalenusPosteriorR2C6Node;
    AnyRefNode &Ins = ....Segments.Left.R2Seg.ScalenusPosteriorR2C6Node;
    viewMuscle = {#include "../DrawSettings/MusDrawSettings.any"};
    viewForce.Visible ??= Off;
  };
  AnyMuscleViaPoint ScalenusPosteriorR2C5 = {
    AnyMuscleModel &MusMdl =....MuscleModels.Left.Scalenus.ScalenusPosteriorR2C5;
    AnyRefNode &Org = ....Segments.C5Seg.Left.ScalenusPosteriorR2C5Node;
    AnyRefNode &Ins = ....Segments.Left.R2Seg.ScalenusPosteriorR2C5Node;
    viewMuscle = {#include "../DrawSettings/MusDrawSettings.any"};
    viewForce.Visible ??= Off;
  };
};

MuscleGroup SemispinalisCapitis = {
  AnyMuscleViaPoint SemispinalisCapitisC4C0 = {
    AnyMuscleModel &MusMdl = ....MuscleModels.Left.SemispinalisCapitis.SemispinalisCapitisC4C0;
    AnyRefNode &Org = ....Segments.C4Seg.SemispinalisCapitisC4C0NodeL;
    AnyRefNode &Ins = ....Segments.SkullSeg.SemispinalisCapitisNodeL;
    viewMuscle = {#include "../DrawSettings/MusDrawSettings.any"};
    viewForce.Visible ??= Off;
  };

  AnyMuscleViaPoint SemispinalisCapitisC5C0 = {
    AnyMuscleModel &MusMdl = ....MuscleModels.Left.SemispinalisCapitis.SemispinalisCapitisC5C0;
    AnyRefNode &Org = ....Segments.C5Seg.SemispinalisCapitisC5C0NodeL;
    AnyRefNode &Ins = ....Segments.SkullSeg.SemispinalisCapitisNodeL;
    viewMuscle = {#include "../DrawSettings/MusDrawSettings.any"};
    viewForce.Visible ??= Off;
  };

  AnyMuscleViaPoint SemispinalisCapitisC6C0 = {
    AnyMuscleModel &MusMdl = ....MuscleModels.Left.SemispinalisCapitis.SemispinalisCapitisC6C0;
    AnyRefNode &Org = ....Segments.C6Seg.SemispinalisCapitisC6C0NodeL;
    AnyRefNode &Ins = ....Segments.SkullSeg.SemispinalisCapitisNodeL;
    viewMuscle = {#include "../DrawSettings/MusDrawSettings.any"};
    viewForce.Visible ??= Off;
  };

  AnyMuscleViaPoint SemispinalisCapitisC7C0 = {
    AnyMuscleModel &MusMdl = ....MuscleModels.Left.SemispinalisCapitis.SemispinalisCapitisC7C0;
    AnyRefNode &Org = ....Segments.C7Seg.SemispinalisCapitisC7C0NodeL;
    AnyRefNode &Ins = ....Segments.SkullSeg.SemispinalisCapitisNodeL;
    viewMuscle = {#include "../DrawSettings/MusDrawSettings.any"};
    viewForce.Visible ??= Off;
  };

  AnyMuscleViaPoint SemispinalisCapitisT1C0 = {
    AnyMuscleModel &MusMdl = ....MuscleModels.Left.SemispinalisCapitis.SemispinalisCapitisT1C0;
    AnyRefNode &Org = ....Segments.T1Seg.Left.SemispinalisCapitisT1C0Node;
    AnyRefNode &Ins = ....Segments.SkullSeg.SemispinalisCapitisNodeL;
    viewMuscle = {#include "../DrawSettings/MusDrawSettings.any"};
    viewForce.Visible ??= Off;
  };
  AnyMuscleViaPoint SemispinalisCapitisT2C0 = {
    AnyMuscleModel &MusMdl = ....MuscleModels.Left.SemispinalisCapitis.SemispinalisCapitisT2C0;
    AnyRefNode &Org = ....Segments.T2Seg.Left.SemispinalisCapitisT2C0Node;
    AnyRefNode &Ins = ....Segments.SkullSeg.SemispinalisCapitisNodeL;
    viewMuscle = {#include "../DrawSettings/MusDrawSettings.any"};
    viewForce.Visible ??= Off;
  };
  AnyMuscleViaPoint SemispinalisCapitisT3C0 = {
    AnyMuscleModel &MusMdl = ....MuscleModels.Left.SemispinalisCapitis.SemispinalisCapitisT3C0;
    AnyRefNode &Org = ....Segments.T3Seg.Left.SemispinalisCapitisT3C0Node;
    AnyRefNode &Ins = ....Segments.SkullSeg.SemispinalisCapitisNodeL;
    viewMuscle = {#include "../DrawSettings/MusDrawSettings.any"};
    viewForce.Visible ??= Off;
  };
  AnyMuscleViaPoint SemispinalisCapitisT4C0 = {
    AnyMuscleModel &MusMdl = ....MuscleModels.Left.SemispinalisCapitis.SemispinalisCapitisT4C0;
    AnyRefNode &Org = ....Segments.T4Seg.Left.SemispinalisCapitisT4C0Node;
    AnyRefNode &Ins = ....Segments.SkullSeg.SemispinalisCapitisNodeL;
    viewMuscle = {#include "../DrawSettings/MusDrawSettings.any"};
    viewForce.Visible ??= Off;
  };
  AnyMuscleViaPoint SemispinalisCapitisT5C0 = {
    AnyMuscleModel &MusMdl = ....MuscleModels.Left.SemispinalisCapitis.SemispinalisCapitisT5C0;
    AnyRefNode &Org = ....Segments.T5Seg.Left.SemispinalisCapitisT5C0Node;
    AnyRefNode &Ins = ....Segments.SkullSeg.SemispinalisCapitisNodeL;
    viewMuscle = {#include "../DrawSettings/MusDrawSettings.any"};
    viewForce.Visible ??= Off;
  };
  AnyMuscleViaPoint SemispinalisCapitisT6C0 = {
    AnyMuscleModel &MusMdl = ....MuscleModels.Left.SemispinalisCapitis.SemispinalisCapitisT6C0;
    AnyRefNode &Org = ....Segments.T6Seg.Left.SemispinalisCapitisT6C0Node;
    AnyRefNode &Ins = ....Segments.SkullSeg.SemispinalisCapitisNodeL;
    viewMuscle = {#include "../DrawSettings/MusDrawSettings.any"};
    viewForce.Visible ??= Off;
  };
};

MuscleGroup SemispinalisCervicis = {
  AnyMuscleViaPoint SemispinalisCervicisT1C2 = {
    AnyMuscleModel &MusMdl = ....MuscleModels.Left.SemispinalisCervicis.SemispinalisCervicisT1C2;
    AnyRefNode &Org = ....Segments.T1Seg.SemispinalisCervicisT1C2NodeL;
    AnyRefNode &Ins = ....Segments.C2Seg.SemispinalisCervicisT1C2NodeL;
    viewMuscle = {#include "../DrawSettings/MusDrawSettings.any"};
    viewForce.Visible ??= Off;
  };

  AnyMuscleViaPoint SemispinalisCervicisT2C3 = {
    AnyMuscleModel &MusMdl = ....MuscleModels.Left.SemispinalisCervicis.SemispinalisCervicisT2C3;
    AnyRefNode &Org = ....Segments.T2Seg.SemispinalisCervicisT2C3NodeL;
    AnyRefNode &Ins = ....Segments.C3Seg.SemispinalisCervicisT2C3NodeL;
    viewMuscle = {#include "../DrawSettings/MusDrawSettings.any"};
    viewForce.Visible ??= Off;
  };

  AnyMuscleViaPoint SemispinalisCervicisT3C4 = {
    AnyMuscleModel &MusMdl = ....MuscleModels.Left.SemispinalisCervicis.SemispinalisCervicisT3C4;
    AnyRefNode &Org = ....Segments.T3Seg.SemispinalisCervicisT3C4NodeL;
    AnyRefNode &Ins = ....Segments.C4Seg.SemispinalisCervicisT3C4NodeL;
    viewMuscle = {#include "../DrawSettings/MusDrawSettings.any"};
    viewForce.Visible ??= Off;
  };

  AnyMuscleViaPoint SemispinalisCervicisT4C5 = {
    AnyMuscleModel &MusMdl = ....MuscleModels.Left.SemispinalisCervicis.SemispinalisCervicisT4C5;
    AnyRefNode &Org = ....Segments.T4Seg.SemispinalisCervicisT4C5NodeL;
    AnyRefNode &Ins = ....Segments.C5Seg.SemispinalisCervicisT4C5NodeL;
    viewMuscle = {#include "../DrawSettings/MusDrawSettings.any"};
    viewForce.Visible ??= Off;
  };

  AnyMuscleViaPoint SemispinalisCervicisT5C6 = {
    AnyMuscleModel &MusMdl = ....MuscleModels.Left.SemispinalisCervicis.SemispinalisCervicisT5C6;
    AnyRefNode &Org = ....Segments.T5Seg.SemispinalisCervicisT5C6NodeL;
    AnyRefNode &Ins = ....Segments.C6Seg.SemispinalisCervicisT5C6NodeL;
    viewMuscle = {#include "../DrawSettings/MusDrawSettings.any"};
    viewForce.Visible ??= Off;
  };

  AnyMuscleViaPoint SemispinalisCervicisT6C7 = {
    AnyMuscleModel &MusMdl = ....MuscleModels.Left.SemispinalisCervicis.SemispinalisCervicisT6C7;
    AnyRefNode &Org = ....Segments.T6Seg.SemispinalisCervicisT6C7NodeL;
    AnyRefNode &Ins = ....Segments.C7Seg.SemispinalisCervicisT6C7NodeL;
    viewMuscle = {#include "../DrawSettings/MusDrawSettings.any"};
    viewForce.Visible ??= Off;
  };
};

MuscleGroup SemispinalisThoracis = {
  #if BM_TRUNK_THORACIC_MODEL == _THORACIC_MODEL_FLEXIBLE_
  AnyMuscleViaPoint SSTT12T4 =
  {
    AnyMuscleModel &MusMdl = ....MuscleModels.Left.SemispinalisThoracis.SSTT12T4;
    AnyRefFrame &Org = ....Segments.T12Seg.SSTT12TransversusL;
    AnyRefNode &Via1 = ....Segments.T11Seg.SSTT11ViaNodeL;
    AnyRefNode &Via2 = ....Segments.T10Seg.SSTT10ViaNodeL;
    AnyRefNode &Via3 = ....Segments.T9Seg.SSTT9ViaNodeL;
    AnyRefNode &Via4 = ....Segments.T8Seg.SSTT8ViaNodeL;
    AnyRefNode &Via5 = ....Segments.T7Seg.SSTT4ViaNodeL;
    AnyRefFrame &Ins = ....Segments.T4Seg.SSTT4Spinous;
    viewMuscle = {#include "../DrawSettings/MusDrawSettings.any"};
    viewForce.Visible ??= Off;
  };

  AnyMuscleViaPoint SSTT11T3 =
  {
    AnyMuscleModel &MusMdl = ....MuscleModels.Left.SemispinalisThoracis.SSTT11T3;
    AnyRefFrame &Org = ....Segments.T11Seg.SSTT11TransversusL;
    AnyRefNode &Via2 = ....Segments.T10Seg.SSTT10ViaNodeL;
    AnyRefNode &Via3 = ....Segments.T9Seg.SSTT9ViaNodeL;
    AnyRefNode &Via4 = ....Segments.T8Seg.SSTT8ViaNodeL;
    AnyRefNode &Via5 = ....Segments.T7Seg.SSTT3ViaNodeL;
    AnyRefFrame &Ins = ....Segments.T3Seg.SSTT3Spinous;
    viewMuscle = {#include "../DrawSettings/MusDrawSettings.any"};
    viewForce.Visible ??= Off;
  };

  AnyMuscleViaPoint SSTT10T2 =
  {
    AnyMuscleModel &MusMdl = ....MuscleModels.Left.SemispinalisThoracis.SSTT10T2;
    AnyRefFrame &Org = ....Segments.T10Seg.SSTT10TransversusL;
    AnyRefNode &Via3 = ....Segments.T9Seg.SSTT9ViaNodeL;
    AnyRefNode &Via4 = ....Segments.T8Seg.SSTT8ViaNodeL;
    AnyRefNode &Via5 = ....Segments.T7Seg.SSTT2ViaNodeL;
    AnyRefFrame &Ins = ....Segments.T2Seg.SSTT2Spinous;
    viewMuscle = {#include "../DrawSettings/MusDrawSettings.any"};
    viewForce.Visible ??= Off;
  };

  AnyMuscleViaPoint SSTT9T1 =
  {
    AnyMuscleModel &MusMdl = ....MuscleModels.Left.SemispinalisThoracis.SSTT9T1;
    AnyRefFrame &Org = ....Segments.T9Seg.SSTT9TransversusL;
    AnyRefNode &Via4 = ....Segments.T8Seg.SSTT9T4ViaNodeL;
    AnyRefNode &Via5 = ....Segments.T7Seg.SSTT9T1ViaNodeL;
    AnyRefFrame &Ins = ....Segments.T1Seg.SSTT1Spinous;
    viewMuscle = {#include "../DrawSettings/MusDrawSettings.any"};
    viewForce.Visible ??= Off;
  };
  #endif
  AnyMuscleViaPoint SSTT8C7 =
  {
    AnyMuscleModel &MusMdl = ....MuscleModels.Left.SemispinalisThoracis.SSTT8C7;
    AnyRefFrame &Org = ....Segments.T8Seg.SSTT8TransversusL;
    AnyRefNode &Via5 = ....Segments.T7Seg.SSTT8T4ViaNodeL;
    AnyRefFrame &Ins = ....Segments.C7Seg.SSTC7Spinous;
    viewMuscle = {#include "../DrawSettings/MusDrawSettings.any"};
    viewForce.Visible ??= Off;
  };

  AnyMuscleViaPoint SSTT7C6 =
  {
    AnyMuscleModel &MusMdl = ....MuscleModels.Left.SemispinalisThoracis.SSTT7C6;
    AnyRefFrame &Org = ....Segments.T7Seg.SSTT7TransversusL;
    AnyRefFrame &Ins = ....Segments.C6Seg.SSTC6Spinous;
    viewMuscle = {#include "../DrawSettings/MusDrawSettings.any"};
    viewForce.Visible ??= Off;
  };
};

MuscleGroup SerratusPosteriorInferior = {

  AnyMuscleViaPoint SPIL2R12 = {
    AnyMuscleModel &MusMdl = ....MuscleModels.Left.SerratusPosteriorInferior.SPIL2R12;
    AnyRefNode &L2 = ....Segments.L2Seg.O_serratus_posterior_inferior_L;
    AnyRefNode &Via1 = ....Segments.L2Seg.O_serratus_posterior_inferior_L2R12ViaNode_L;
    AnyRefNode &R12 = ....Segments.Left.R12Seg.O_serratus_posterior_inferior_R12L;
    viewMuscle = {#include "../DrawSettings/MusDrawSettings.any"};
    viewForce.Visible ??= Off;
  };

  AnyMuscleViaPoint SPIL1R11 = {
    AnyMuscleModel &MusMdl = ....MuscleModels.Left.SerratusPosteriorInferior.SPIL1R11;
    AnyRefNode &L1 = ....Segments.L1Seg.O_serratus_posterior_inferior_L;
    AnyRefNode &Via1 = ....Segments.L1Seg.O_serratus_posterior_inferior_L1R11ViaNode_L;
    AnyRefNode &R11 = ....Segments.Left.R11Seg.O_serratus_posterior_inferior_R11L;
    viewMuscle = {#include "../DrawSettings/MusDrawSettings.any"};
    viewForce.Visible ??= Off;
  };
  #if BM_TRUNK_THORACIC_MODEL == _THORACIC_MODEL_FLEXIBLE_
  AnyMuscleViaPoint SPIT12R10 = {
    AnyMuscleModel &MusMdl = ....MuscleModels.Left.SerratusPosteriorInferior.SPIT12R10;
    AnyRefNode &T12 = ....Segments.T12Seg.O_serratus_posterior_inferior_T12L;
    AnyRefNode &Via1 = ....Segments.T12Seg.O_serratus_posterior_inferior_T12R10ViaNodeL;
    AnyRefNode &R10 = ....Segments.Left.R10Seg.O_serratus_posterior_inferior_R10L;
    viewMuscle = {#include "../DrawSettings/MusDrawSettings.any"};
    viewForce.Visible ??= Off;
  };

  AnyMuscleViaPoint SPIT11R9 = {
    AnyMuscleModel &MusMdl = ....MuscleModels.Left.SerratusPosteriorInferior.SPIT11R9;
    AnyRefNode &T11 = ....Segments.T11Seg.O_serratus_posterior_inferior_T11L;
    AnyRefNode &Via1 = ....Segments.T11Seg.O_serratus_posterior_inferior_T11R9ViaNodeL;
    AnyRefNode &R9 = ....Segments.Left.R9Seg.O_serratus_posterior_inferior_R9L;
    viewMuscle = {#include "../DrawSettings/MusDrawSettings.any"};
    viewForce.Visible ??= Off;
  };
  #endif
};

MuscleGroup SerratusPosteriorSuperior = {

  AnyMuscleViaPoint SPSR2C7 = {
    AnyMuscleModel &MusMdl = ....MuscleModels.Left.SerratusPosteriorSuperior.SPSR2C7;
    AnyRefNode &C7 = ....Segments.C7Seg.O_serratus_posterior_superior_1C7NodeL;
    AnyRefNode &R2 = ....Segments.Left.R2Seg.O_serratus_posterior_superior_1L;
    viewMuscle = {#include "../DrawSettings/MusDrawSettings.any"};
    viewForce.Visible ??= Off;
  };

  #if BM_TRUNK_THORACIC_MODEL == _THORACIC_MODEL_FLEXIBLE_
  AnyMuscleViaPoint SPSR3T1 = {
    AnyMuscleModel &MusMdl = ....MuscleModels.Left.SerratusPosteriorSuperior.SPSR3T1;
    AnyRefNode &T1 = ....Segments.T1Seg.O_serratus_posterior_superior_T1L;
    AnyRefNode &R3 = ....Segments.Left.R3Seg.O_serratus_posterior_superior_2L;
    viewMuscle = {#include "../DrawSettings/MusDrawSettings.any"};
    viewForce.Visible ??= Off;
  };

  AnyMuscleViaPoint SPSR4T2 = {
    AnyMuscleModel &MusMdl = ....MuscleModels.Left.SerratusPosteriorSuperior.SPSR4T2;
    AnyRefNode &T2 = ....Segments.T2Seg.O_serratus_posterior_superior_T2L;
    AnyRefNode &R4 = ....Segments.Left.R4Seg.O_serratus_posterior_superior_3L;
    viewMuscle = {#include "../DrawSettings/MusDrawSettings.any"};
    viewForce.Visible ??= Off;
  };

  AnyMuscleViaPoint SPSR5T3 = {
    AnyMuscleModel &MusMdl = ....MuscleModels.Left.SerratusPosteriorSuperior.SPSR5T3;
    AnyRefNode &T3 = ....Segments.T3Seg.O_serratus_posterior_superior_T3L;
    AnyRefNode &R5 = ....Segments.Left.R5Seg.O_serratus_posterior_superior_4L;
    viewMuscle = {#include "../DrawSettings/MusDrawSettings.any"};
    viewForce.Visible ??= Off;
  };
  #endif
};

MuscleGroup SpleniusCapitis = {
  AnyMuscleViaPoint SpleniusCapitisC7C0 = {
    AnyMuscleModel &MusMdl = ....MuscleModels.Left.SpleniusCapitis.SpleniusCapitisC7C0;
    AnyRefNode &Org = ....Segments.SkullSeg.SpleniusCapitisNodeL;
    AnyRefNode &Ins = ....Segments.C7Seg.SpleniusCapitisC7C0NodeL;
    viewMuscle = {#include "../DrawSettings/MusDrawSettings.any"};
    viewForce.Visible ??= Off;
  };
  AnyMuscleViaPoint SpleniusCapitisT1C0 = {
    AnyMuscleModel &MusMdl = ....MuscleModels.Left.SpleniusCapitis.SpleniusCapitisT1C0;
    AnyRefNode &Org = ....Segments.SkullSeg.SpleniusCapitisNodeL;
    AnyRefNode &Ins = ....Segments.T1Seg.Left.SpleniusCapitisT1C0Node;
    viewMuscle = {#include "../DrawSettings/MusDrawSettings.any"};
    viewForce.Visible ??= Off;
  };
  AnyMuscleViaPoint SpleniusCapitisT2C0 = {
    AnyMuscleModel &MusMdl = ....MuscleModels.Left.SpleniusCapitis.SpleniusCapitisT2C0;
    AnyRefNode &Org = ....Segments.SkullSeg.SpleniusCapitisNodeL;
    AnyRefNode &Ins = ....Segments.T2Seg.Left.SpleniusCapitisT2C0Node;
    viewMuscle = {#include "../DrawSettings/MusDrawSettings.any"};
    viewForce.Visible ??= Off;
  };
  AnyMuscleViaPoint SpleniusCapitisT3C0 = {
    AnyMuscleModel &MusMdl = ....MuscleModels.Left.SpleniusCapitis.SpleniusCapitisT3C0;
    AnyRefNode &Org = ....Segments.SkullSeg.SpleniusCapitisNodeL;
    AnyRefNode &Ins = ....Segments.T3Seg.Left.SpleniusCapitisT3C0Node;
    viewMuscle = {#include "../DrawSettings/MusDrawSettings.any"};
    viewForce.Visible ??= Off;
  };
};
MuscleGroup SpleniusCervicis = {
  AnyMuscleViaPoint SpleniusCervicisT3C1 = {
    AnyMuscleModel &MusMdl = ....MuscleModels.Left.SpleniusCervicis.SpleniusCervicisT3C1;
    AnyRefNode &Org = ....Segments.T3Seg.Left.SpleniusCervicisNode;
    AnyRefNode &Ins = ....Segments.C1Seg.Left.SpleniusCervicisT3C1Node;
    viewMuscle = {#include "../DrawSettings/MusDrawSettings.any"};
    viewForce.Visible ??= Off;
  };
  AnyMuscleViaPoint SpleniusCervicisT4C2 = {
    AnyMuscleModel &MusMdl = ....MuscleModels.Left.SpleniusCervicis.SpleniusCervicisT4C2;
    AnyRefNode &Org = ....Segments.T4Seg.Left.SpleniusCervicisNode;
    AnyRefNode &Ins = ....Segments.C2Seg.Left.SpleniusCervicisT4C2Node;
    viewMuscle = {#include "../DrawSettings/MusDrawSettings.any"};
    viewForce.Visible ??= Off;
  };

  AnyMuscleViaPoint SpleniusCervicisT5C3 = {
    AnyMuscleModel &MusMdl = ....MuscleModels.Left.SpleniusCervicis.SpleniusCervicisT5C3;
    AnyRefNode &Org = ....Segments.T5Seg.Left.SpleniusCervicisNode;
    AnyRefNode &Ins = ....Segments.C3Seg.Left.SpleniusCervicisT5C3Node;
    viewMuscle = {#include "../DrawSettings/MusDrawSettings.any"};
    viewForce.Visible ??= Off;
  };
  AnyMuscleViaPoint SpleniusCervicisT6C3 = {
    AnyMuscleModel &MusMdl = ....MuscleModels.Left.SpleniusCervicis.SpleniusCervicisT6C3;
    AnyRefNode &Org = ....Segments.T6Seg.Left.SpleniusCervicisNode;
    AnyRefNode &Ins = ....Segments.C3Seg.Left.SpleniusCervicisT6C3Node;
    viewMuscle = {#include "../DrawSettings/MusDrawSettings.any"};
    viewForce.Visible ??= Off;
  };
};

#if BM_TRUNK_THORACIC_MODEL == _THORACIC_MODEL_FLEXIBLE_
MuscleGroup Subcostalis = {
  AnyMuscleViaPoint SCR1R3 = {
    AnyMuscleModel &MusMdl = ....MuscleModels.Left.Subcostalis.SCModel_1;
    AnyRefNode &R1 = ....Segments.Left.R1Seg.SCR1R3_L_Org;
    AnyRefNode &R3 = ....Segments.Left.R3Seg.SCR1R3_L_Ins;
    viewMuscle = {#include "../DrawSettings/MusDrawSettings.any"};
    viewForce.Visible ??= Off;
  };

  AnyMuscleViaPoint SCR1R4 = {
    AnyMuscleModel &MusMdl = ....MuscleModels.Left.Subcostalis.SCModel_2;
    AnyRefNode &R1 = ....Segments.Left.R1Seg.SCR1R4_L_Org;
    AnyRefNode &R3 = ....Segments.Left.R4Seg.SCR1R4_L_Ins;
    viewMuscle = {#include "../DrawSettings/MusDrawSettings.any"};
    viewForce.Visible ??= Off;
  };

  AnyMuscleViaPoint SCR2R4 = {
    AnyMuscleModel &MusMdl = ....MuscleModels.Left.Subcostalis.SCModel_3;
    AnyRefNode &R2 = ....Segments.Left.R2Seg.SCR2R4_L_Org;
    AnyRefNode &R4 = ....Segments.Left.R4Seg.SCR2R4_L_Ins;
    viewMuscle = {#include "../DrawSettings/MusDrawSettings.any"};
    viewForce.Visible ??= Off;
  };

  AnyMuscleViaPoint SCR2R5 = {
    AnyMuscleModel &MusMdl = ....MuscleModels.Left.Subcostalis.SCModel_4;
    AnyRefNode &R2 = ....Segments.Left.R2Seg.SCR2R5_L_Org;
    AnyRefNode &R4 = ....Segments.Left.R5Seg.SCR2R5_L_Ins;
    viewMuscle = {#include "../DrawSettings/MusDrawSettings.any"};
    viewForce.Visible ??= Off;
  };

  AnyMuscleViaPoint SCR3R5 = {
    AnyMuscleModel &MusMdl = ....MuscleModels.Left.Subcostalis.SCModel_5;
    AnyRefNode &R3 = ....Segments.Left.R3Seg.SCR3R5_L_Org;
    AnyRefNode &R5 = ....Segments.Left.R5Seg.SCR3R5_L_Ins;
    viewMuscle = {#include "../DrawSettings/MusDrawSettings.any"};
    viewForce.Visible ??= Off;
  };

  AnyMuscleViaPoint SCR3R6 = {
    AnyMuscleModel &MusMdl = ....MuscleModels.Left.Subcostalis.SCModel_6;
    AnyRefNode &R3 = ....Segments.Left.R3Seg.SCR3R6_L_Org;
    AnyRefNode &R5 = ....Segments.Left.R6Seg.SCR3R6_L_Ins;
    viewMuscle = {#include "../DrawSettings/MusDrawSettings.any"};
    viewForce.Visible ??= Off;
  };

  AnyMuscleViaPoint SCR4R6 = {
    AnyMuscleModel &MusMdl = ....MuscleModels.Left.Subcostalis.SCModel_7;
    AnyRefNode &R4 = ....Segments.Left.R4Seg.SCR4R6_L_Org;
    AnyRefNode &R6 = ....Segments.Left.R6Seg.SCR4R6_L_Ins;
    viewMuscle = {#include "../DrawSettings/MusDrawSettings.any"};
    viewForce.Visible ??= Off;
  };

  AnyMuscleViaPoint SCR4R7 = {
    AnyMuscleModel &MusMdl = ....MuscleModels.Left.Subcostalis.SCModel_8;
    AnyRefNode &R4 = ....Segments.Left.R4Seg.SCR4R7_L_Org;
    AnyRefNode &R6 = ....Segments.Left.R7Seg.SCR4R7_L_Ins;
    viewMuscle = {#include "../DrawSettings/MusDrawSettings.any"};
    viewForce.Visible ??= Off;
  };

  AnyMuscleViaPoint SCR5R7 = {
    AnyMuscleModel &MusMdl = ....MuscleModels.Left.Subcostalis.SCModel_9;
    AnyRefNode &R5 = ....Segments.Left.R5Seg.SCR5R7_L_Org;
    AnyRefNode &R7 = ....Segments.Left.R7Seg.SCR5R7_L_Ins;
    viewMuscle = {#include "../DrawSettings/MusDrawSettings.any"};
    viewForce.Visible ??= Off;
  };

  AnyMuscleViaPoint SCR5R8 = {
    AnyMuscleModel &MusMdl = ....MuscleModels.Left.Subcostalis.SCModel_10;
    AnyRefNode &R5 = ....Segments.Left.R5Seg.SCR5R8_L_Org;
    AnyRefNode &R7 = ....Segments.Left.R8Seg.SCR5R8_L_Ins;
    viewMuscle = {#include "../DrawSettings/MusDrawSettings.any"};
    viewForce.Visible ??= Off;
  };

  AnyMuscleViaPoint SCR6R8 = {
    AnyMuscleModel &MusMdl = ....MuscleModels.Left.Subcostalis.SCModel_11;
    AnyRefNode &R6 = ....Segments.Left.R6Seg.SCR6R8_L_Org;
    AnyRefNode &R8 = ....Segments.Left.R8Seg.SCR6R8_L_Ins;
    viewMuscle = {#include "../DrawSettings/MusDrawSettings.any"};
    viewForce.Visible ??= Off;
  };

  AnyMuscleViaPoint SCR6R9 = {
    AnyMuscleModel &MusMdl = ....MuscleModels.Left.Subcostalis.SCModel_12;
    AnyRefNode &R6 = ....Segments.Left.R6Seg.SCR6R9_L_Org;
    AnyRefNode &R8 = ....Segments.Left.R9Seg.SCR6R9_L_Ins;
    viewMuscle = {#include "../DrawSettings/MusDrawSettings.any"};
    viewForce.Visible ??= Off;
  };

  AnyMuscleViaPoint SCR7R9 = {
    AnyMuscleModel &MusMdl = ....MuscleModels.Left.Subcostalis.SCModel_13;
    AnyRefNode &R7 = ....Segments.Left.R7Seg.SCR7R9_L_Org;
    AnyRefNode &R9 = ....Segments.Left.R9Seg.SCR7R9_L_Ins;
    viewMuscle = {#include "../DrawSettings/MusDrawSettings.any"};
    viewForce.Visible ??= Off;
  };

  AnyMuscleViaPoint SCR7R10 = {
    AnyMuscleModel &MusMdl = ....MuscleModels.Left.Subcostalis.SCModel_14;
    AnyRefNode &R7 = ....Segments.Left.R7Seg.SCR7R10_L_Org;
    AnyRefNode &R9 = ....Segments.Left.R10Seg.SCR7R10_L_Ins;
    viewMuscle = {#include "../DrawSettings/MusDrawSettings.any"};
    viewForce.Visible ??= Off;
  };

  AnyMuscleViaPoint SCR8R10 = {
    AnyMuscleModel &MusMdl = ....MuscleModels.Left.Subcostalis.SCModel_15;
    AnyRefNode &R8 = ....Segments.Left.R8Seg.SCR8R10_L_Org;
    AnyRefNode &R10 = ....Segments.Left.R10Seg.SCR8R10_L_Ins;
    viewMuscle = {#include "../DrawSettings/MusDrawSettings.any"};
    viewForce.Visible ??= Off;
  };

  AnyMuscleViaPoint SCR8R11 = {
    AnyMuscleModel &MusMdl = ....MuscleModels.Left.Subcostalis.SCModel_16;
    AnyRefNode &R8 = ....Segments.Left.R8Seg.SCR8R11_L_Ins;
    AnyRefNode &R11 = ....Segments.Left.R11Seg.SCR8R11_L_Org;
    viewMuscle = {#include "../DrawSettings/MusDrawSettings.any"};
    viewForce.Visible ??= Off;
  };

  AnyMuscleViaPoint SCR9R11 = {
    AnyMuscleModel &MusMdl = ....MuscleModels.Left.Subcostalis.SCModel_17;
    AnyRefNode &R9 = ....Segments.Left.R9Seg.SCR9R11_L_Ins;
    AnyRefNode &R11 = ....Segments.Left.R11Seg.SCR9R11_L_Org;
    viewMuscle = {#include "../DrawSettings/MusDrawSettings.any"};
    viewForce.Visible ??= Off;
  };
};
#endif

#if BM_TRUNK_CAVITY_MODEL == _CAVITY_MODEL_VOLUME_
MuscleGroup TransversusAbdominis = {
  AnyMuscleViaPoint TransversusL1 = {
    AnyMuscleModel &MusMdl = ....MuscleModels.Left.Transversus.Transversus_1;
    AnyRefNode &Org = ....Segments.L1Seg.TransversusInsNode_L;
    AnyRefNode &Via01 = ....Abdominal.Layer_L1.BaseSegPosterior.TransversusPoints.Left.nn03;
    AnyRefNode &Via02 = ....Abdominal.Layer_L1.BaseSegAnterior.TransversusPoints.Left.nn01;
    AnyRefNode &Via03 = ....Abdominal.Layer_L1.BaseSegAnterior.TransversusPoints.Left.nn02;
    AnyRefNode &Via04 = ....Abdominal.Layer_L1.BaseSegAnterior.TransversusPoints.Left.nn03;
    AnyRefNode &Via05 = ....Abdominal.Layer_L1.BaseSegAnterior.TransversusPoints.Left.nn04;
    AnyRefNode &Via06 = ....Abdominal.Layer_L1.BaseSegAnterior.TransversusPoints.Left.nn05;
    AnyRefNode &Via07 = ....Abdominal.Layer_L1.BaseSegAnterior.TransversusPoints.Left.nn06;
    AnyRefNode &Ins = ....Abdominal.Layer_L1.BaseSegAnterior.TransversusPoints.Center;
    viewMuscle = {#include "../DrawSettings/MusDrawSettings.any"};
  };

  AnyMuscleViaPoint TransversusL2 = {
    AnyMuscleModel &MusMdl = ....MuscleModels.Left.Transversus.Transversus_2;
    AnyRefNode &Org = ....Segments.L2Seg.TransversusInsNode_L;
    AnyRefNode &Via01 = ....Abdominal.Layer_L2.BaseSegPosterior.TransversusPoints.Left.nn03;
    AnyRefNode &Via02 = ....Abdominal.Layer_L2.BaseSegAnterior.TransversusPoints.Left.nn01;
    AnyRefNode &Via03 = ....Abdominal.Layer_L2.BaseSegAnterior.TransversusPoints.Left.nn02;
    AnyRefNode &Via04 = ....Abdominal.Layer_L2.BaseSegAnterior.TransversusPoints.Left.nn03;
    AnyRefNode &Via05 = ....Abdominal.Layer_L2.BaseSegAnterior.TransversusPoints.Left.nn04;
    AnyRefNode &Via06 = ....Abdominal.Layer_L2.BaseSegAnterior.TransversusPoints.Left.nn05;
    AnyRefNode &Via07 = ....Abdominal.Layer_L2.BaseSegAnterior.TransversusPoints.Left.nn06;
    viewMuscle = {#include "../DrawSettings/MusDrawSettings.any"};
  };

  AnyMuscleViaPoint TransversusL3 = {
    AnyMuscleModel &MusMdl = ....MuscleModels.Left.Transversus.Transversus_3;
    AnyRefNode &Org = ....Segments.L3Seg.TransversusInsNode_L;
    AnyRefNode &Via01 = ....Abdominal.Layer_L3.BaseSegPosterior.TransversusPoints.Left.nn03;
    AnyRefNode &Via02 = ....Abdominal.Layer_L3.BaseSegAnterior.TransversusPoints.Left.nn01;
    AnyRefNode &Via03 = ....Abdominal.Layer_L3.BaseSegAnterior.TransversusPoints.Left.nn02;
    AnyRefNode &Via04 = ....Abdominal.Layer_L3.BaseSegAnterior.TransversusPoints.Left.nn03;
    AnyRefNode &Via05 = ....Abdominal.Layer_L3.BaseSegAnterior.TransversusPoints.Left.nn04;
    AnyRefNode &Via06 = ....Abdominal.Layer_L3.BaseSegAnterior.TransversusPoints.Left.nn05;
    AnyRefNode &Via07 = ....Abdominal.Layer_L3.BaseSegAnterior.TransversusPoints.Left.nn06;
    viewMuscle = {#include "../DrawSettings/MusDrawSettings.any"};
  };

  AnyMuscleViaPoint TransversusL4 = {
    AnyMuscleModel &MusMdl = ....MuscleModels.Left.Transversus.Transversus_4;
    AnyRefNode &Org = ....Segments.L4Seg.TransversusInsNode_L;
    AnyRefNode &Via01 = ....Abdominal.Layer_L4.BaseSegPosterior.TransversusPoints.Left.nn03;
    AnyRefNode &Via02 = ....Abdominal.Layer_L4.BaseSegAnterior.TransversusPoints.Left.nn01;
    AnyRefNode &Via03 = ....Abdominal.Layer_L4.BaseSegAnterior.TransversusPoints.Left.nn02;
    AnyRefNode &Via04 = ....Abdominal.Layer_L4.BaseSegAnterior.TransversusPoints.Left.nn03;
    AnyRefNode &Via05 = ....Abdominal.Layer_L4.BaseSegAnterior.TransversusPoints.Left.nn04;
    AnyRefNode &Via06 = ....Abdominal.Layer_L4.BaseSegAnterior.TransversusPoints.Left.nn05;
    AnyRefNode &Via07 = ....Abdominal.Layer_L4.BaseSegAnterior.TransversusPoints.Left.nn06;
    viewMuscle = {#include "../DrawSettings/MusDrawSettings.any"};
  };

  AnyMuscleViaPoint TransversusL5 = {
    AnyMuscleModel &MusMdl = ....MuscleModels.Left.Transversus.Transversus_5;
    AnyRefNode &Org = ....Segments.L5Seg.TransversusInsNode_L;
    AnyRefNode &Via01 = ....Abdominal.Layer_L5.BaseSegPosterior.TransversusPoints.Left.nn03;
    AnyRefNode &Via02 = ....Abdominal.Layer_L5.BaseSegAnterior.TransversusPoints.Left.nn01;
    AnyRefNode &Via03 = ....Abdominal.Layer_L5.BaseSegAnterior.TransversusPoints.Left.nn02;
    AnyRefNode &Via04 = ....Abdominal.Layer_L5.BaseSegAnterior.TransversusPoints.Left.nn03;
    AnyRefNode &Via05 = ....Abdominal.Layer_L5.BaseSegAnterior.TransversusPoints.Left.nn04;
    AnyRefNode &Via06 = ....Abdominal.Layer_L5.BaseSegAnterior.TransversusPoints.Left.nn05;
    AnyRefNode &Via07 = ....Abdominal.Layer_L5.BaseSegAnterior.TransversusPoints.Left.nn06;
    viewMuscle = {#include "../DrawSettings/MusDrawSettings.any"};
  };
};
#endif

#if BM_TRUNK_THORACIC_MODEL == _THORACIC_MODEL_FLEXIBLE_
MuscleGroup TransversusThoracis = {
  AnyMuscleViaPoint TrThR2S = {
    AnyMuscleModel &MusMdl = ....MuscleModels.Left.TransversusThoracis.TransvThModel_1;
    AnyRefNode &R2 = ....Segments.Left.R2Seg.TrThR2SNodeLOrg;
    AnyRefNode &S = ....Segments.SternalBodySeg.TrThR2SNodeLIns;
    viewMuscle = {#include "../DrawSettings/MusDrawSettings.any"};
    viewForce.Visible ??= Off;
  };

  AnyMuscleViaPoint TrThR2R4S = {
    AnyMuscleModel &MusMdl = ....MuscleModels.Left.TransversusThoracis.TransvThModel_2;
    AnyRefNode &R4 = ....Segments.Left.R2Seg.TrThR2R4NodeLOrg;
    AnyRefNode &S = ....Segments.Left.R4Seg.TrThR2R4NodeLIns;
    viewMuscle = {#include "../DrawSettings/MusDrawSettings.any"};
    viewForce.Visible ??= Off;
  };

  AnyMuscleViaPoint TrThR3S = {
    AnyMuscleModel &MusMdl = ....MuscleModels.Left.TransversusThoracis.TransvThModel_3;
    AnyRefNode &R3 = ....Segments.Left.R3Seg.TrThR3SNodeLOrg;
    AnyRefNode &S = ....Segments.SternalBodySeg.TrThR3SNodeLIns;
    viewMuscle = {#include "../DrawSettings/MusDrawSettings.any"};
    viewForce.Visible ??= Off;
  };

  AnyMuscleViaPoint TrThR3R5S = {
    AnyMuscleModel &MusMdl = ....MuscleModels.Left.TransversusThoracis.TransvThModel_4;
    AnyRefNode &R3 = ....Segments.Left.R3Seg.TrThR3R5NodeLOrg;
    AnyRefNode &S = ....Segments.Left.R5Seg.TrThR3R5NodeLIns;
    viewMuscle = {#include "../DrawSettings/MusDrawSettings.any"};
    viewForce.Visible ??= Off;
  };

  AnyMuscleViaPoint TrThR4S = {
    AnyMuscleModel &MusMdl = ....MuscleModels.Left.TransversusThoracis.TransvThModel_5;
    AnyRefNode &R4 = ....Segments.Left.R4Seg.TrThR4SNodeLOrg;
    AnyRefNode &S = ....Segments.SternalBodySeg.TrThR4SNodeLIns;
    viewMuscle = {#include "../DrawSettings/MusDrawSettings.any"};
    viewForce.Visible ??= Off;
  };

  AnyMuscleViaPoint TrThR4R6S = {
    AnyMuscleModel &MusMdl = ....MuscleModels.Left.TransversusThoracis.TransvThModel_6;
    AnyRefNode &R4 = ....Segments.Left.R4Seg.TrThR4R6NodeLOrg;
    AnyRefNode &S = ....Segments.Left.R6Seg.TrThR4R6NodeLIns;
    viewMuscle = {#include "../DrawSettings/MusDrawSettings.any"};
    viewForce.Visible ??= Off;
  };

  AnyMuscleViaPoint TrThR5S = {
    AnyMuscleModel &MusMdl = ....MuscleModels.Left.TransversusThoracis.TransvThModel_7;
    AnyRefNode &R5 = ....Segments.Left.R5Seg.TrThR5SNodeLOrg;
    AnyRefNode &S = ....Segments.SternalBodySeg.TrThR5SNodeLIns;
    viewMuscle = {#include "../DrawSettings/MusDrawSettings.any"};
    viewForce.Visible ??= Off;
  };

  AnyMuscleViaPoint TrThR5R7S = {
    AnyMuscleModel &MusMdl = ....MuscleModels.Left.TransversusThoracis.TransvThModel_8;
    AnyRefNode &R4 = ....Segments.Left.R5Seg.TrThR5R7NodeLOrg;
    AnyRefNode &S56 = ....Segments.Left.R7Seg.TrThR5R7NodeLIns;
    viewMuscle = {#include "../DrawSettings/MusDrawSettings.any"};
    viewForce.Visible ??= Off;
  };

  AnyMuscleViaPoint TrThR6S = {
    AnyMuscleModel &MusMdl = ....MuscleModels.Left.TransversusThoracis.TransvThModel_9;
    AnyRefNode &R4 = ....Segments.Left.R6Seg.TrThR6SNodeLOrg;
    AnyRefNode &S56 = ....Segments.SternalBodySeg.TrThR6SNodeLIns;
    viewMuscle = {#include "../DrawSettings/MusDrawSettings.any"};
    viewForce.Visible ??= Off;
  };

  AnyMuscleViaPoint TrThR7S = {
    AnyMuscleModel &MusMdl = ....MuscleModels.Left.TransversusThoracis.TransvThModel_10;
    AnyRefNode &R7 = ....Segments.Left.R7Seg.TrThR7SNodeLOrg;
    AnyRefNode &S8 = ....Segments.SternalBodySeg.TrThNodeLIns;
  };

  AnyMuscleViaPoint TrThR8S = {
    AnyMuscleModel &MusMdl = ....MuscleModels.Left.TransversusThoracis.TransvThModel_11;
    AnyRefNode &R8 = ....Segments.Left.R8Seg.TrThR8SNodeLOrg;
    AnyRefNode &S8 = ....Segments.SternalBodySeg.TrThNodeLIns;
  };

  AnyMuscleViaPoint TrThR9S = {
    AnyMuscleModel &MusMdl = ....MuscleModels.Left.TransversusThoracis.TransvThModel_12;
    AnyRefNode &R9 = ....Segments.Left.R9Seg.TrThR9SNodeLOrg;
    AnyRefNode &S8 = ....Segments.SternalBodySeg.TrThNodeLIns;
  };

  AnyMuscleViaPoint TrThR10S = {
    AnyMuscleModel &MusMdl = ....MuscleModels.Left.TransversusThoracis.TransvThModel_13;
    AnyRefNode &R10 = ....Segments.Left.R10Seg.TrThR10SNodeLOrg;
    AnyRefNode &S8 = ....Segments.SternalBodySeg.TrThNodeLIns;
  };
};
#endif

#endif
