  /*
Definitions of Segments in the Lumbar Part of the Spine + the pelvis
Abbrevitations:
ALL = Anterior Longitudinal Ligament
PLL = Posterior Longitudinal Ligament
LS = Ligamentum Supraspinale
LI = Ligamentum Interspinalia

MF = Multifidi
ILpl = Iliocostalis Lumborum pars lumborum (part of Erector Spinae)
LTpl = Longissimus Thoracis pars lumborum (part of Erector Spinae)
ILpt = Iliocostalis Lumborum pars thoracis (part of Erector Spinae)
LTpt = Longissimus Thoracis pars thoracis (part of Erector Spinae)
PM = Psoas Major
QL = Quadratus Lumborum
RA = Rectus Abdominis
OE = Obliquus Externus
OI = Obliquus Internus

C = Costae
CI = Crista Iliaca
CP = Crista Pubica
SIPS = Spina iliaca posterior superior
SIPI = Spina iliaca Posterior inferior
T = Thoracal hvirvel
L = Lumbal hvirvel
S = Sacral segment
*/
#include "PelvisSeg.any"

#include "SegmentsLumbar.Muscles.any"

TrunkSegmentBase SacrumSeg(
  DATA = ..Data.unscaled,
  LEVEL = Sacrum,
  CAUDAL_NEIGHBOUR = Pelvis,
  DEF_SCALING = 0,  // reusing pelvis
  DEF_CONTACTS = 0,
  DEF_DRAWING = 0,
  _VOLUMETRIC_CAVITY = BM_TRUNK_CAVITY_MODEL,
  PelvisSeg=..PelvisSeg
  ) = {

  //initial position found as a function of pelvis pos and orientation
  r0 ??= .PelvisSeg.PelvisSacrumJntNode.sRel*.PelvisSeg.Axes0'+.PelvisSeg.r0-SacrumPelvisJntNode.sRel*Axes0';
  Axes0=.PelvisSeg.Axes0;

  // Sacrum is part of the pelvis so they scales together
  AnyRefNode& ScalingNode = AnatomicalFrameTrunk;
  AnyRefNode AnatomicalFrameTrunk = {
    sRel = ..PelvisSeg.AnatomicalFrameTrunk.sRel;
    ARel = ..PelvisSeg.AnatomicalFrameTrunk.ARel;
  };
  AnyFunTransform3D& Scale = .PelvisSeg.Scale;

  // Joint nodes
  AnyRefNode SacrumL5JntNode = {
    sRel = .Scale(.Data.SacrumL5JntNode_pos);
    /// Rotated node with x axis parallel to the sacrum base surface
    AnyRefNode RotNode = {
        ARel = RotMat(0.5*(..Endplates.Superior.Anterior.sRel + ..Endplates.Superior.Posterior.sRel),
                      ..Endplates.Superior.Anterior.sRel,
                      0.5*(..Endplates.Superior.Anterior.sRel + ..Endplates.Superior.Posterior.sRel) + (..Endplates.Superior.Left.sRel - ..Endplates.Superior.Right.sRel))*RotMat(pi/2,x);
    };
  };
  //AnyRefNode SacrumPelvisJntNode = {sRel = .Scale(.Data.SacrumPelvisJntNode_pos);};
  AnyRefNode SacrumContactNode = {sRel= .Scale(.Data.SacrumContactNode_pos);};

  AnyRefNode SacrumBonyTip ={sRel= .Scale(.Data.SacrumBonyTip_pos);};
  AnyRefNode SacrumPosteriorSuperior ={sRel= .Scale(.Data.SacrumPosteriorSuperior_pos);};

  // -------- Drawing object section sacrum--------
  #if BM_PELVIS_DISPLAY == _PELVIS_DISPLAY_LEGPELVIS_ONLY_
  AnyDrawSurf &BoneDraw = DrwSacrum;
  AnyDrawSurf DrwSacrum = {
    Opacity = Main.DrawSettings.BonesOpacity.Sacrum;
    FileName = ...Data.unscaled.STL.FilenameSacrumSeg;
    RGB = ...ColorRef.Segments;
    AnyFunTransform3D &Scale =.Scale;
  };
  // -------- End of drawing section sacrum--------
  #endif
  }; // SacrumSeg


TrunkSegmentBase L5Seg(
  DATA = ..Data.unscaled,
  CRANIAL_NEIGHBOUR = L4,
  LEVEL = L5,
  CAUDAL_NEIGHBOUR = Sacrum,
  _VOLUMETRIC_CAVITY = BM_TRUNK_CAVITY_MODEL,
  PelvisSeg=..PelvisSeg
  ) = {

  //initial position found as a function of pelvis pos and orientation
  r0 ??= .SacrumSeg.SacrumL5JntNode.sRel*.SacrumSeg.Axes0'+.SacrumSeg.r0-L5SacrumJntNode.sRel*Axes0';

}; // End of L5Seg

TrunkSegmentBase L4Seg(
  DATA = ..Data.unscaled,
  CRANIAL_NEIGHBOUR = L3,
  LEVEL = L4,
  CAUDAL_NEIGHBOUR = L5,
  _VOLUMETRIC_CAVITY = BM_TRUNK_CAVITY_MODEL,
  PelvisSeg=..PelvisSeg
  ) = {
  //initial position found as a function of pelvis pos and orientation
  r0 ??= .L5Seg.L4L5JntNode.sRel*.L5Seg.Axes0'+.L5Seg.r0-L4L5JntNode.sRel*Axes0';

}; // End of L4Seg

TrunkSegmentBase L3Seg(
  DATA = ..Data.unscaled,
  CRANIAL_NEIGHBOUR = L2,
  LEVEL = L3,
  CAUDAL_NEIGHBOUR = L4,
  _VOLUMETRIC_CAVITY = BM_TRUNK_CAVITY_MODEL,
  PelvisSeg=..PelvisSeg
  ) = {
  //initial position found as a function of pelvis pos and orientation
  r0 ??= .L4Seg.L3L4JntNode.sRel*.L4Seg.Axes0'+.L4Seg.r0-L3L4JntNode.sRel*Axes0';
}; // End of L3Seg

TrunkSegmentBase L2Seg(
  DATA = ..Data.unscaled,
  CRANIAL_NEIGHBOUR = L1,
  LEVEL = L2,
  CAUDAL_NEIGHBOUR = L3,
  _VOLUMETRIC_CAVITY = BM_TRUNK_CAVITY_MODEL,
  PelvisSeg=..PelvisSeg
  ) = {
  //initial position found as a function of pelvis pos and orientation
  r0 ??= .L3Seg.L2L3JntNode.sRel*.L3Seg.Axes0'+.L3Seg.r0-L2L3JntNode.sRel*Axes0';
}; // End of L2Seg

TrunkSegmentBase L1Seg(
  DATA = ..Data.unscaled,
  CRANIAL_NEIGHBOUR = T12,
  LEVEL = L1,
  CAUDAL_NEIGHBOUR = L2,
  _VOLUMETRIC_CAVITY = BM_TRUNK_CAVITY_MODEL,
  PelvisSeg=..PelvisSeg
  ) = {
  //initial position found as a function of pelvis pos and orientation
  r0 ??= .L2Seg.L1L2JntNode.sRel*.L2Seg.Axes0'+.L2Seg.r0-L1L2JntNode.sRel*Axes0';
}; // End of L1Seg
