/**^
This folder implements the simple muscle models for the trunk model.
Anatomical muscles are in many cases split into
several branches (elements). Strength parameters are split between the branches,
typically by uniform split.
*/

AnyFolder DefaultMusPar = {
  AnyVar PCSAfactor ??= ....StrengthParameters.SpecificMuscleTensionSpine; // = PCSAfactor in N/cm^2 , the PCSA itself is given in cm^2 so F0 is in Newton`s.
};

AnyVar StrengthScaleSpine = ...Scaling.StrengthScaling.Spine.StrengthScale;


AnyFolder Spinalis = {

    #if BM_TRUNK_MUSCLES
    AnyMuscleModel SPL1T2 = {
        AnyFolder& MuscleParameters = ...Data.unscaled.ModelParameters.Muscles.Spinalis.SPL1T2;
        AnyIntVar MuscleElemNo = 1; ///< The number of this element of the muscle
        AnyIntVar MuscleElemAmount = MuscleParameters.MuscleElemAmount; ///< The total amount of elements for this muscle
        F0 ??= ..DefaultMusPar.PCSAfactor*PCSA; ///< Maximum force output at optimum fiber length
        Lf0 ??= MuscleParameters.OptimalFiberlength / cos(pi/180*MuscleParameters.Pennationangle); //< Optimal fiber length corrected by pennation angle
        AnyVar PCSA ??= 1e4*..StrengthScaleSpine*MuscleParameters.MuscleVolumeSIScaled/(Lf0); ///< PCSA (cm2) of the individual element is total volumen divided by the sum of muscle element fiber lengths.
        Vol0 = (1e-4*PCSA) * Lf0; // New calculation of the vol for the specific muscle branch
    };
    #endif

    #if BM_TRUNK_MUSCLES
    AnyMuscleModel SPL1T3 = {
        AnyFolder& MuscleParameters = ...Data.unscaled.ModelParameters.Muscles.Spinalis.SPL1T3;
        AnyIntVar MuscleElemNo = 1; ///< The number of this element of the muscle
        AnyIntVar MuscleElemAmount = MuscleParameters.MuscleElemAmount; ///< The total amount of elements for this muscle
        F0 ??= ..DefaultMusPar.PCSAfactor*PCSA; ///< Maximum force output at optimum fiber length
        Lf0 ??= MuscleParameters.OptimalFiberlength / cos(pi/180*MuscleParameters.Pennationangle); //< Optimal fiber length corrected by pennation angle
        AnyVar PCSA ??= 1e4*..StrengthScaleSpine*MuscleParameters.MuscleVolumeSIScaled/(Lf0); ///< PCSA (cm2) of the individual element is total volumen divided by the sum of muscle element fiber lengths.
        Vol0 = (1e-4*PCSA) * Lf0; // New calculation of the vol for the specific muscle branch
    };
    #endif

    #if BM_TRUNK_MUSCLES
    AnyMuscleModel SPL2T1 = {
        AnyFolder& MuscleParameters = ...Data.unscaled.ModelParameters.Muscles.Spinalis.SPL2T1;
        AnyIntVar MuscleElemNo = 1; ///< The number of this element of the muscle
        AnyIntVar MuscleElemAmount = MuscleParameters.MuscleElemAmount; ///< The total amount of elements for this muscle
        F0 ??= ..DefaultMusPar.PCSAfactor*PCSA; ///< Maximum force output at optimum fiber length
        Lf0 ??= MuscleParameters.OptimalFiberlength / cos(pi/180*MuscleParameters.Pennationangle); //< Optimal fiber length corrected by pennation angle
        AnyVar PCSA ??= 1e4*..StrengthScaleSpine*MuscleParameters.MuscleVolumeSIScaled/(Lf0); ///< PCSA (cm2) of the individual element is total volumen divided by the sum of muscle element fiber lengths.
        Vol0 = (1e-4*PCSA) * Lf0; // New calculation of the vol for the specific muscle branch
    };
    #endif

    #if BM_TRUNK_MUSCLES
    AnyMuscleModel SPT11T6 = {
        AnyFolder& MuscleParameters = ...Data.unscaled.ModelParameters.Muscles.Spinalis.SPT11T6;
        AnyIntVar MuscleElemNo = 1; ///< The number of this element of the muscle
        AnyIntVar MuscleElemAmount = MuscleParameters.MuscleElemAmount; ///< The total amount of elements for this muscle
        F0 ??= ..DefaultMusPar.PCSAfactor*PCSA; ///< Maximum force output at optimum fiber length
        Lf0 ??= MuscleParameters.OptimalFiberlength / cos(pi/180*MuscleParameters.Pennationangle); //< Optimal fiber length corrected by pennation angle
        AnyVar PCSA ??= 1e4*..StrengthScaleSpine*MuscleParameters.MuscleVolumeSIScaled/(Lf0); ///< PCSA (cm2) of the individual element is total volumen divided by the sum of muscle element fiber lengths.
        Vol0 = (1e-4*PCSA) * Lf0; // New calculation of the vol for the specific muscle branch
    };
    #endif

    #if BM_TRUNK_MUSCLES
    AnyMuscleModel SPT12T4 = {
        AnyFolder& MuscleParameters = ...Data.unscaled.ModelParameters.Muscles.Spinalis.SPT12T4;
        AnyIntVar MuscleElemNo = 1; ///< The number of this element of the muscle
        AnyIntVar MuscleElemAmount = MuscleParameters.MuscleElemAmount; ///< The total amount of elements for this muscle
        F0 ??= ..DefaultMusPar.PCSAfactor*PCSA; ///< Maximum force output at optimum fiber length
        Lf0 ??= MuscleParameters.OptimalFiberlength / cos(pi/180*MuscleParameters.Pennationangle); //< Optimal fiber length corrected by pennation angle
        AnyVar PCSA ??= 1e4*..StrengthScaleSpine*MuscleParameters.MuscleVolumeSIScaled/(Lf0); ///< PCSA (cm2) of the individual element is total volumen divided by the sum of muscle element fiber lengths.
        Vol0 = (1e-4*PCSA) * Lf0; // New calculation of the vol for the specific muscle branch
    };
    #endif

    #if BM_TRUNK_MUSCLES
    AnyMuscleModel SPT12T5 = {
        AnyFolder& MuscleParameters = ...Data.unscaled.ModelParameters.Muscles.Spinalis.SPT12T5;
        AnyIntVar MuscleElemNo = 1; ///< The number of this element of the muscle
        AnyIntVar MuscleElemAmount = MuscleParameters.MuscleElemAmount; ///< The total amount of elements for this muscle
        F0 ??= ..DefaultMusPar.PCSAfactor*PCSA; ///< Maximum force output at optimum fiber length
        Lf0 ??= MuscleParameters.OptimalFiberlength / cos(pi/180*MuscleParameters.Pennationangle); //< Optimal fiber length corrected by pennation angle
        AnyVar PCSA ??= 1e4*..StrengthScaleSpine*MuscleParameters.MuscleVolumeSIScaled/(Lf0); ///< PCSA (cm2) of the individual element is total volumen divided by the sum of muscle element fiber lengths.
        Vol0 = (1e-4*PCSA) * Lf0; // New calculation of the vol for the specific muscle branch
    };
    #endif

};

AnyFolder TransversusSingle = {

    #if BM_TRUNK_MUSCLES & BM_TRUNK_CAVITY_MODEL == _CAVITY_MODEL_BUCKLE_
    AnyMuscleModel Transversus_1 = {
        AnyFolder& MuscleParameters = ...Data.unscaled.ModelParameters.Muscles.TransversusSingle.Transversus_1;
        AnyIntVar MuscleElemNo = 1; ///< The number of this element of the muscle
        AnyIntVar MuscleElemAmount = MuscleParameters.MuscleElemAmount; ///< The total amount of elements for this muscle
        F0 ??= ..DefaultMusPar.PCSAfactor*PCSA; ///< Maximum force output at optimum fiber length
        Lf0 ??= MuscleParameters.OptimalFiberlength / cos(pi/180*MuscleParameters.Pennationangle); //< Optimal fiber length corrected by pennation angle
        AnyVar PCSA ??= 1e4*..StrengthScaleSpine*MuscleParameters.MuscleVolumeSIScaled/(Lf0); ///< PCSA (cm2) of the individual element is total volumen divided by the sum of muscle element fiber lengths.
        Vol0 = (1e-4*PCSA) * Lf0; // New calculation of the vol for the specific muscle branch
    };
    #endif

    #if BM_TRUNK_MUSCLES & BM_TRUNK_CAVITY_MODEL == _CAVITY_MODEL_BUCKLE_
    AnyMuscleModel Transversus_2 = {
        AnyFolder& MuscleParameters = ...Data.unscaled.ModelParameters.Muscles.TransversusSingle.Transversus_2;
        AnyIntVar MuscleElemNo = 1; ///< The number of this element of the muscle
        AnyIntVar MuscleElemAmount = MuscleParameters.MuscleElemAmount; ///< The total amount of elements for this muscle
        F0 ??= ..DefaultMusPar.PCSAfactor*PCSA; ///< Maximum force output at optimum fiber length
        Lf0 ??= MuscleParameters.OptimalFiberlength / cos(pi/180*MuscleParameters.Pennationangle); //< Optimal fiber length corrected by pennation angle
        AnyVar PCSA ??= 1e4*..StrengthScaleSpine*MuscleParameters.MuscleVolumeSIScaled/(Lf0); ///< PCSA (cm2) of the individual element is total volumen divided by the sum of muscle element fiber lengths.
        Vol0 = (1e-4*PCSA) * Lf0; // New calculation of the vol for the specific muscle branch
    };
    #endif

    #if BM_TRUNK_MUSCLES & BM_TRUNK_CAVITY_MODEL == _CAVITY_MODEL_BUCKLE_
    AnyMuscleModel Transversus_3 = {
        AnyFolder& MuscleParameters = ...Data.unscaled.ModelParameters.Muscles.TransversusSingle.Transversus_3;
        AnyIntVar MuscleElemNo = 1; ///< The number of this element of the muscle
        AnyIntVar MuscleElemAmount = MuscleParameters.MuscleElemAmount; ///< The total amount of elements for this muscle
        F0 ??= ..DefaultMusPar.PCSAfactor*PCSA; ///< Maximum force output at optimum fiber length
        Lf0 ??= MuscleParameters.OptimalFiberlength / cos(pi/180*MuscleParameters.Pennationangle); //< Optimal fiber length corrected by pennation angle
        AnyVar PCSA ??= 1e4*..StrengthScaleSpine*MuscleParameters.MuscleVolumeSIScaled/(Lf0); ///< PCSA (cm2) of the individual element is total volumen divided by the sum of muscle element fiber lengths.
        Vol0 = (1e-4*PCSA) * Lf0; // New calculation of the vol for the specific muscle branch
    };
    #endif

    #if BM_TRUNK_MUSCLES & BM_TRUNK_CAVITY_MODEL == _CAVITY_MODEL_BUCKLE_
    AnyMuscleModel Transversus_4 = {
        AnyFolder& MuscleParameters = ...Data.unscaled.ModelParameters.Muscles.TransversusSingle.Transversus_4;
        AnyIntVar MuscleElemNo = 1; ///< The number of this element of the muscle
        AnyIntVar MuscleElemAmount = MuscleParameters.MuscleElemAmount; ///< The total amount of elements for this muscle
        F0 ??= ..DefaultMusPar.PCSAfactor*PCSA; ///< Maximum force output at optimum fiber length
        Lf0 ??= MuscleParameters.OptimalFiberlength / cos(pi/180*MuscleParameters.Pennationangle); //< Optimal fiber length corrected by pennation angle
        AnyVar PCSA ??= 1e4*..StrengthScaleSpine*MuscleParameters.MuscleVolumeSIScaled/(Lf0); ///< PCSA (cm2) of the individual element is total volumen divided by the sum of muscle element fiber lengths.
        Vol0 = (1e-4*PCSA) * Lf0; // New calculation of the vol for the specific muscle branch
    };
    #endif

    #if BM_TRUNK_MUSCLES & BM_TRUNK_CAVITY_MODEL == _CAVITY_MODEL_BUCKLE_
    AnyMuscleModel Transversus_5 = {
        AnyFolder& MuscleParameters = ...Data.unscaled.ModelParameters.Muscles.TransversusSingle.Transversus_5;
        AnyIntVar MuscleElemNo = 1; ///< The number of this element of the muscle
        AnyIntVar MuscleElemAmount = MuscleParameters.MuscleElemAmount; ///< The total amount of elements for this muscle
        F0 ??= ..DefaultMusPar.PCSAfactor*PCSA; ///< Maximum force output at optimum fiber length
        Lf0 ??= MuscleParameters.OptimalFiberlength / cos(pi/180*MuscleParameters.Pennationangle); //< Optimal fiber length corrected by pennation angle
        AnyVar PCSA ??= 1e4*..StrengthScaleSpine*MuscleParameters.MuscleVolumeSIScaled/(Lf0); ///< PCSA (cm2) of the individual element is total volumen divided by the sum of muscle element fiber lengths.
        Vol0 = (1e-4*PCSA) * Lf0; // New calculation of the vol for the specific muscle branch
    };
    #endif

};

AnyFolder Left = {

    AnyFolder Diaphragm = {

        #if BM_TRUNK_MUSCLES & BM_TRUNK_CAVITY_MODEL == _CAVITY_MODEL_VOLUME_
        AnyMuscleModel L1_Diaphragm1 = {
            AnyFolder& MuscleParameters = ....Data.unscaled.ModelParameters.Muscles.Diaphragm.L1_Diaphragm1;
            AnyIntVar MuscleElemNo = 1; ///< The number of this element of the muscle
            AnyIntVar MuscleElemAmount = MuscleParameters.MuscleElemAmount; ///< The total amount of elements for this muscle
            F0 ??= ...DefaultMusPar.PCSAfactor*PCSA; ///< Maximum force output at optimum fiber length
            Lf0 ??= MuscleParameters.OptimalFiberlength / cos(pi/180*MuscleParameters.Pennationangle); //< Optimal fiber length corrected by pennation angle
            AnyVar PCSA ??= 1e4*...StrengthScaleSpine*MuscleParameters.MuscleVolumeSIScaled/(Lf0); ///< PCSA (cm2) of the individual element is total volumen divided by the sum of muscle element fiber lengths.
            Vol0 = (1e-4*PCSA) * Lf0; // New calculation of the vol for the specific muscle branch
        };
        #endif

        #if BM_TRUNK_MUSCLES & BM_TRUNK_CAVITY_MODEL == _CAVITY_MODEL_VOLUME_
        AnyMuscleModel L1_Diaphragm2 = {
            AnyFolder& MuscleParameters = ....Data.unscaled.ModelParameters.Muscles.Diaphragm.L1_Diaphragm2;
            AnyIntVar MuscleElemNo = 1; ///< The number of this element of the muscle
            AnyIntVar MuscleElemAmount = MuscleParameters.MuscleElemAmount; ///< The total amount of elements for this muscle
            F0 ??= ...DefaultMusPar.PCSAfactor*PCSA; ///< Maximum force output at optimum fiber length
            Lf0 ??= MuscleParameters.OptimalFiberlength / cos(pi/180*MuscleParameters.Pennationangle); //< Optimal fiber length corrected by pennation angle
            AnyVar PCSA ??= 1e4*...StrengthScaleSpine*MuscleParameters.MuscleVolumeSIScaled/(Lf0); ///< PCSA (cm2) of the individual element is total volumen divided by the sum of muscle element fiber lengths.
            Vol0 = (1e-4*PCSA) * Lf0; // New calculation of the vol for the specific muscle branch
        };
        #endif

        #if BM_TRUNK_MUSCLES & BM_TRUNK_CAVITY_MODEL == _CAVITY_MODEL_VOLUME_
        AnyMuscleModel L2_Diaphragm1 = {
            AnyFolder& MuscleParameters = ....Data.unscaled.ModelParameters.Muscles.Diaphragm.L2_Diaphragm1;
            AnyIntVar MuscleElemNo = 1; ///< The number of this element of the muscle
            AnyIntVar MuscleElemAmount = MuscleParameters.MuscleElemAmount; ///< The total amount of elements for this muscle
            F0 ??= ...DefaultMusPar.PCSAfactor*PCSA; ///< Maximum force output at optimum fiber length
            Lf0 ??= MuscleParameters.OptimalFiberlength / cos(pi/180*MuscleParameters.Pennationangle); //< Optimal fiber length corrected by pennation angle
            AnyVar PCSA ??= 1e4*...StrengthScaleSpine*MuscleParameters.MuscleVolumeSIScaled/(Lf0); ///< PCSA (cm2) of the individual element is total volumen divided by the sum of muscle element fiber lengths.
            Vol0 = (1e-4*PCSA) * Lf0; // New calculation of the vol for the specific muscle branch
        };
        #endif

        #if BM_TRUNK_MUSCLES & BM_TRUNK_CAVITY_MODEL == _CAVITY_MODEL_VOLUME_
        AnyMuscleModel L2_Diaphragm2 = {
            AnyFolder& MuscleParameters = ....Data.unscaled.ModelParameters.Muscles.Diaphragm.L2_Diaphragm2;
            AnyIntVar MuscleElemNo = 1; ///< The number of this element of the muscle
            AnyIntVar MuscleElemAmount = MuscleParameters.MuscleElemAmount; ///< The total amount of elements for this muscle
            F0 ??= ...DefaultMusPar.PCSAfactor*PCSA; ///< Maximum force output at optimum fiber length
            Lf0 ??= MuscleParameters.OptimalFiberlength / cos(pi/180*MuscleParameters.Pennationangle); //< Optimal fiber length corrected by pennation angle
            AnyVar PCSA ??= 1e4*...StrengthScaleSpine*MuscleParameters.MuscleVolumeSIScaled/(Lf0); ///< PCSA (cm2) of the individual element is total volumen divided by the sum of muscle element fiber lengths.
            Vol0 = (1e-4*PCSA) * Lf0; // New calculation of the vol for the specific muscle branch
        };
        #endif

        #if BM_TRUNK_MUSCLES & BM_TRUNK_CAVITY_MODEL == _CAVITY_MODEL_VOLUME_
        AnyMuscleModel L1TransverseProcess_Diaphragm = {
            AnyFolder& MuscleParameters = ....Data.unscaled.ModelParameters.Muscles.Diaphragm.L1TransverseProcess_Diaphragm;
            AnyIntVar MuscleElemNo = 1; ///< The number of this element of the muscle
            AnyIntVar MuscleElemAmount = MuscleParameters.MuscleElemAmount; ///< The total amount of elements for this muscle
            F0 ??= ...DefaultMusPar.PCSAfactor*PCSA; ///< Maximum force output at optimum fiber length
            Lf0 ??= MuscleParameters.OptimalFiberlength / cos(pi/180*MuscleParameters.Pennationangle); //< Optimal fiber length corrected by pennation angle
            AnyVar PCSA ??= 1e4*...StrengthScaleSpine*MuscleParameters.MuscleVolumeSIScaled/(Lf0); ///< PCSA (cm2) of the individual element is total volumen divided by the sum of muscle element fiber lengths.
            Vol0 = (1e-4*PCSA) * Lf0; // New calculation of the vol for the specific muscle branch
        };
        #endif

        #if BM_TRUNK_MUSCLES & BM_TRUNK_CAVITY_MODEL == _CAVITY_MODEL_VOLUME_
        AnyMuscleModel R12_Diaphragm1 = {
            AnyFolder& MuscleParameters = ....Data.unscaled.ModelParameters.Muscles.Diaphragm.R12_Diaphragm1;
            AnyIntVar MuscleElemNo = 1; ///< The number of this element of the muscle
            AnyIntVar MuscleElemAmount = MuscleParameters.MuscleElemAmount; ///< The total amount of elements for this muscle
            F0 ??= ...DefaultMusPar.PCSAfactor*PCSA; ///< Maximum force output at optimum fiber length
            Lf0 ??= MuscleParameters.OptimalFiberlength / cos(pi/180*MuscleParameters.Pennationangle); //< Optimal fiber length corrected by pennation angle
            AnyVar PCSA ??= 1e4*...StrengthScaleSpine*MuscleParameters.MuscleVolumeSIScaled/(Lf0); ///< PCSA (cm2) of the individual element is total volumen divided by the sum of muscle element fiber lengths.
            Vol0 = (1e-4*PCSA) * Lf0; // New calculation of the vol for the specific muscle branch
        };
        #endif

        #if BM_TRUNK_MUSCLES & BM_TRUNK_CAVITY_MODEL == _CAVITY_MODEL_VOLUME_
        AnyMuscleModel R12_Diaphragm2 = {
            AnyFolder& MuscleParameters = ....Data.unscaled.ModelParameters.Muscles.Diaphragm.R12_Diaphragm2;
            AnyIntVar MuscleElemNo = 1; ///< The number of this element of the muscle
            AnyIntVar MuscleElemAmount = MuscleParameters.MuscleElemAmount; ///< The total amount of elements for this muscle
            F0 ??= ...DefaultMusPar.PCSAfactor*PCSA; ///< Maximum force output at optimum fiber length
            Lf0 ??= MuscleParameters.OptimalFiberlength / cos(pi/180*MuscleParameters.Pennationangle); //< Optimal fiber length corrected by pennation angle
            AnyVar PCSA ??= 1e4*...StrengthScaleSpine*MuscleParameters.MuscleVolumeSIScaled/(Lf0); ///< PCSA (cm2) of the individual element is total volumen divided by the sum of muscle element fiber lengths.
            Vol0 = (1e-4*PCSA) * Lf0; // New calculation of the vol for the specific muscle branch
        };
        #endif

        #if BM_TRUNK_MUSCLES & BM_TRUNK_CAVITY_MODEL == _CAVITY_MODEL_VOLUME_
        AnyMuscleModel R11_Diaphragm1 = {
            AnyFolder& MuscleParameters = ....Data.unscaled.ModelParameters.Muscles.Diaphragm.R11_Diaphragm1;
            AnyIntVar MuscleElemNo = 1; ///< The number of this element of the muscle
            AnyIntVar MuscleElemAmount = MuscleParameters.MuscleElemAmount; ///< The total amount of elements for this muscle
            F0 ??= ...DefaultMusPar.PCSAfactor*PCSA; ///< Maximum force output at optimum fiber length
            Lf0 ??= MuscleParameters.OptimalFiberlength / cos(pi/180*MuscleParameters.Pennationangle); //< Optimal fiber length corrected by pennation angle
            AnyVar PCSA ??= 1e4*...StrengthScaleSpine*MuscleParameters.MuscleVolumeSIScaled/(Lf0); ///< PCSA (cm2) of the individual element is total volumen divided by the sum of muscle element fiber lengths.
            Vol0 = (1e-4*PCSA) * Lf0; // New calculation of the vol for the specific muscle branch
        };
        #endif

        #if BM_TRUNK_MUSCLES & BM_TRUNK_CAVITY_MODEL == _CAVITY_MODEL_VOLUME_
        AnyMuscleModel R11_Diaphragm2 = {
            AnyFolder& MuscleParameters = ....Data.unscaled.ModelParameters.Muscles.Diaphragm.R11_Diaphragm2;
            AnyIntVar MuscleElemNo = 1; ///< The number of this element of the muscle
            AnyIntVar MuscleElemAmount = MuscleParameters.MuscleElemAmount; ///< The total amount of elements for this muscle
            F0 ??= ...DefaultMusPar.PCSAfactor*PCSA; ///< Maximum force output at optimum fiber length
            Lf0 ??= MuscleParameters.OptimalFiberlength / cos(pi/180*MuscleParameters.Pennationangle); //< Optimal fiber length corrected by pennation angle
            AnyVar PCSA ??= 1e4*...StrengthScaleSpine*MuscleParameters.MuscleVolumeSIScaled/(Lf0); ///< PCSA (cm2) of the individual element is total volumen divided by the sum of muscle element fiber lengths.
            Vol0 = (1e-4*PCSA) * Lf0; // New calculation of the vol for the specific muscle branch
        };
        #endif

        #if BM_TRUNK_MUSCLES & BM_TRUNK_CAVITY_MODEL == _CAVITY_MODEL_VOLUME_
        AnyMuscleModel R11_Diaphragm3 = {
            AnyFolder& MuscleParameters = ....Data.unscaled.ModelParameters.Muscles.Diaphragm.R11_Diaphragm3;
            AnyIntVar MuscleElemNo = 1; ///< The number of this element of the muscle
            AnyIntVar MuscleElemAmount = MuscleParameters.MuscleElemAmount; ///< The total amount of elements for this muscle
            F0 ??= ...DefaultMusPar.PCSAfactor*PCSA; ///< Maximum force output at optimum fiber length
            Lf0 ??= MuscleParameters.OptimalFiberlength / cos(pi/180*MuscleParameters.Pennationangle); //< Optimal fiber length corrected by pennation angle
            AnyVar PCSA ??= 1e4*...StrengthScaleSpine*MuscleParameters.MuscleVolumeSIScaled/(Lf0); ///< PCSA (cm2) of the individual element is total volumen divided by the sum of muscle element fiber lengths.
            Vol0 = (1e-4*PCSA) * Lf0; // New calculation of the vol for the specific muscle branch
        };
        #endif

        #if BM_TRUNK_MUSCLES & BM_TRUNK_CAVITY_MODEL == _CAVITY_MODEL_VOLUME_
        AnyMuscleModel R10_Diaphragm1 = {
            AnyFolder& MuscleParameters = ....Data.unscaled.ModelParameters.Muscles.Diaphragm.R10_Diaphragm1;
            AnyIntVar MuscleElemNo = 1; ///< The number of this element of the muscle
            AnyIntVar MuscleElemAmount = MuscleParameters.MuscleElemAmount; ///< The total amount of elements for this muscle
            F0 ??= ...DefaultMusPar.PCSAfactor*PCSA; ///< Maximum force output at optimum fiber length
            Lf0 ??= MuscleParameters.OptimalFiberlength / cos(pi/180*MuscleParameters.Pennationangle); //< Optimal fiber length corrected by pennation angle
            AnyVar PCSA ??= 1e4*...StrengthScaleSpine*MuscleParameters.MuscleVolumeSIScaled/(Lf0); ///< PCSA (cm2) of the individual element is total volumen divided by the sum of muscle element fiber lengths.
            Vol0 = (1e-4*PCSA) * Lf0; // New calculation of the vol for the specific muscle branch
        };
        #endif

        #if BM_TRUNK_MUSCLES & BM_TRUNK_CAVITY_MODEL == _CAVITY_MODEL_VOLUME_
        AnyMuscleModel R10_Diaphragm2 = {
            AnyFolder& MuscleParameters = ....Data.unscaled.ModelParameters.Muscles.Diaphragm.R10_Diaphragm2;
            AnyIntVar MuscleElemNo = 1; ///< The number of this element of the muscle
            AnyIntVar MuscleElemAmount = MuscleParameters.MuscleElemAmount; ///< The total amount of elements for this muscle
            F0 ??= ...DefaultMusPar.PCSAfactor*PCSA; ///< Maximum force output at optimum fiber length
            Lf0 ??= MuscleParameters.OptimalFiberlength / cos(pi/180*MuscleParameters.Pennationangle); //< Optimal fiber length corrected by pennation angle
            AnyVar PCSA ??= 1e4*...StrengthScaleSpine*MuscleParameters.MuscleVolumeSIScaled/(Lf0); ///< PCSA (cm2) of the individual element is total volumen divided by the sum of muscle element fiber lengths.
            Vol0 = (1e-4*PCSA) * Lf0; // New calculation of the vol for the specific muscle branch
        };
        #endif

        #if BM_TRUNK_MUSCLES & BM_TRUNK_CAVITY_MODEL == _CAVITY_MODEL_VOLUME_
        AnyMuscleModel R10_Diaphragm3 = {
            AnyFolder& MuscleParameters = ....Data.unscaled.ModelParameters.Muscles.Diaphragm.R10_Diaphragm3;
            AnyIntVar MuscleElemNo = 1; ///< The number of this element of the muscle
            AnyIntVar MuscleElemAmount = MuscleParameters.MuscleElemAmount; ///< The total amount of elements for this muscle
            F0 ??= ...DefaultMusPar.PCSAfactor*PCSA; ///< Maximum force output at optimum fiber length
            Lf0 ??= MuscleParameters.OptimalFiberlength / cos(pi/180*MuscleParameters.Pennationangle); //< Optimal fiber length corrected by pennation angle
            AnyVar PCSA ??= 1e4*...StrengthScaleSpine*MuscleParameters.MuscleVolumeSIScaled/(Lf0); ///< PCSA (cm2) of the individual element is total volumen divided by the sum of muscle element fiber lengths.
            Vol0 = (1e-4*PCSA) * Lf0; // New calculation of the vol for the specific muscle branch
        };
        #endif

        #if BM_TRUNK_MUSCLES & BM_TRUNK_CAVITY_MODEL == _CAVITY_MODEL_VOLUME_
        AnyMuscleModel CC_DiaphragmNode1 = {
            AnyFolder& MuscleParameters = ....Data.unscaled.ModelParameters.Muscles.Diaphragm.CC_DiaphragmNode1;
            AnyIntVar MuscleElemNo = 1; ///< The number of this element of the muscle
            AnyIntVar MuscleElemAmount = MuscleParameters.MuscleElemAmount; ///< The total amount of elements for this muscle
            F0 ??= ...DefaultMusPar.PCSAfactor*PCSA; ///< Maximum force output at optimum fiber length
            Lf0 ??= MuscleParameters.OptimalFiberlength / cos(pi/180*MuscleParameters.Pennationangle); //< Optimal fiber length corrected by pennation angle
            AnyVar PCSA ??= 1e4*...StrengthScaleSpine*MuscleParameters.MuscleVolumeSIScaled/(Lf0); ///< PCSA (cm2) of the individual element is total volumen divided by the sum of muscle element fiber lengths.
            Vol0 = (1e-4*PCSA) * Lf0; // New calculation of the vol for the specific muscle branch
        };
        #endif

        #if BM_TRUNK_MUSCLES & BM_TRUNK_CAVITY_MODEL == _CAVITY_MODEL_VOLUME_
        AnyMuscleModel CC_DiaphragmNode2 = {
            AnyFolder& MuscleParameters = ....Data.unscaled.ModelParameters.Muscles.Diaphragm.CC_DiaphragmNode2;
            AnyIntVar MuscleElemNo = 1; ///< The number of this element of the muscle
            AnyIntVar MuscleElemAmount = MuscleParameters.MuscleElemAmount; ///< The total amount of elements for this muscle
            F0 ??= ...DefaultMusPar.PCSAfactor*PCSA; ///< Maximum force output at optimum fiber length
            Lf0 ??= MuscleParameters.OptimalFiberlength / cos(pi/180*MuscleParameters.Pennationangle); //< Optimal fiber length corrected by pennation angle
            AnyVar PCSA ??= 1e4*...StrengthScaleSpine*MuscleParameters.MuscleVolumeSIScaled/(Lf0); ///< PCSA (cm2) of the individual element is total volumen divided by the sum of muscle element fiber lengths.
            Vol0 = (1e-4*PCSA) * Lf0; // New calculation of the vol for the specific muscle branch
        };
        #endif

        #if BM_TRUNK_MUSCLES & BM_TRUNK_CAVITY_MODEL == _CAVITY_MODEL_VOLUME_
        AnyMuscleModel CC_DiaphragmNode3 = {
            AnyFolder& MuscleParameters = ....Data.unscaled.ModelParameters.Muscles.Diaphragm.CC_DiaphragmNode3;
            AnyIntVar MuscleElemNo = 1; ///< The number of this element of the muscle
            AnyIntVar MuscleElemAmount = MuscleParameters.MuscleElemAmount; ///< The total amount of elements for this muscle
            F0 ??= ...DefaultMusPar.PCSAfactor*PCSA; ///< Maximum force output at optimum fiber length
            Lf0 ??= MuscleParameters.OptimalFiberlength / cos(pi/180*MuscleParameters.Pennationangle); //< Optimal fiber length corrected by pennation angle
            AnyVar PCSA ??= 1e4*...StrengthScaleSpine*MuscleParameters.MuscleVolumeSIScaled/(Lf0); ///< PCSA (cm2) of the individual element is total volumen divided by the sum of muscle element fiber lengths.
            Vol0 = (1e-4*PCSA) * Lf0; // New calculation of the vol for the specific muscle branch
        };
        #endif

        #if BM_TRUNK_MUSCLES & BM_TRUNK_CAVITY_MODEL == _CAVITY_MODEL_VOLUME_
        AnyMuscleModel CC_DiaphragmNode4 = {
            AnyFolder& MuscleParameters = ....Data.unscaled.ModelParameters.Muscles.Diaphragm.CC_DiaphragmNode4;
            AnyIntVar MuscleElemNo = 1; ///< The number of this element of the muscle
            AnyIntVar MuscleElemAmount = MuscleParameters.MuscleElemAmount; ///< The total amount of elements for this muscle
            F0 ??= ...DefaultMusPar.PCSAfactor*PCSA; ///< Maximum force output at optimum fiber length
            Lf0 ??= MuscleParameters.OptimalFiberlength / cos(pi/180*MuscleParameters.Pennationangle); //< Optimal fiber length corrected by pennation angle
            AnyVar PCSA ??= 1e4*...StrengthScaleSpine*MuscleParameters.MuscleVolumeSIScaled/(Lf0); ///< PCSA (cm2) of the individual element is total volumen divided by the sum of muscle element fiber lengths.
            Vol0 = (1e-4*PCSA) * Lf0; // New calculation of the vol for the specific muscle branch
        };
        #endif

        #if BM_TRUNK_MUSCLES & BM_TRUNK_CAVITY_MODEL == _CAVITY_MODEL_VOLUME_
        AnyMuscleModel CC_DiaphragmNode5 = {
            AnyFolder& MuscleParameters = ....Data.unscaled.ModelParameters.Muscles.Diaphragm.CC_DiaphragmNode5;
            AnyIntVar MuscleElemNo = 1; ///< The number of this element of the muscle
            AnyIntVar MuscleElemAmount = MuscleParameters.MuscleElemAmount; ///< The total amount of elements for this muscle
            F0 ??= ...DefaultMusPar.PCSAfactor*PCSA; ///< Maximum force output at optimum fiber length
            Lf0 ??= MuscleParameters.OptimalFiberlength / cos(pi/180*MuscleParameters.Pennationangle); //< Optimal fiber length corrected by pennation angle
            AnyVar PCSA ??= 1e4*...StrengthScaleSpine*MuscleParameters.MuscleVolumeSIScaled/(Lf0); ///< PCSA (cm2) of the individual element is total volumen divided by the sum of muscle element fiber lengths.
            Vol0 = (1e-4*PCSA) * Lf0; // New calculation of the vol for the specific muscle branch
        };
        #endif

        #if BM_TRUNK_MUSCLES & BM_TRUNK_CAVITY_MODEL == _CAVITY_MODEL_VOLUME_
        AnyMuscleModel CC_DiaphragmNode6 = {
            AnyFolder& MuscleParameters = ....Data.unscaled.ModelParameters.Muscles.Diaphragm.CC_DiaphragmNode6;
            AnyIntVar MuscleElemNo = 1; ///< The number of this element of the muscle
            AnyIntVar MuscleElemAmount = MuscleParameters.MuscleElemAmount; ///< The total amount of elements for this muscle
            F0 ??= ...DefaultMusPar.PCSAfactor*PCSA; ///< Maximum force output at optimum fiber length
            Lf0 ??= MuscleParameters.OptimalFiberlength / cos(pi/180*MuscleParameters.Pennationangle); //< Optimal fiber length corrected by pennation angle
            AnyVar PCSA ??= 1e4*...StrengthScaleSpine*MuscleParameters.MuscleVolumeSIScaled/(Lf0); ///< PCSA (cm2) of the individual element is total volumen divided by the sum of muscle element fiber lengths.
            Vol0 = (1e-4*PCSA) * Lf0; // New calculation of the vol for the specific muscle branch
        };
        #endif

        #if BM_TRUNK_MUSCLES & BM_TRUNK_CAVITY_MODEL == _CAVITY_MODEL_VOLUME_
        AnyMuscleModel CC_DiaphragmNode7 = {
            AnyFolder& MuscleParameters = ....Data.unscaled.ModelParameters.Muscles.Diaphragm.CC_DiaphragmNode7;
            AnyIntVar MuscleElemNo = 1; ///< The number of this element of the muscle
            AnyIntVar MuscleElemAmount = MuscleParameters.MuscleElemAmount; ///< The total amount of elements for this muscle
            F0 ??= ...DefaultMusPar.PCSAfactor*PCSA; ///< Maximum force output at optimum fiber length
            Lf0 ??= MuscleParameters.OptimalFiberlength / cos(pi/180*MuscleParameters.Pennationangle); //< Optimal fiber length corrected by pennation angle
            AnyVar PCSA ??= 1e4*...StrengthScaleSpine*MuscleParameters.MuscleVolumeSIScaled/(Lf0); ///< PCSA (cm2) of the individual element is total volumen divided by the sum of muscle element fiber lengths.
            Vol0 = (1e-4*PCSA) * Lf0; // New calculation of the vol for the specific muscle branch
        };
        #endif

        #if BM_TRUNK_MUSCLES & BM_TRUNK_CAVITY_MODEL == _CAVITY_MODEL_VOLUME_
        AnyMuscleModel Xiphoid_Diaphragm = {
            AnyFolder& MuscleParameters = ....Data.unscaled.ModelParameters.Muscles.Diaphragm.Xiphoid_Diaphragm;
            AnyIntVar MuscleElemNo = 1; ///< The number of this element of the muscle
            AnyIntVar MuscleElemAmount = MuscleParameters.MuscleElemAmount; ///< The total amount of elements for this muscle
            F0 ??= ...DefaultMusPar.PCSAfactor*PCSA; ///< Maximum force output at optimum fiber length
            Lf0 ??= MuscleParameters.OptimalFiberlength / cos(pi/180*MuscleParameters.Pennationangle); //< Optimal fiber length corrected by pennation angle
            AnyVar PCSA ??= 1e4*...StrengthScaleSpine*MuscleParameters.MuscleVolumeSIScaled/(Lf0); ///< PCSA (cm2) of the individual element is total volumen divided by the sum of muscle element fiber lengths.
            Vol0 = (1e-4*PCSA) * Lf0; // New calculation of the vol for the specific muscle branch
        };
        #endif

    };

    AnyFolder Hyoid = {

        #if BM_TRUNK_MUSCLES
        AnyMuscleModel LumpedHyoidStC0 = {
            AnyFolder& MuscleParameters = ....Data.unscaled.ModelParameters.Muscles.Hyoid.LumpedHyoidStC0;
            AnyIntVar MuscleElemNo = 1; ///< The number of this element of the muscle
            AnyIntVar MuscleElemAmount = MuscleParameters.MuscleElemAmount; ///< The total amount of elements for this muscle
            F0 ??= ...DefaultMusPar.PCSAfactor*PCSA; ///< Maximum force output at optimum fiber length
            Lf0 ??= MuscleParameters.OptimalFiberlength / cos(pi/180*MuscleParameters.Pennationangle); //< Optimal fiber length corrected by pennation angle
            AnyVar PCSA ??= 1e4*...StrengthScaleSpine*MuscleParameters.MuscleVolumeSIScaled/(Lf0); ///< PCSA (cm2) of the individual element is total volumen divided by the sum of muscle element fiber lengths.
            Vol0 = (1e-4*PCSA) * Lf0; // New calculation of the vol for the specific muscle branch
        };
        #endif

    };

    AnyFolder IliocostalisCervicis = {

        #if BM_TRUNK_MUSCLES
        AnyMuscleModel ICptR3C4 = {
            AnyFolder& MuscleParameters = ....Data.unscaled.ModelParameters.Muscles.IliocostalisCervicis.ICptR3C4;
            AnyIntVar MuscleElemNo = 1; ///< The number of this element of the muscle
            AnyIntVar MuscleElemAmount = MuscleParameters.MuscleElemAmount; ///< The total amount of elements for this muscle
            F0 ??= ...DefaultMusPar.PCSAfactor*PCSA; ///< Maximum force output at optimum fiber length
            Lf0 ??= MuscleParameters.OptimalFiberlength / cos(pi/180*MuscleParameters.Pennationangle); //< Optimal fiber length corrected by pennation angle
            AnyVar PCSA ??= 1e4*...StrengthScaleSpine*MuscleParameters.MuscleVolumeSIScaled/(Lf0); ///< PCSA (cm2) of the individual element is total volumen divided by the sum of muscle element fiber lengths.
            Vol0 = (1e-4*PCSA) * Lf0; // New calculation of the vol for the specific muscle branch
        };
        #endif

        #if BM_TRUNK_MUSCLES
        AnyMuscleModel ICptR4C5 = {
            AnyFolder& MuscleParameters = ....Data.unscaled.ModelParameters.Muscles.IliocostalisCervicis.ICptR4C5;
            AnyIntVar MuscleElemNo = 1; ///< The number of this element of the muscle
            AnyIntVar MuscleElemAmount = MuscleParameters.MuscleElemAmount; ///< The total amount of elements for this muscle
            F0 ??= ...DefaultMusPar.PCSAfactor*PCSA; ///< Maximum force output at optimum fiber length
            Lf0 ??= MuscleParameters.OptimalFiberlength / cos(pi/180*MuscleParameters.Pennationangle); //< Optimal fiber length corrected by pennation angle
            AnyVar PCSA ??= 1e4*...StrengthScaleSpine*MuscleParameters.MuscleVolumeSIScaled/(Lf0); ///< PCSA (cm2) of the individual element is total volumen divided by the sum of muscle element fiber lengths.
            Vol0 = (1e-4*PCSA) * Lf0; // New calculation of the vol for the specific muscle branch
        };
        #endif

        #if BM_TRUNK_MUSCLES
        AnyMuscleModel ICptR5C6 = {
            AnyFolder& MuscleParameters = ....Data.unscaled.ModelParameters.Muscles.IliocostalisCervicis.ICptR5C6;
            AnyIntVar MuscleElemNo = 1; ///< The number of this element of the muscle
            AnyIntVar MuscleElemAmount = MuscleParameters.MuscleElemAmount; ///< The total amount of elements for this muscle
            F0 ??= ...DefaultMusPar.PCSAfactor*PCSA; ///< Maximum force output at optimum fiber length
            Lf0 ??= MuscleParameters.OptimalFiberlength / cos(pi/180*MuscleParameters.Pennationangle); //< Optimal fiber length corrected by pennation angle
            AnyVar PCSA ??= 1e4*...StrengthScaleSpine*MuscleParameters.MuscleVolumeSIScaled/(Lf0); ///< PCSA (cm2) of the individual element is total volumen divided by the sum of muscle element fiber lengths.
            Vol0 = (1e-4*PCSA) * Lf0; // New calculation of the vol for the specific muscle branch
        };
        #endif

        #if BM_TRUNK_MUSCLES
        AnyMuscleModel ICptR6C4 = {
            AnyFolder& MuscleParameters = ....Data.unscaled.ModelParameters.Muscles.IliocostalisCervicis.ICptR6C4;
            AnyIntVar MuscleElemNo = 1; ///< The number of this element of the muscle
            AnyIntVar MuscleElemAmount = MuscleParameters.MuscleElemAmount; ///< The total amount of elements for this muscle
            F0 ??= ...DefaultMusPar.PCSAfactor*PCSA; ///< Maximum force output at optimum fiber length
            Lf0 ??= MuscleParameters.OptimalFiberlength / cos(pi/180*MuscleParameters.Pennationangle); //< Optimal fiber length corrected by pennation angle
            AnyVar PCSA ??= 1e4*...StrengthScaleSpine*MuscleParameters.MuscleVolumeSIScaled/(Lf0); ///< PCSA (cm2) of the individual element is total volumen divided by the sum of muscle element fiber lengths.
            Vol0 = (1e-4*PCSA) * Lf0; // New calculation of the vol for the specific muscle branch
        };
        #endif

    };

    AnyFolder IliocostalisLumborum = {

        #if BM_TRUNK_MUSCLES
        AnyMuscleModel ILplL1CI = {
            AnyFolder& MuscleParameters = ....Data.unscaled.ModelParameters.Muscles.IliocostalisLumborum.ILplL1CI;
            AnyIntVar MuscleElemNo = 1; ///< The number of this element of the muscle
            AnyIntVar MuscleElemAmount = MuscleParameters.MuscleElemAmount; ///< The total amount of elements for this muscle
            F0 ??= ...DefaultMusPar.PCSAfactor*PCSA; ///< Maximum force output at optimum fiber length
            Lf0 ??= MuscleParameters.OptimalFiberlength / cos(pi/180*MuscleParameters.Pennationangle); //< Optimal fiber length corrected by pennation angle
            AnyVar PCSA ??= 1e4*...StrengthScaleSpine*MuscleParameters.MuscleVolumeSIScaled/(Lf0); ///< PCSA (cm2) of the individual element is total volumen divided by the sum of muscle element fiber lengths.
            Vol0 = (1e-4*PCSA) * Lf0; // New calculation of the vol for the specific muscle branch
        };
        #endif

        #if BM_TRUNK_MUSCLES
        AnyMuscleModel ILplL2CI = {
            AnyFolder& MuscleParameters = ....Data.unscaled.ModelParameters.Muscles.IliocostalisLumborum.ILplL2CI;
            AnyIntVar MuscleElemNo = 1; ///< The number of this element of the muscle
            AnyIntVar MuscleElemAmount = MuscleParameters.MuscleElemAmount; ///< The total amount of elements for this muscle
            F0 ??= ...DefaultMusPar.PCSAfactor*PCSA; ///< Maximum force output at optimum fiber length
            Lf0 ??= MuscleParameters.OptimalFiberlength / cos(pi/180*MuscleParameters.Pennationangle); //< Optimal fiber length corrected by pennation angle
            AnyVar PCSA ??= 1e4*...StrengthScaleSpine*MuscleParameters.MuscleVolumeSIScaled/(Lf0); ///< PCSA (cm2) of the individual element is total volumen divided by the sum of muscle element fiber lengths.
            Vol0 = (1e-4*PCSA) * Lf0; // New calculation of the vol for the specific muscle branch
        };
        #endif

        #if BM_TRUNK_MUSCLES
        AnyMuscleModel ILplL3CI = {
            AnyFolder& MuscleParameters = ....Data.unscaled.ModelParameters.Muscles.IliocostalisLumborum.ILplL3CI;
            AnyIntVar MuscleElemNo = 1; ///< The number of this element of the muscle
            AnyIntVar MuscleElemAmount = MuscleParameters.MuscleElemAmount; ///< The total amount of elements for this muscle
            F0 ??= ...DefaultMusPar.PCSAfactor*PCSA; ///< Maximum force output at optimum fiber length
            Lf0 ??= MuscleParameters.OptimalFiberlength / cos(pi/180*MuscleParameters.Pennationangle); //< Optimal fiber length corrected by pennation angle
            AnyVar PCSA ??= 1e4*...StrengthScaleSpine*MuscleParameters.MuscleVolumeSIScaled/(Lf0); ///< PCSA (cm2) of the individual element is total volumen divided by the sum of muscle element fiber lengths.
            Vol0 = (1e-4*PCSA) * Lf0; // New calculation of the vol for the specific muscle branch
        };
        #endif

        #if BM_TRUNK_MUSCLES
        AnyMuscleModel ILplL4CI = {
            AnyFolder& MuscleParameters = ....Data.unscaled.ModelParameters.Muscles.IliocostalisLumborum.ILplL4CI;
            AnyIntVar MuscleElemNo = 1; ///< The number of this element of the muscle
            AnyIntVar MuscleElemAmount = MuscleParameters.MuscleElemAmount; ///< The total amount of elements for this muscle
            F0 ??= ...DefaultMusPar.PCSAfactor*PCSA; ///< Maximum force output at optimum fiber length
            Lf0 ??= MuscleParameters.OptimalFiberlength / cos(pi/180*MuscleParameters.Pennationangle); //< Optimal fiber length corrected by pennation angle
            AnyVar PCSA ??= 1e4*...StrengthScaleSpine*MuscleParameters.MuscleVolumeSIScaled/(Lf0); ///< PCSA (cm2) of the individual element is total volumen divided by the sum of muscle element fiber lengths.
            Vol0 = (1e-4*PCSA) * Lf0; // New calculation of the vol for the specific muscle branch
        };
        #endif

        #if BM_TRUNK_MUSCLES
        AnyMuscleModel ILptC5SIPS = {
            AnyFolder& MuscleParameters = ....Data.unscaled.ModelParameters.Muscles.IliocostalisLumborum.ILptC5SIPS;
            AnyIntVar MuscleElemNo = 1; ///< The number of this element of the muscle
            AnyIntVar MuscleElemAmount = MuscleParameters.MuscleElemAmount; ///< The total amount of elements for this muscle
            F0 ??= ...DefaultMusPar.PCSAfactor*PCSA; ///< Maximum force output at optimum fiber length
            Lf0 ??= MuscleParameters.OptimalFiberlength / cos(pi/180*MuscleParameters.Pennationangle); //< Optimal fiber length corrected by pennation angle
            AnyVar PCSA ??= 1e4*...StrengthScaleSpine*MuscleParameters.MuscleVolumeSIScaled/(Lf0); ///< PCSA (cm2) of the individual element is total volumen divided by the sum of muscle element fiber lengths.
            Vol0 = (1e-4*PCSA) * Lf0; // New calculation of the vol for the specific muscle branch
        };
        #endif

        #if BM_TRUNK_MUSCLES
        AnyMuscleModel ILptC6SIPS = {
            AnyFolder& MuscleParameters = ....Data.unscaled.ModelParameters.Muscles.IliocostalisLumborum.ILptC6SIPS;
            AnyIntVar MuscleElemNo = 1; ///< The number of this element of the muscle
            AnyIntVar MuscleElemAmount = MuscleParameters.MuscleElemAmount; ///< The total amount of elements for this muscle
            F0 ??= ...DefaultMusPar.PCSAfactor*PCSA; ///< Maximum force output at optimum fiber length
            Lf0 ??= MuscleParameters.OptimalFiberlength / cos(pi/180*MuscleParameters.Pennationangle); //< Optimal fiber length corrected by pennation angle
            AnyVar PCSA ??= 1e4*...StrengthScaleSpine*MuscleParameters.MuscleVolumeSIScaled/(Lf0); ///< PCSA (cm2) of the individual element is total volumen divided by the sum of muscle element fiber lengths.
            Vol0 = (1e-4*PCSA) * Lf0; // New calculation of the vol for the specific muscle branch
        };
        #endif

        #if BM_TRUNK_MUSCLES
        AnyMuscleModel ILptC7CI = {
            AnyFolder& MuscleParameters = ....Data.unscaled.ModelParameters.Muscles.IliocostalisLumborum.ILptC7CI;
            AnyIntVar MuscleElemNo = 1; ///< The number of this element of the muscle
            AnyIntVar MuscleElemAmount = MuscleParameters.MuscleElemAmount; ///< The total amount of elements for this muscle
            F0 ??= ...DefaultMusPar.PCSAfactor*PCSA; ///< Maximum force output at optimum fiber length
            Lf0 ??= MuscleParameters.OptimalFiberlength / cos(pi/180*MuscleParameters.Pennationangle); //< Optimal fiber length corrected by pennation angle
            AnyVar PCSA ??= 1e4*...StrengthScaleSpine*MuscleParameters.MuscleVolumeSIScaled/(Lf0); ///< PCSA (cm2) of the individual element is total volumen divided by the sum of muscle element fiber lengths.
            Vol0 = (1e-4*PCSA) * Lf0; // New calculation of the vol for the specific muscle branch
        };
        #endif

        #if BM_TRUNK_MUSCLES
        AnyMuscleModel ILptC8CI = {
            AnyFolder& MuscleParameters = ....Data.unscaled.ModelParameters.Muscles.IliocostalisLumborum.ILptC8CI;
            AnyIntVar MuscleElemNo = 1; ///< The number of this element of the muscle
            AnyIntVar MuscleElemAmount = MuscleParameters.MuscleElemAmount; ///< The total amount of elements for this muscle
            F0 ??= ...DefaultMusPar.PCSAfactor*PCSA; ///< Maximum force output at optimum fiber length
            Lf0 ??= MuscleParameters.OptimalFiberlength / cos(pi/180*MuscleParameters.Pennationangle); //< Optimal fiber length corrected by pennation angle
            AnyVar PCSA ??= 1e4*...StrengthScaleSpine*MuscleParameters.MuscleVolumeSIScaled/(Lf0); ///< PCSA (cm2) of the individual element is total volumen divided by the sum of muscle element fiber lengths.
            Vol0 = (1e-4*PCSA) * Lf0; // New calculation of the vol for the specific muscle branch
        };
        #endif

        #if BM_TRUNK_MUSCLES
        AnyMuscleModel ILptC9CI = {
            AnyFolder& MuscleParameters = ....Data.unscaled.ModelParameters.Muscles.IliocostalisLumborum.ILptC9CI;
            AnyIntVar MuscleElemNo = 1; ///< The number of this element of the muscle
            AnyIntVar MuscleElemAmount = MuscleParameters.MuscleElemAmount; ///< The total amount of elements for this muscle
            F0 ??= ...DefaultMusPar.PCSAfactor*PCSA; ///< Maximum force output at optimum fiber length
            Lf0 ??= MuscleParameters.OptimalFiberlength / cos(pi/180*MuscleParameters.Pennationangle); //< Optimal fiber length corrected by pennation angle
            AnyVar PCSA ??= 1e4*...StrengthScaleSpine*MuscleParameters.MuscleVolumeSIScaled/(Lf0); ///< PCSA (cm2) of the individual element is total volumen divided by the sum of muscle element fiber lengths.
            Vol0 = (1e-4*PCSA) * Lf0; // New calculation of the vol for the specific muscle branch
        };
        #endif

        #if BM_TRUNK_MUSCLES
        AnyMuscleModel ILptC10CI = {
            AnyFolder& MuscleParameters = ....Data.unscaled.ModelParameters.Muscles.IliocostalisLumborum.ILptC10CI;
            AnyIntVar MuscleElemNo = 1; ///< The number of this element of the muscle
            AnyIntVar MuscleElemAmount = MuscleParameters.MuscleElemAmount; ///< The total amount of elements for this muscle
            F0 ??= ...DefaultMusPar.PCSAfactor*PCSA; ///< Maximum force output at optimum fiber length
            Lf0 ??= MuscleParameters.OptimalFiberlength / cos(pi/180*MuscleParameters.Pennationangle); //< Optimal fiber length corrected by pennation angle
            AnyVar PCSA ??= 1e4*...StrengthScaleSpine*MuscleParameters.MuscleVolumeSIScaled/(Lf0); ///< PCSA (cm2) of the individual element is total volumen divided by the sum of muscle element fiber lengths.
            Vol0 = (1e-4*PCSA) * Lf0; // New calculation of the vol for the specific muscle branch
        };
        #endif

        #if BM_TRUNK_MUSCLES
        AnyMuscleModel ILptC11CI = {
            AnyFolder& MuscleParameters = ....Data.unscaled.ModelParameters.Muscles.IliocostalisLumborum.ILptC11CI;
            AnyIntVar MuscleElemNo = 1; ///< The number of this element of the muscle
            AnyIntVar MuscleElemAmount = MuscleParameters.MuscleElemAmount; ///< The total amount of elements for this muscle
            F0 ??= ...DefaultMusPar.PCSAfactor*PCSA; ///< Maximum force output at optimum fiber length
            Lf0 ??= MuscleParameters.OptimalFiberlength / cos(pi/180*MuscleParameters.Pennationangle); //< Optimal fiber length corrected by pennation angle
            AnyVar PCSA ??= 1e4*...StrengthScaleSpine*MuscleParameters.MuscleVolumeSIScaled/(Lf0); ///< PCSA (cm2) of the individual element is total volumen divided by the sum of muscle element fiber lengths.
            Vol0 = (1e-4*PCSA) * Lf0; // New calculation of the vol for the specific muscle branch
        };
        #endif

        #if BM_TRUNK_MUSCLES
        AnyMuscleModel ILptC12CI = {
            AnyFolder& MuscleParameters = ....Data.unscaled.ModelParameters.Muscles.IliocostalisLumborum.ILptC12CI;
            AnyIntVar MuscleElemNo = 1; ///< The number of this element of the muscle
            AnyIntVar MuscleElemAmount = MuscleParameters.MuscleElemAmount; ///< The total amount of elements for this muscle
            F0 ??= ...DefaultMusPar.PCSAfactor*PCSA; ///< Maximum force output at optimum fiber length
            Lf0 ??= MuscleParameters.OptimalFiberlength / cos(pi/180*MuscleParameters.Pennationangle); //< Optimal fiber length corrected by pennation angle
            AnyVar PCSA ??= 1e4*...StrengthScaleSpine*MuscleParameters.MuscleVolumeSIScaled/(Lf0); ///< PCSA (cm2) of the individual element is total volumen divided by the sum of muscle element fiber lengths.
            Vol0 = (1e-4*PCSA) * Lf0; // New calculation of the vol for the specific muscle branch
        };
        #endif

    };

    AnyFolder IliocostalisThoracis = {

        #if BM_TRUNK_MUSCLES
        AnyMuscleModel ITC7R7 = {
            AnyFolder& MuscleParameters = ....Data.unscaled.ModelParameters.Muscles.IliocostalisThoracis.ITC7R7;
            AnyIntVar MuscleElemNo = 1; ///< The number of this element of the muscle
            AnyIntVar MuscleElemAmount = MuscleParameters.MuscleElemAmount; ///< The total amount of elements for this muscle
            F0 ??= ...DefaultMusPar.PCSAfactor*PCSA; ///< Maximum force output at optimum fiber length
            Lf0 ??= MuscleParameters.OptimalFiberlength / cos(pi/180*MuscleParameters.Pennationangle); //< Optimal fiber length corrected by pennation angle
            AnyVar PCSA ??= 1e4*...StrengthScaleSpine*MuscleParameters.MuscleVolumeSIScaled/(Lf0); ///< PCSA (cm2) of the individual element is total volumen divided by the sum of muscle element fiber lengths.
            Vol0 = (1e-4*PCSA) * Lf0; // New calculation of the vol for the specific muscle branch
        };
        #endif

        #if BM_TRUNK_MUSCLES
        AnyMuscleModel ITR1R7 = {
            AnyFolder& MuscleParameters = ....Data.unscaled.ModelParameters.Muscles.IliocostalisThoracis.ITR1R7;
            AnyIntVar MuscleElemNo = 1; ///< The number of this element of the muscle
            AnyIntVar MuscleElemAmount = MuscleParameters.MuscleElemAmount; ///< The total amount of elements for this muscle
            F0 ??= ...DefaultMusPar.PCSAfactor*PCSA; ///< Maximum force output at optimum fiber length
            Lf0 ??= MuscleParameters.OptimalFiberlength / cos(pi/180*MuscleParameters.Pennationangle); //< Optimal fiber length corrected by pennation angle
            AnyVar PCSA ??= 1e4*...StrengthScaleSpine*MuscleParameters.MuscleVolumeSIScaled/(Lf0); ///< PCSA (cm2) of the individual element is total volumen divided by the sum of muscle element fiber lengths.
            Vol0 = (1e-4*PCSA) * Lf0; // New calculation of the vol for the specific muscle branch
        };
        #endif

        #if BM_TRUNK_MUSCLES
        AnyMuscleModel ITR2R8 = {
            AnyFolder& MuscleParameters = ....Data.unscaled.ModelParameters.Muscles.IliocostalisThoracis.ITR2R8;
            AnyIntVar MuscleElemNo = 1; ///< The number of this element of the muscle
            AnyIntVar MuscleElemAmount = MuscleParameters.MuscleElemAmount; ///< The total amount of elements for this muscle
            F0 ??= ...DefaultMusPar.PCSAfactor*PCSA; ///< Maximum force output at optimum fiber length
            Lf0 ??= MuscleParameters.OptimalFiberlength / cos(pi/180*MuscleParameters.Pennationangle); //< Optimal fiber length corrected by pennation angle
            AnyVar PCSA ??= 1e4*...StrengthScaleSpine*MuscleParameters.MuscleVolumeSIScaled/(Lf0); ///< PCSA (cm2) of the individual element is total volumen divided by the sum of muscle element fiber lengths.
            Vol0 = (1e-4*PCSA) * Lf0; // New calculation of the vol for the specific muscle branch
        };
        #endif

        #if BM_TRUNK_MUSCLES
        AnyMuscleModel ITR3R9 = {
            AnyFolder& MuscleParameters = ....Data.unscaled.ModelParameters.Muscles.IliocostalisThoracis.ITR3R9;
            AnyIntVar MuscleElemNo = 1; ///< The number of this element of the muscle
            AnyIntVar MuscleElemAmount = MuscleParameters.MuscleElemAmount; ///< The total amount of elements for this muscle
            F0 ??= ...DefaultMusPar.PCSAfactor*PCSA; ///< Maximum force output at optimum fiber length
            Lf0 ??= MuscleParameters.OptimalFiberlength / cos(pi/180*MuscleParameters.Pennationangle); //< Optimal fiber length corrected by pennation angle
            AnyVar PCSA ??= 1e4*...StrengthScaleSpine*MuscleParameters.MuscleVolumeSIScaled/(Lf0); ///< PCSA (cm2) of the individual element is total volumen divided by the sum of muscle element fiber lengths.
            Vol0 = (1e-4*PCSA) * Lf0; // New calculation of the vol for the specific muscle branch
        };
        #endif

        #if BM_TRUNK_MUSCLES
        AnyMuscleModel ITR4R10 = {
            AnyFolder& MuscleParameters = ....Data.unscaled.ModelParameters.Muscles.IliocostalisThoracis.ITR4R10;
            AnyIntVar MuscleElemNo = 1; ///< The number of this element of the muscle
            AnyIntVar MuscleElemAmount = MuscleParameters.MuscleElemAmount; ///< The total amount of elements for this muscle
            F0 ??= ...DefaultMusPar.PCSAfactor*PCSA; ///< Maximum force output at optimum fiber length
            Lf0 ??= MuscleParameters.OptimalFiberlength / cos(pi/180*MuscleParameters.Pennationangle); //< Optimal fiber length corrected by pennation angle
            AnyVar PCSA ??= 1e4*...StrengthScaleSpine*MuscleParameters.MuscleVolumeSIScaled/(Lf0); ///< PCSA (cm2) of the individual element is total volumen divided by the sum of muscle element fiber lengths.
            Vol0 = (1e-4*PCSA) * Lf0; // New calculation of the vol for the specific muscle branch
        };
        #endif

        #if BM_TRUNK_MUSCLES
        AnyMuscleModel ITR5T11 = {
            AnyFolder& MuscleParameters = ....Data.unscaled.ModelParameters.Muscles.IliocostalisThoracis.ITR5T11;
            AnyIntVar MuscleElemNo = 1; ///< The number of this element of the muscle
            AnyIntVar MuscleElemAmount = MuscleParameters.MuscleElemAmount; ///< The total amount of elements for this muscle
            F0 ??= ...DefaultMusPar.PCSAfactor*PCSA; ///< Maximum force output at optimum fiber length
            Lf0 ??= MuscleParameters.OptimalFiberlength / cos(pi/180*MuscleParameters.Pennationangle); //< Optimal fiber length corrected by pennation angle
            AnyVar PCSA ??= 1e4*...StrengthScaleSpine*MuscleParameters.MuscleVolumeSIScaled/(Lf0); ///< PCSA (cm2) of the individual element is total volumen divided by the sum of muscle element fiber lengths.
            Vol0 = (1e-4*PCSA) * Lf0; // New calculation of the vol for the specific muscle branch
        };
        #endif

        #if BM_TRUNK_MUSCLES
        AnyMuscleModel ITR6T12 = {
            AnyFolder& MuscleParameters = ....Data.unscaled.ModelParameters.Muscles.IliocostalisThoracis.ITR6T12;
            AnyIntVar MuscleElemNo = 1; ///< The number of this element of the muscle
            AnyIntVar MuscleElemAmount = MuscleParameters.MuscleElemAmount; ///< The total amount of elements for this muscle
            F0 ??= ...DefaultMusPar.PCSAfactor*PCSA; ///< Maximum force output at optimum fiber length
            Lf0 ??= MuscleParameters.OptimalFiberlength / cos(pi/180*MuscleParameters.Pennationangle); //< Optimal fiber length corrected by pennation angle
            AnyVar PCSA ??= 1e4*...StrengthScaleSpine*MuscleParameters.MuscleVolumeSIScaled/(Lf0); ///< PCSA (cm2) of the individual element is total volumen divided by the sum of muscle element fiber lengths.
            Vol0 = (1e-4*PCSA) * Lf0; // New calculation of the vol for the specific muscle branch
        };
        #endif

    };

    AnyFolder IntercostalisExternus = {

        #if BM_TRUNK_MUSCLES
        AnyMuscleModel IC_Ext_R1R2 = {
            AnyFolder& MuscleParameters = ....Data.unscaled.ModelParameters.Muscles.IntercostalisExternus.IC_Ext_R1R2;
            AnyIntVar MuscleElemNo = 1; ///< The number of this element of the muscle
            AnyIntVar MuscleElemAmount = MuscleParameters.MuscleElemAmount; ///< The total amount of elements for this muscle
            F0 ??= ...DefaultMusPar.PCSAfactor*PCSA; ///< Maximum force output at optimum fiber length
            Lf0 ??= MuscleParameters.OptimalFiberlength / cos(pi/180*MuscleParameters.Pennationangle); //< Optimal fiber length corrected by pennation angle
            AnyVar PCSA ??= 1e4*...StrengthScaleSpine*MuscleParameters.MuscleVolumeSIScaled/(Lf0); ///< PCSA (cm2) of the individual element is total volumen divided by the sum of muscle element fiber lengths.
            Vol0 = (1e-4*PCSA) * Lf0; // New calculation of the vol for the specific muscle branch
        };
        #endif

        #if BM_TRUNK_MUSCLES
        AnyMuscleModel IC_Ext_R2R3 = {
            AnyFolder& MuscleParameters = ....Data.unscaled.ModelParameters.Muscles.IntercostalisExternus.IC_Ext_R2R3;
            AnyIntVar MuscleElemNo = 1; ///< The number of this element of the muscle
            AnyIntVar MuscleElemAmount = MuscleParameters.MuscleElemAmount; ///< The total amount of elements for this muscle
            F0 ??= ...DefaultMusPar.PCSAfactor*PCSA; ///< Maximum force output at optimum fiber length
            Lf0 ??= MuscleParameters.OptimalFiberlength / cos(pi/180*MuscleParameters.Pennationangle); //< Optimal fiber length corrected by pennation angle
            AnyVar PCSA ??= 1e4*...StrengthScaleSpine*MuscleParameters.MuscleVolumeSIScaled/(Lf0); ///< PCSA (cm2) of the individual element is total volumen divided by the sum of muscle element fiber lengths.
            Vol0 = (1e-4*PCSA) * Lf0; // New calculation of the vol for the specific muscle branch
        };
        #endif

        #if BM_TRUNK_MUSCLES
        AnyMuscleModel IC_Ext_R3R4 = {
            AnyFolder& MuscleParameters = ....Data.unscaled.ModelParameters.Muscles.IntercostalisExternus.IC_Ext_R3R4;
            AnyIntVar MuscleElemNo = 1; ///< The number of this element of the muscle
            AnyIntVar MuscleElemAmount = MuscleParameters.MuscleElemAmount; ///< The total amount of elements for this muscle
            F0 ??= ...DefaultMusPar.PCSAfactor*PCSA; ///< Maximum force output at optimum fiber length
            Lf0 ??= MuscleParameters.OptimalFiberlength / cos(pi/180*MuscleParameters.Pennationangle); //< Optimal fiber length corrected by pennation angle
            AnyVar PCSA ??= 1e4*...StrengthScaleSpine*MuscleParameters.MuscleVolumeSIScaled/(Lf0); ///< PCSA (cm2) of the individual element is total volumen divided by the sum of muscle element fiber lengths.
            Vol0 = (1e-4*PCSA) * Lf0; // New calculation of the vol for the specific muscle branch
        };
        #endif

        #if BM_TRUNK_MUSCLES
        AnyMuscleModel IC_Ext_R4R5 = {
            AnyFolder& MuscleParameters = ....Data.unscaled.ModelParameters.Muscles.IntercostalisExternus.IC_Ext_R4R5;
            AnyIntVar MuscleElemNo = 1; ///< The number of this element of the muscle
            AnyIntVar MuscleElemAmount = MuscleParameters.MuscleElemAmount; ///< The total amount of elements for this muscle
            F0 ??= ...DefaultMusPar.PCSAfactor*PCSA; ///< Maximum force output at optimum fiber length
            Lf0 ??= MuscleParameters.OptimalFiberlength / cos(pi/180*MuscleParameters.Pennationangle); //< Optimal fiber length corrected by pennation angle
            AnyVar PCSA ??= 1e4*...StrengthScaleSpine*MuscleParameters.MuscleVolumeSIScaled/(Lf0); ///< PCSA (cm2) of the individual element is total volumen divided by the sum of muscle element fiber lengths.
            Vol0 = (1e-4*PCSA) * Lf0; // New calculation of the vol for the specific muscle branch
        };
        #endif

        #if BM_TRUNK_MUSCLES
        AnyMuscleModel IC_Ext_R5R6 = {
            AnyFolder& MuscleParameters = ....Data.unscaled.ModelParameters.Muscles.IntercostalisExternus.IC_Ext_R5R6;
            AnyIntVar MuscleElemNo = 1; ///< The number of this element of the muscle
            AnyIntVar MuscleElemAmount = MuscleParameters.MuscleElemAmount; ///< The total amount of elements for this muscle
            F0 ??= ...DefaultMusPar.PCSAfactor*PCSA; ///< Maximum force output at optimum fiber length
            Lf0 ??= MuscleParameters.OptimalFiberlength / cos(pi/180*MuscleParameters.Pennationangle); //< Optimal fiber length corrected by pennation angle
            AnyVar PCSA ??= 1e4*...StrengthScaleSpine*MuscleParameters.MuscleVolumeSIScaled/(Lf0); ///< PCSA (cm2) of the individual element is total volumen divided by the sum of muscle element fiber lengths.
            Vol0 = (1e-4*PCSA) * Lf0; // New calculation of the vol for the specific muscle branch
        };
        #endif

        #if BM_TRUNK_MUSCLES
        AnyMuscleModel IC_Ext_R6R7 = {
            AnyFolder& MuscleParameters = ....Data.unscaled.ModelParameters.Muscles.IntercostalisExternus.IC_Ext_R6R7;
            AnyIntVar MuscleElemNo = 1; ///< The number of this element of the muscle
            AnyIntVar MuscleElemAmount = MuscleParameters.MuscleElemAmount; ///< The total amount of elements for this muscle
            F0 ??= ...DefaultMusPar.PCSAfactor*PCSA; ///< Maximum force output at optimum fiber length
            Lf0 ??= MuscleParameters.OptimalFiberlength / cos(pi/180*MuscleParameters.Pennationangle); //< Optimal fiber length corrected by pennation angle
            AnyVar PCSA ??= 1e4*...StrengthScaleSpine*MuscleParameters.MuscleVolumeSIScaled/(Lf0); ///< PCSA (cm2) of the individual element is total volumen divided by the sum of muscle element fiber lengths.
            Vol0 = (1e-4*PCSA) * Lf0; // New calculation of the vol for the specific muscle branch
        };
        #endif

        #if BM_TRUNK_MUSCLES
        AnyMuscleModel IC_Ext_R7R8 = {
            AnyFolder& MuscleParameters = ....Data.unscaled.ModelParameters.Muscles.IntercostalisExternus.IC_Ext_R7R8;
            AnyIntVar MuscleElemNo = 1; ///< The number of this element of the muscle
            AnyIntVar MuscleElemAmount = MuscleParameters.MuscleElemAmount; ///< The total amount of elements for this muscle
            F0 ??= ...DefaultMusPar.PCSAfactor*PCSA; ///< Maximum force output at optimum fiber length
            Lf0 ??= MuscleParameters.OptimalFiberlength / cos(pi/180*MuscleParameters.Pennationangle); //< Optimal fiber length corrected by pennation angle
            AnyVar PCSA ??= 1e4*...StrengthScaleSpine*MuscleParameters.MuscleVolumeSIScaled/(Lf0); ///< PCSA (cm2) of the individual element is total volumen divided by the sum of muscle element fiber lengths.
            Vol0 = (1e-4*PCSA) * Lf0; // New calculation of the vol for the specific muscle branch
        };
        #endif

        #if BM_TRUNK_MUSCLES
        AnyMuscleModel IC_Ext_R8R9 = {
            AnyFolder& MuscleParameters = ....Data.unscaled.ModelParameters.Muscles.IntercostalisExternus.IC_Ext_R8R9;
            AnyIntVar MuscleElemNo = 1; ///< The number of this element of the muscle
            AnyIntVar MuscleElemAmount = MuscleParameters.MuscleElemAmount; ///< The total amount of elements for this muscle
            F0 ??= ...DefaultMusPar.PCSAfactor*PCSA; ///< Maximum force output at optimum fiber length
            Lf0 ??= MuscleParameters.OptimalFiberlength / cos(pi/180*MuscleParameters.Pennationangle); //< Optimal fiber length corrected by pennation angle
            AnyVar PCSA ??= 1e4*...StrengthScaleSpine*MuscleParameters.MuscleVolumeSIScaled/(Lf0); ///< PCSA (cm2) of the individual element is total volumen divided by the sum of muscle element fiber lengths.
            Vol0 = (1e-4*PCSA) * Lf0; // New calculation of the vol for the specific muscle branch
        };
        #endif

        #if BM_TRUNK_MUSCLES
        AnyMuscleModel IC_Ext_R9R10 = {
            AnyFolder& MuscleParameters = ....Data.unscaled.ModelParameters.Muscles.IntercostalisExternus.IC_Ext_R9R10;
            AnyIntVar MuscleElemNo = 1; ///< The number of this element of the muscle
            AnyIntVar MuscleElemAmount = MuscleParameters.MuscleElemAmount; ///< The total amount of elements for this muscle
            F0 ??= ...DefaultMusPar.PCSAfactor*PCSA; ///< Maximum force output at optimum fiber length
            Lf0 ??= MuscleParameters.OptimalFiberlength / cos(pi/180*MuscleParameters.Pennationangle); //< Optimal fiber length corrected by pennation angle
            AnyVar PCSA ??= 1e4*...StrengthScaleSpine*MuscleParameters.MuscleVolumeSIScaled/(Lf0); ///< PCSA (cm2) of the individual element is total volumen divided by the sum of muscle element fiber lengths.
            Vol0 = (1e-4*PCSA) * Lf0; // New calculation of the vol for the specific muscle branch
        };
        #endif

        #if BM_TRUNK_MUSCLES
        AnyMuscleModel IC_Ext_R10R11 = {
            AnyFolder& MuscleParameters = ....Data.unscaled.ModelParameters.Muscles.IntercostalisExternus.IC_Ext_R10R11;
            AnyIntVar MuscleElemNo = 1; ///< The number of this element of the muscle
            AnyIntVar MuscleElemAmount = MuscleParameters.MuscleElemAmount; ///< The total amount of elements for this muscle
            F0 ??= ...DefaultMusPar.PCSAfactor*PCSA; ///< Maximum force output at optimum fiber length
            Lf0 ??= MuscleParameters.OptimalFiberlength / cos(pi/180*MuscleParameters.Pennationangle); //< Optimal fiber length corrected by pennation angle
            AnyVar PCSA ??= 1e4*...StrengthScaleSpine*MuscleParameters.MuscleVolumeSIScaled/(Lf0); ///< PCSA (cm2) of the individual element is total volumen divided by the sum of muscle element fiber lengths.
            Vol0 = (1e-4*PCSA) * Lf0; // New calculation of the vol for the specific muscle branch
        };
        #endif

        #if BM_TRUNK_MUSCLES
        AnyMuscleModel IC_Ext_R11R12 = {
            AnyFolder& MuscleParameters = ....Data.unscaled.ModelParameters.Muscles.IntercostalisExternus.IC_Ext_R11R12;
            AnyIntVar MuscleElemNo = 1; ///< The number of this element of the muscle
            AnyIntVar MuscleElemAmount = MuscleParameters.MuscleElemAmount; ///< The total amount of elements for this muscle
            F0 ??= ...DefaultMusPar.PCSAfactor*PCSA; ///< Maximum force output at optimum fiber length
            Lf0 ??= MuscleParameters.OptimalFiberlength / cos(pi/180*MuscleParameters.Pennationangle); //< Optimal fiber length corrected by pennation angle
            AnyVar PCSA ??= 1e4*...StrengthScaleSpine*MuscleParameters.MuscleVolumeSIScaled/(Lf0); ///< PCSA (cm2) of the individual element is total volumen divided by the sum of muscle element fiber lengths.
            Vol0 = (1e-4*PCSA) * Lf0; // New calculation of the vol for the specific muscle branch
        };
        #endif

    };

    AnyFolder IntercostalisInternus = {

        #if BM_TRUNK_MUSCLES
        AnyMuscleModel IC_Int_R1R2 = {
            AnyFolder& MuscleParameters = ....Data.unscaled.ModelParameters.Muscles.IntercostalisInternus.IC_Int_R1R2;
            AnyIntVar MuscleElemNo = 1; ///< The number of this element of the muscle
            AnyIntVar MuscleElemAmount = MuscleParameters.MuscleElemAmount; ///< The total amount of elements for this muscle
            F0 ??= ...DefaultMusPar.PCSAfactor*PCSA; ///< Maximum force output at optimum fiber length
            Lf0 ??= MuscleParameters.OptimalFiberlength / cos(pi/180*MuscleParameters.Pennationangle); //< Optimal fiber length corrected by pennation angle
            AnyVar PCSA ??= 1e4*...StrengthScaleSpine*MuscleParameters.MuscleVolumeSIScaled/(Lf0); ///< PCSA (cm2) of the individual element is total volumen divided by the sum of muscle element fiber lengths.
            Vol0 = (1e-4*PCSA) * Lf0; // New calculation of the vol for the specific muscle branch
        };
        #endif

        #if BM_TRUNK_MUSCLES
        AnyMuscleModel IC_Int_R2R3 = {
            AnyFolder& MuscleParameters = ....Data.unscaled.ModelParameters.Muscles.IntercostalisInternus.IC_Int_R2R3;
            AnyIntVar MuscleElemNo = 1; ///< The number of this element of the muscle
            AnyIntVar MuscleElemAmount = MuscleParameters.MuscleElemAmount; ///< The total amount of elements for this muscle
            F0 ??= ...DefaultMusPar.PCSAfactor*PCSA; ///< Maximum force output at optimum fiber length
            Lf0 ??= MuscleParameters.OptimalFiberlength / cos(pi/180*MuscleParameters.Pennationangle); //< Optimal fiber length corrected by pennation angle
            AnyVar PCSA ??= 1e4*...StrengthScaleSpine*MuscleParameters.MuscleVolumeSIScaled/(Lf0); ///< PCSA (cm2) of the individual element is total volumen divided by the sum of muscle element fiber lengths.
            Vol0 = (1e-4*PCSA) * Lf0; // New calculation of the vol for the specific muscle branch
        };
        #endif

        #if BM_TRUNK_MUSCLES
        AnyMuscleModel IC_Int_R3R4 = {
            AnyFolder& MuscleParameters = ....Data.unscaled.ModelParameters.Muscles.IntercostalisInternus.IC_Int_R3R4;
            AnyIntVar MuscleElemNo = 1; ///< The number of this element of the muscle
            AnyIntVar MuscleElemAmount = MuscleParameters.MuscleElemAmount; ///< The total amount of elements for this muscle
            F0 ??= ...DefaultMusPar.PCSAfactor*PCSA; ///< Maximum force output at optimum fiber length
            Lf0 ??= MuscleParameters.OptimalFiberlength / cos(pi/180*MuscleParameters.Pennationangle); //< Optimal fiber length corrected by pennation angle
            AnyVar PCSA ??= 1e4*...StrengthScaleSpine*MuscleParameters.MuscleVolumeSIScaled/(Lf0); ///< PCSA (cm2) of the individual element is total volumen divided by the sum of muscle element fiber lengths.
            Vol0 = (1e-4*PCSA) * Lf0; // New calculation of the vol for the specific muscle branch
        };
        #endif

        #if BM_TRUNK_MUSCLES
        AnyMuscleModel IC_Int_R4R5 = {
            AnyFolder& MuscleParameters = ....Data.unscaled.ModelParameters.Muscles.IntercostalisInternus.IC_Int_R4R5;
            AnyIntVar MuscleElemNo = 1; ///< The number of this element of the muscle
            AnyIntVar MuscleElemAmount = MuscleParameters.MuscleElemAmount; ///< The total amount of elements for this muscle
            F0 ??= ...DefaultMusPar.PCSAfactor*PCSA; ///< Maximum force output at optimum fiber length
            Lf0 ??= MuscleParameters.OptimalFiberlength / cos(pi/180*MuscleParameters.Pennationangle); //< Optimal fiber length corrected by pennation angle
            AnyVar PCSA ??= 1e4*...StrengthScaleSpine*MuscleParameters.MuscleVolumeSIScaled/(Lf0); ///< PCSA (cm2) of the individual element is total volumen divided by the sum of muscle element fiber lengths.
            Vol0 = (1e-4*PCSA) * Lf0; // New calculation of the vol for the specific muscle branch
        };
        #endif

        #if BM_TRUNK_MUSCLES
        AnyMuscleModel IC_Int_R5R6 = {
            AnyFolder& MuscleParameters = ....Data.unscaled.ModelParameters.Muscles.IntercostalisInternus.IC_Int_R5R6;
            AnyIntVar MuscleElemNo = 1; ///< The number of this element of the muscle
            AnyIntVar MuscleElemAmount = MuscleParameters.MuscleElemAmount; ///< The total amount of elements for this muscle
            F0 ??= ...DefaultMusPar.PCSAfactor*PCSA; ///< Maximum force output at optimum fiber length
            Lf0 ??= MuscleParameters.OptimalFiberlength / cos(pi/180*MuscleParameters.Pennationangle); //< Optimal fiber length corrected by pennation angle
            AnyVar PCSA ??= 1e4*...StrengthScaleSpine*MuscleParameters.MuscleVolumeSIScaled/(Lf0); ///< PCSA (cm2) of the individual element is total volumen divided by the sum of muscle element fiber lengths.
            Vol0 = (1e-4*PCSA) * Lf0; // New calculation of the vol for the specific muscle branch
        };
        #endif

        #if BM_TRUNK_MUSCLES
        AnyMuscleModel IC_Int_R6R7 = {
            AnyFolder& MuscleParameters = ....Data.unscaled.ModelParameters.Muscles.IntercostalisInternus.IC_Int_R6R7;
            AnyIntVar MuscleElemNo = 1; ///< The number of this element of the muscle
            AnyIntVar MuscleElemAmount = MuscleParameters.MuscleElemAmount; ///< The total amount of elements for this muscle
            F0 ??= ...DefaultMusPar.PCSAfactor*PCSA; ///< Maximum force output at optimum fiber length
            Lf0 ??= MuscleParameters.OptimalFiberlength / cos(pi/180*MuscleParameters.Pennationangle); //< Optimal fiber length corrected by pennation angle
            AnyVar PCSA ??= 1e4*...StrengthScaleSpine*MuscleParameters.MuscleVolumeSIScaled/(Lf0); ///< PCSA (cm2) of the individual element is total volumen divided by the sum of muscle element fiber lengths.
            Vol0 = (1e-4*PCSA) * Lf0; // New calculation of the vol for the specific muscle branch
        };
        #endif

        #if BM_TRUNK_MUSCLES
        AnyMuscleModel IC_Int_R7R8 = {
            AnyFolder& MuscleParameters = ....Data.unscaled.ModelParameters.Muscles.IntercostalisInternus.IC_Int_R7R8;
            AnyIntVar MuscleElemNo = 1; ///< The number of this element of the muscle
            AnyIntVar MuscleElemAmount = MuscleParameters.MuscleElemAmount; ///< The total amount of elements for this muscle
            F0 ??= ...DefaultMusPar.PCSAfactor*PCSA; ///< Maximum force output at optimum fiber length
            Lf0 ??= MuscleParameters.OptimalFiberlength / cos(pi/180*MuscleParameters.Pennationangle); //< Optimal fiber length corrected by pennation angle
            AnyVar PCSA ??= 1e4*...StrengthScaleSpine*MuscleParameters.MuscleVolumeSIScaled/(Lf0); ///< PCSA (cm2) of the individual element is total volumen divided by the sum of muscle element fiber lengths.
            Vol0 = (1e-4*PCSA) * Lf0; // New calculation of the vol for the specific muscle branch
        };
        #endif

        #if BM_TRUNK_MUSCLES
        AnyMuscleModel IC_Int_R8R9 = {
            AnyFolder& MuscleParameters = ....Data.unscaled.ModelParameters.Muscles.IntercostalisInternus.IC_Int_R8R9;
            AnyIntVar MuscleElemNo = 1; ///< The number of this element of the muscle
            AnyIntVar MuscleElemAmount = MuscleParameters.MuscleElemAmount; ///< The total amount of elements for this muscle
            F0 ??= ...DefaultMusPar.PCSAfactor*PCSA; ///< Maximum force output at optimum fiber length
            Lf0 ??= MuscleParameters.OptimalFiberlength / cos(pi/180*MuscleParameters.Pennationangle); //< Optimal fiber length corrected by pennation angle
            AnyVar PCSA ??= 1e4*...StrengthScaleSpine*MuscleParameters.MuscleVolumeSIScaled/(Lf0); ///< PCSA (cm2) of the individual element is total volumen divided by the sum of muscle element fiber lengths.
            Vol0 = (1e-4*PCSA) * Lf0; // New calculation of the vol for the specific muscle branch
        };
        #endif

        #if BM_TRUNK_MUSCLES
        AnyMuscleModel IC_Int_R9R10 = {
            AnyFolder& MuscleParameters = ....Data.unscaled.ModelParameters.Muscles.IntercostalisInternus.IC_Int_R9R10;
            AnyIntVar MuscleElemNo = 1; ///< The number of this element of the muscle
            AnyIntVar MuscleElemAmount = MuscleParameters.MuscleElemAmount; ///< The total amount of elements for this muscle
            F0 ??= ...DefaultMusPar.PCSAfactor*PCSA; ///< Maximum force output at optimum fiber length
            Lf0 ??= MuscleParameters.OptimalFiberlength / cos(pi/180*MuscleParameters.Pennationangle); //< Optimal fiber length corrected by pennation angle
            AnyVar PCSA ??= 1e4*...StrengthScaleSpine*MuscleParameters.MuscleVolumeSIScaled/(Lf0); ///< PCSA (cm2) of the individual element is total volumen divided by the sum of muscle element fiber lengths.
            Vol0 = (1e-4*PCSA) * Lf0; // New calculation of the vol for the specific muscle branch
        };
        #endif

        #if BM_TRUNK_MUSCLES
        AnyMuscleModel IC_Int_R10R11 = {
            AnyFolder& MuscleParameters = ....Data.unscaled.ModelParameters.Muscles.IntercostalisInternus.IC_Int_R10R11;
            AnyIntVar MuscleElemNo = 1; ///< The number of this element of the muscle
            AnyIntVar MuscleElemAmount = MuscleParameters.MuscleElemAmount; ///< The total amount of elements for this muscle
            F0 ??= ...DefaultMusPar.PCSAfactor*PCSA; ///< Maximum force output at optimum fiber length
            Lf0 ??= MuscleParameters.OptimalFiberlength / cos(pi/180*MuscleParameters.Pennationangle); //< Optimal fiber length corrected by pennation angle
            AnyVar PCSA ??= 1e4*...StrengthScaleSpine*MuscleParameters.MuscleVolumeSIScaled/(Lf0); ///< PCSA (cm2) of the individual element is total volumen divided by the sum of muscle element fiber lengths.
            Vol0 = (1e-4*PCSA) * Lf0; // New calculation of the vol for the specific muscle branch
        };
        #endif

        #if BM_TRUNK_MUSCLES
        AnyMuscleModel IC_Int_R11R12 = {
            AnyFolder& MuscleParameters = ....Data.unscaled.ModelParameters.Muscles.IntercostalisInternus.IC_Int_R11R12;
            AnyIntVar MuscleElemNo = 1; ///< The number of this element of the muscle
            AnyIntVar MuscleElemAmount = MuscleParameters.MuscleElemAmount; ///< The total amount of elements for this muscle
            F0 ??= ...DefaultMusPar.PCSAfactor*PCSA; ///< Maximum force output at optimum fiber length
            Lf0 ??= MuscleParameters.OptimalFiberlength / cos(pi/180*MuscleParameters.Pennationangle); //< Optimal fiber length corrected by pennation angle
            AnyVar PCSA ??= 1e4*...StrengthScaleSpine*MuscleParameters.MuscleVolumeSIScaled/(Lf0); ///< PCSA (cm2) of the individual element is total volumen divided by the sum of muscle element fiber lengths.
            Vol0 = (1e-4*PCSA) * Lf0; // New calculation of the vol for the specific muscle branch
        };
        #endif

    };

    AnyFolder IntercostalisIntimus = {

        #if BM_TRUNK_MUSCLES
        AnyMuscleModel IC_Inn_R1R2 = {
            AnyFolder& MuscleParameters = ....Data.unscaled.ModelParameters.Muscles.IntercostalisIntimus.IC_Inn_R1R2;
            AnyIntVar MuscleElemNo = 1; ///< The number of this element of the muscle
            AnyIntVar MuscleElemAmount = MuscleParameters.MuscleElemAmount; ///< The total amount of elements for this muscle
            F0 ??= ...DefaultMusPar.PCSAfactor*PCSA; ///< Maximum force output at optimum fiber length
            Lf0 ??= MuscleParameters.OptimalFiberlength / cos(pi/180*MuscleParameters.Pennationangle); //< Optimal fiber length corrected by pennation angle
            AnyVar PCSA ??= 1e4*...StrengthScaleSpine*MuscleParameters.MuscleVolumeSIScaled/(Lf0); ///< PCSA (cm2) of the individual element is total volumen divided by the sum of muscle element fiber lengths.
            Vol0 = (1e-4*PCSA) * Lf0; // New calculation of the vol for the specific muscle branch
        };
        #endif

        #if BM_TRUNK_MUSCLES
        AnyMuscleModel IC_Inn_R2R3 = {
            AnyFolder& MuscleParameters = ....Data.unscaled.ModelParameters.Muscles.IntercostalisIntimus.IC_Inn_R2R3;
            AnyIntVar MuscleElemNo = 1; ///< The number of this element of the muscle
            AnyIntVar MuscleElemAmount = MuscleParameters.MuscleElemAmount; ///< The total amount of elements for this muscle
            F0 ??= ...DefaultMusPar.PCSAfactor*PCSA; ///< Maximum force output at optimum fiber length
            Lf0 ??= MuscleParameters.OptimalFiberlength / cos(pi/180*MuscleParameters.Pennationangle); //< Optimal fiber length corrected by pennation angle
            AnyVar PCSA ??= 1e4*...StrengthScaleSpine*MuscleParameters.MuscleVolumeSIScaled/(Lf0); ///< PCSA (cm2) of the individual element is total volumen divided by the sum of muscle element fiber lengths.
            Vol0 = (1e-4*PCSA) * Lf0; // New calculation of the vol for the specific muscle branch
        };
        #endif

        #if BM_TRUNK_MUSCLES
        AnyMuscleModel IC_Inn_R3R4 = {
            AnyFolder& MuscleParameters = ....Data.unscaled.ModelParameters.Muscles.IntercostalisIntimus.IC_Inn_R3R4;
            AnyIntVar MuscleElemNo = 1; ///< The number of this element of the muscle
            AnyIntVar MuscleElemAmount = MuscleParameters.MuscleElemAmount; ///< The total amount of elements for this muscle
            F0 ??= ...DefaultMusPar.PCSAfactor*PCSA; ///< Maximum force output at optimum fiber length
            Lf0 ??= MuscleParameters.OptimalFiberlength / cos(pi/180*MuscleParameters.Pennationangle); //< Optimal fiber length corrected by pennation angle
            AnyVar PCSA ??= 1e4*...StrengthScaleSpine*MuscleParameters.MuscleVolumeSIScaled/(Lf0); ///< PCSA (cm2) of the individual element is total volumen divided by the sum of muscle element fiber lengths.
            Vol0 = (1e-4*PCSA) * Lf0; // New calculation of the vol for the specific muscle branch
        };
        #endif

        #if BM_TRUNK_MUSCLES
        AnyMuscleModel IC_Inn_R4R5 = {
            AnyFolder& MuscleParameters = ....Data.unscaled.ModelParameters.Muscles.IntercostalisIntimus.IC_Inn_R4R5;
            AnyIntVar MuscleElemNo = 1; ///< The number of this element of the muscle
            AnyIntVar MuscleElemAmount = MuscleParameters.MuscleElemAmount; ///< The total amount of elements for this muscle
            F0 ??= ...DefaultMusPar.PCSAfactor*PCSA; ///< Maximum force output at optimum fiber length
            Lf0 ??= MuscleParameters.OptimalFiberlength / cos(pi/180*MuscleParameters.Pennationangle); //< Optimal fiber length corrected by pennation angle
            AnyVar PCSA ??= 1e4*...StrengthScaleSpine*MuscleParameters.MuscleVolumeSIScaled/(Lf0); ///< PCSA (cm2) of the individual element is total volumen divided by the sum of muscle element fiber lengths.
            Vol0 = (1e-4*PCSA) * Lf0; // New calculation of the vol for the specific muscle branch
        };
        #endif

        #if BM_TRUNK_MUSCLES
        AnyMuscleModel IC_Inn_R5R6 = {
            AnyFolder& MuscleParameters = ....Data.unscaled.ModelParameters.Muscles.IntercostalisIntimus.IC_Inn_R5R6;
            AnyIntVar MuscleElemNo = 1; ///< The number of this element of the muscle
            AnyIntVar MuscleElemAmount = MuscleParameters.MuscleElemAmount; ///< The total amount of elements for this muscle
            F0 ??= ...DefaultMusPar.PCSAfactor*PCSA; ///< Maximum force output at optimum fiber length
            Lf0 ??= MuscleParameters.OptimalFiberlength / cos(pi/180*MuscleParameters.Pennationangle); //< Optimal fiber length corrected by pennation angle
            AnyVar PCSA ??= 1e4*...StrengthScaleSpine*MuscleParameters.MuscleVolumeSIScaled/(Lf0); ///< PCSA (cm2) of the individual element is total volumen divided by the sum of muscle element fiber lengths.
            Vol0 = (1e-4*PCSA) * Lf0; // New calculation of the vol for the specific muscle branch
        };
        #endif

        #if BM_TRUNK_MUSCLES
        AnyMuscleModel IC_Inn_R6R7 = {
            AnyFolder& MuscleParameters = ....Data.unscaled.ModelParameters.Muscles.IntercostalisIntimus.IC_Inn_R6R7;
            AnyIntVar MuscleElemNo = 1; ///< The number of this element of the muscle
            AnyIntVar MuscleElemAmount = MuscleParameters.MuscleElemAmount; ///< The total amount of elements for this muscle
            F0 ??= ...DefaultMusPar.PCSAfactor*PCSA; ///< Maximum force output at optimum fiber length
            Lf0 ??= MuscleParameters.OptimalFiberlength / cos(pi/180*MuscleParameters.Pennationangle); //< Optimal fiber length corrected by pennation angle
            AnyVar PCSA ??= 1e4*...StrengthScaleSpine*MuscleParameters.MuscleVolumeSIScaled/(Lf0); ///< PCSA (cm2) of the individual element is total volumen divided by the sum of muscle element fiber lengths.
            Vol0 = (1e-4*PCSA) * Lf0; // New calculation of the vol for the specific muscle branch
        };
        #endif

        #if BM_TRUNK_MUSCLES
        AnyMuscleModel IC_Inn_R7R8 = {
            AnyFolder& MuscleParameters = ....Data.unscaled.ModelParameters.Muscles.IntercostalisIntimus.IC_Inn_R7R8;
            AnyIntVar MuscleElemNo = 1; ///< The number of this element of the muscle
            AnyIntVar MuscleElemAmount = MuscleParameters.MuscleElemAmount; ///< The total amount of elements for this muscle
            F0 ??= ...DefaultMusPar.PCSAfactor*PCSA; ///< Maximum force output at optimum fiber length
            Lf0 ??= MuscleParameters.OptimalFiberlength / cos(pi/180*MuscleParameters.Pennationangle); //< Optimal fiber length corrected by pennation angle
            AnyVar PCSA ??= 1e4*...StrengthScaleSpine*MuscleParameters.MuscleVolumeSIScaled/(Lf0); ///< PCSA (cm2) of the individual element is total volumen divided by the sum of muscle element fiber lengths.
            Vol0 = (1e-4*PCSA) * Lf0; // New calculation of the vol for the specific muscle branch
        };
        #endif

        #if BM_TRUNK_MUSCLES
        AnyMuscleModel IC_Inn_R8R9 = {
            AnyFolder& MuscleParameters = ....Data.unscaled.ModelParameters.Muscles.IntercostalisIntimus.IC_Inn_R8R9;
            AnyIntVar MuscleElemNo = 1; ///< The number of this element of the muscle
            AnyIntVar MuscleElemAmount = MuscleParameters.MuscleElemAmount; ///< The total amount of elements for this muscle
            F0 ??= ...DefaultMusPar.PCSAfactor*PCSA; ///< Maximum force output at optimum fiber length
            Lf0 ??= MuscleParameters.OptimalFiberlength / cos(pi/180*MuscleParameters.Pennationangle); //< Optimal fiber length corrected by pennation angle
            AnyVar PCSA ??= 1e4*...StrengthScaleSpine*MuscleParameters.MuscleVolumeSIScaled/(Lf0); ///< PCSA (cm2) of the individual element is total volumen divided by the sum of muscle element fiber lengths.
            Vol0 = (1e-4*PCSA) * Lf0; // New calculation of the vol for the specific muscle branch
        };
        #endif

        #if BM_TRUNK_MUSCLES
        AnyMuscleModel IC_Inn_R9R10 = {
            AnyFolder& MuscleParameters = ....Data.unscaled.ModelParameters.Muscles.IntercostalisIntimus.IC_Inn_R9R10;
            AnyIntVar MuscleElemNo = 1; ///< The number of this element of the muscle
            AnyIntVar MuscleElemAmount = MuscleParameters.MuscleElemAmount; ///< The total amount of elements for this muscle
            F0 ??= ...DefaultMusPar.PCSAfactor*PCSA; ///< Maximum force output at optimum fiber length
            Lf0 ??= MuscleParameters.OptimalFiberlength / cos(pi/180*MuscleParameters.Pennationangle); //< Optimal fiber length corrected by pennation angle
            AnyVar PCSA ??= 1e4*...StrengthScaleSpine*MuscleParameters.MuscleVolumeSIScaled/(Lf0); ///< PCSA (cm2) of the individual element is total volumen divided by the sum of muscle element fiber lengths.
            Vol0 = (1e-4*PCSA) * Lf0; // New calculation of the vol for the specific muscle branch
        };
        #endif

        #if BM_TRUNK_MUSCLES
        AnyMuscleModel IC_Inn_R10R11 = {
            AnyFolder& MuscleParameters = ....Data.unscaled.ModelParameters.Muscles.IntercostalisIntimus.IC_Inn_R10R11;
            AnyIntVar MuscleElemNo = 1; ///< The number of this element of the muscle
            AnyIntVar MuscleElemAmount = MuscleParameters.MuscleElemAmount; ///< The total amount of elements for this muscle
            F0 ??= ...DefaultMusPar.PCSAfactor*PCSA; ///< Maximum force output at optimum fiber length
            Lf0 ??= MuscleParameters.OptimalFiberlength / cos(pi/180*MuscleParameters.Pennationangle); //< Optimal fiber length corrected by pennation angle
            AnyVar PCSA ??= 1e4*...StrengthScaleSpine*MuscleParameters.MuscleVolumeSIScaled/(Lf0); ///< PCSA (cm2) of the individual element is total volumen divided by the sum of muscle element fiber lengths.
            Vol0 = (1e-4*PCSA) * Lf0; // New calculation of the vol for the specific muscle branch
        };
        #endif

        #if BM_TRUNK_MUSCLES
        AnyMuscleModel IC_Inn_R11R12 = {
            AnyFolder& MuscleParameters = ....Data.unscaled.ModelParameters.Muscles.IntercostalisIntimus.IC_Inn_R11R12;
            AnyIntVar MuscleElemNo = 1; ///< The number of this element of the muscle
            AnyIntVar MuscleElemAmount = MuscleParameters.MuscleElemAmount; ///< The total amount of elements for this muscle
            F0 ??= ...DefaultMusPar.PCSAfactor*PCSA; ///< Maximum force output at optimum fiber length
            Lf0 ??= MuscleParameters.OptimalFiberlength / cos(pi/180*MuscleParameters.Pennationangle); //< Optimal fiber length corrected by pennation angle
            AnyVar PCSA ??= 1e4*...StrengthScaleSpine*MuscleParameters.MuscleVolumeSIScaled/(Lf0); ///< PCSA (cm2) of the individual element is total volumen divided by the sum of muscle element fiber lengths.
            Vol0 = (1e-4*PCSA) * Lf0; // New calculation of the vol for the specific muscle branch
        };
        #endif

    };
    AnyFolder LevatorCostarum = {

        #if BM_TRUNK_MUSCLES
        AnyMuscleModel LCBrC7R1 = {
            AnyFolder& MuscleParameters = ....Data.unscaled.ModelParameters.Muscles.LevatorCostarum.LCBrC7R1;
            AnyIntVar MuscleElemNo = 1; ///< The number of this element of the muscle
            AnyIntVar MuscleElemAmount = MuscleParameters.MuscleElemAmount; ///< The total amount of elements for this muscle
            F0 ??= ...DefaultMusPar.PCSAfactor*PCSA; ///< Maximum force output at optimum fiber length
            Lf0 ??= MuscleParameters.OptimalFiberlength / cos(pi/180*MuscleParameters.Pennationangle); //< Optimal fiber length corrected by pennation angle
            AnyVar PCSA ??= 1e4*...StrengthScaleSpine*MuscleParameters.MuscleVolumeSIScaled/(Lf0); ///< PCSA (cm2) of the individual element is total volumen divided by the sum of muscle element fiber lengths.
            Vol0 = (1e-4*PCSA) * Lf0; // New calculation of the vol for the specific muscle branch
        };
        #endif

        #if BM_TRUNK_MUSCLES
        AnyMuscleModel LCBrT1R2 = {
            AnyFolder& MuscleParameters = ....Data.unscaled.ModelParameters.Muscles.LevatorCostarum.LCBrT1R2;
            AnyIntVar MuscleElemNo = 1; ///< The number of this element of the muscle
            AnyIntVar MuscleElemAmount = MuscleParameters.MuscleElemAmount; ///< The total amount of elements for this muscle
            F0 ??= ...DefaultMusPar.PCSAfactor*PCSA; ///< Maximum force output at optimum fiber length
            Lf0 ??= MuscleParameters.OptimalFiberlength / cos(pi/180*MuscleParameters.Pennationangle); //< Optimal fiber length corrected by pennation angle
            AnyVar PCSA ??= 1e4*...StrengthScaleSpine*MuscleParameters.MuscleVolumeSIScaled/(Lf0); ///< PCSA (cm2) of the individual element is total volumen divided by the sum of muscle element fiber lengths.
            Vol0 = (1e-4*PCSA) * Lf0; // New calculation of the vol for the specific muscle branch
        };
        #endif

        #if BM_TRUNK_MUSCLES
        AnyMuscleModel LCBrT2R3 = {
            AnyFolder& MuscleParameters = ....Data.unscaled.ModelParameters.Muscles.LevatorCostarum.LCBrT2R3;
            AnyIntVar MuscleElemNo = 1; ///< The number of this element of the muscle
            AnyIntVar MuscleElemAmount = MuscleParameters.MuscleElemAmount; ///< The total amount of elements for this muscle
            F0 ??= ...DefaultMusPar.PCSAfactor*PCSA; ///< Maximum force output at optimum fiber length
            Lf0 ??= MuscleParameters.OptimalFiberlength / cos(pi/180*MuscleParameters.Pennationangle); //< Optimal fiber length corrected by pennation angle
            AnyVar PCSA ??= 1e4*...StrengthScaleSpine*MuscleParameters.MuscleVolumeSIScaled/(Lf0); ///< PCSA (cm2) of the individual element is total volumen divided by the sum of muscle element fiber lengths.
            Vol0 = (1e-4*PCSA) * Lf0; // New calculation of the vol for the specific muscle branch
        };
        #endif

        #if BM_TRUNK_MUSCLES
        AnyMuscleModel LCBrT3R4 = {
            AnyFolder& MuscleParameters = ....Data.unscaled.ModelParameters.Muscles.LevatorCostarum.LCBrT3R4;
            AnyIntVar MuscleElemNo = 1; ///< The number of this element of the muscle
            AnyIntVar MuscleElemAmount = MuscleParameters.MuscleElemAmount; ///< The total amount of elements for this muscle
            F0 ??= ...DefaultMusPar.PCSAfactor*PCSA; ///< Maximum force output at optimum fiber length
            Lf0 ??= MuscleParameters.OptimalFiberlength / cos(pi/180*MuscleParameters.Pennationangle); //< Optimal fiber length corrected by pennation angle
            AnyVar PCSA ??= 1e4*...StrengthScaleSpine*MuscleParameters.MuscleVolumeSIScaled/(Lf0); ///< PCSA (cm2) of the individual element is total volumen divided by the sum of muscle element fiber lengths.
            Vol0 = (1e-4*PCSA) * Lf0; // New calculation of the vol for the specific muscle branch
        };
        #endif

        #if BM_TRUNK_MUSCLES
        AnyMuscleModel LCBrT4R5 = {
            AnyFolder& MuscleParameters = ....Data.unscaled.ModelParameters.Muscles.LevatorCostarum.LCBrT4R5;
            AnyIntVar MuscleElemNo = 1; ///< The number of this element of the muscle
            AnyIntVar MuscleElemAmount = MuscleParameters.MuscleElemAmount; ///< The total amount of elements for this muscle
            F0 ??= ...DefaultMusPar.PCSAfactor*PCSA; ///< Maximum force output at optimum fiber length
            Lf0 ??= MuscleParameters.OptimalFiberlength / cos(pi/180*MuscleParameters.Pennationangle); //< Optimal fiber length corrected by pennation angle
            AnyVar PCSA ??= 1e4*...StrengthScaleSpine*MuscleParameters.MuscleVolumeSIScaled/(Lf0); ///< PCSA (cm2) of the individual element is total volumen divided by the sum of muscle element fiber lengths.
            Vol0 = (1e-4*PCSA) * Lf0; // New calculation of the vol for the specific muscle branch
        };
        #endif

        #if BM_TRUNK_MUSCLES
        AnyMuscleModel LCBrT5R6 = {
            AnyFolder& MuscleParameters = ....Data.unscaled.ModelParameters.Muscles.LevatorCostarum.LCBrT5R6;
            AnyIntVar MuscleElemNo = 1; ///< The number of this element of the muscle
            AnyIntVar MuscleElemAmount = MuscleParameters.MuscleElemAmount; ///< The total amount of elements for this muscle
            F0 ??= ...DefaultMusPar.PCSAfactor*PCSA; ///< Maximum force output at optimum fiber length
            Lf0 ??= MuscleParameters.OptimalFiberlength / cos(pi/180*MuscleParameters.Pennationangle); //< Optimal fiber length corrected by pennation angle
            AnyVar PCSA ??= 1e4*...StrengthScaleSpine*MuscleParameters.MuscleVolumeSIScaled/(Lf0); ///< PCSA (cm2) of the individual element is total volumen divided by the sum of muscle element fiber lengths.
            Vol0 = (1e-4*PCSA) * Lf0; // New calculation of the vol for the specific muscle branch
        };
        #endif

        #if BM_TRUNK_MUSCLES
        AnyMuscleModel LCBrT6R7 = {
            AnyFolder& MuscleParameters = ....Data.unscaled.ModelParameters.Muscles.LevatorCostarum.LCBrT6R7;
            AnyIntVar MuscleElemNo = 1; ///< The number of this element of the muscle
            AnyIntVar MuscleElemAmount = MuscleParameters.MuscleElemAmount; ///< The total amount of elements for this muscle
            F0 ??= ...DefaultMusPar.PCSAfactor*PCSA; ///< Maximum force output at optimum fiber length
            Lf0 ??= MuscleParameters.OptimalFiberlength / cos(pi/180*MuscleParameters.Pennationangle); //< Optimal fiber length corrected by pennation angle
            AnyVar PCSA ??= 1e4*...StrengthScaleSpine*MuscleParameters.MuscleVolumeSIScaled/(Lf0); ///< PCSA (cm2) of the individual element is total volumen divided by the sum of muscle element fiber lengths.
            Vol0 = (1e-4*PCSA) * Lf0; // New calculation of the vol for the specific muscle branch
        };
        #endif

        #if BM_TRUNK_MUSCLES
        AnyMuscleModel LCBrT7R8 = {
            AnyFolder& MuscleParameters = ....Data.unscaled.ModelParameters.Muscles.LevatorCostarum.LCBrT7R8;
            AnyIntVar MuscleElemNo = 1; ///< The number of this element of the muscle
            AnyIntVar MuscleElemAmount = MuscleParameters.MuscleElemAmount; ///< The total amount of elements for this muscle
            F0 ??= ...DefaultMusPar.PCSAfactor*PCSA; ///< Maximum force output at optimum fiber length
            Lf0 ??= MuscleParameters.OptimalFiberlength / cos(pi/180*MuscleParameters.Pennationangle); //< Optimal fiber length corrected by pennation angle
            AnyVar PCSA ??= 1e4*...StrengthScaleSpine*MuscleParameters.MuscleVolumeSIScaled/(Lf0); ///< PCSA (cm2) of the individual element is total volumen divided by the sum of muscle element fiber lengths.
            Vol0 = (1e-4*PCSA) * Lf0; // New calculation of the vol for the specific muscle branch
        };
        #endif

        #if BM_TRUNK_MUSCLES
        AnyMuscleModel LCBrT8R9 = {
            AnyFolder& MuscleParameters = ....Data.unscaled.ModelParameters.Muscles.LevatorCostarum.LCBrT8R9;
            AnyIntVar MuscleElemNo = 1; ///< The number of this element of the muscle
            AnyIntVar MuscleElemAmount = MuscleParameters.MuscleElemAmount; ///< The total amount of elements for this muscle
            F0 ??= ...DefaultMusPar.PCSAfactor*PCSA; ///< Maximum force output at optimum fiber length
            Lf0 ??= MuscleParameters.OptimalFiberlength / cos(pi/180*MuscleParameters.Pennationangle); //< Optimal fiber length corrected by pennation angle
            AnyVar PCSA ??= 1e4*...StrengthScaleSpine*MuscleParameters.MuscleVolumeSIScaled/(Lf0); ///< PCSA (cm2) of the individual element is total volumen divided by the sum of muscle element fiber lengths.
            Vol0 = (1e-4*PCSA) * Lf0; // New calculation of the vol for the specific muscle branch
        };
        #endif

        #if BM_TRUNK_MUSCLES
        AnyMuscleModel LCBrT9R10 = {
            AnyFolder& MuscleParameters = ....Data.unscaled.ModelParameters.Muscles.LevatorCostarum.LCBrT9R10;
            AnyIntVar MuscleElemNo = 1; ///< The number of this element of the muscle
            AnyIntVar MuscleElemAmount = MuscleParameters.MuscleElemAmount; ///< The total amount of elements for this muscle
            F0 ??= ...DefaultMusPar.PCSAfactor*PCSA; ///< Maximum force output at optimum fiber length
            Lf0 ??= MuscleParameters.OptimalFiberlength / cos(pi/180*MuscleParameters.Pennationangle); //< Optimal fiber length corrected by pennation angle
            AnyVar PCSA ??= 1e4*...StrengthScaleSpine*MuscleParameters.MuscleVolumeSIScaled/(Lf0); ///< PCSA (cm2) of the individual element is total volumen divided by the sum of muscle element fiber lengths.
            Vol0 = (1e-4*PCSA) * Lf0; // New calculation of the vol for the specific muscle branch
        };
        #endif

        #if BM_TRUNK_MUSCLES
        AnyMuscleModel LCBrT10R11 = {
            AnyFolder& MuscleParameters = ....Data.unscaled.ModelParameters.Muscles.LevatorCostarum.LCBrT10R11;
            AnyIntVar MuscleElemNo = 1; ///< The number of this element of the muscle
            AnyIntVar MuscleElemAmount = MuscleParameters.MuscleElemAmount; ///< The total amount of elements for this muscle
            F0 ??= ...DefaultMusPar.PCSAfactor*PCSA; ///< Maximum force output at optimum fiber length
            Lf0 ??= MuscleParameters.OptimalFiberlength / cos(pi/180*MuscleParameters.Pennationangle); //< Optimal fiber length corrected by pennation angle
            AnyVar PCSA ??= 1e4*...StrengthScaleSpine*MuscleParameters.MuscleVolumeSIScaled/(Lf0); ///< PCSA (cm2) of the individual element is total volumen divided by the sum of muscle element fiber lengths.
            Vol0 = (1e-4*PCSA) * Lf0; // New calculation of the vol for the specific muscle branch
        };
        #endif

        #if BM_TRUNK_MUSCLES
        AnyMuscleModel LCBrT11R12 = {
            AnyFolder& MuscleParameters = ....Data.unscaled.ModelParameters.Muscles.LevatorCostarum.LCBrT11R12;
            AnyIntVar MuscleElemNo = 1; ///< The number of this element of the muscle
            AnyIntVar MuscleElemAmount = MuscleParameters.MuscleElemAmount; ///< The total amount of elements for this muscle
            F0 ??= ...DefaultMusPar.PCSAfactor*PCSA; ///< Maximum force output at optimum fiber length
            Lf0 ??= MuscleParameters.OptimalFiberlength / cos(pi/180*MuscleParameters.Pennationangle); //< Optimal fiber length corrected by pennation angle
            AnyVar PCSA ??= 1e4*...StrengthScaleSpine*MuscleParameters.MuscleVolumeSIScaled/(Lf0); ///< PCSA (cm2) of the individual element is total volumen divided by the sum of muscle element fiber lengths.
            Vol0 = (1e-4*PCSA) * Lf0; // New calculation of the vol for the specific muscle branch
        };
        #endif

        #if BM_TRUNK_MUSCLES
        AnyMuscleModel LCLgT5R7 = {
            AnyFolder& MuscleParameters = ....Data.unscaled.ModelParameters.Muscles.LevatorCostarum.LCLgT5R7;
            AnyIntVar MuscleElemNo = 1; ///< The number of this element of the muscle
            AnyIntVar MuscleElemAmount = MuscleParameters.MuscleElemAmount; ///< The total amount of elements for this muscle
            F0 ??= ...DefaultMusPar.PCSAfactor*PCSA; ///< Maximum force output at optimum fiber length
            Lf0 ??= MuscleParameters.OptimalFiberlength / cos(pi/180*MuscleParameters.Pennationangle); //< Optimal fiber length corrected by pennation angle
            AnyVar PCSA ??= 1e4*...StrengthScaleSpine*MuscleParameters.MuscleVolumeSIScaled/(Lf0); ///< PCSA (cm2) of the individual element is total volumen divided by the sum of muscle element fiber lengths.
            Vol0 = (1e-4*PCSA) * Lf0; // New calculation of the vol for the specific muscle branch
        };
        #endif

        #if BM_TRUNK_MUSCLES
        AnyMuscleModel LCLgT6R8 = {
            AnyFolder& MuscleParameters = ....Data.unscaled.ModelParameters.Muscles.LevatorCostarum.LCLgT6R8;
            AnyIntVar MuscleElemNo = 1; ///< The number of this element of the muscle
            AnyIntVar MuscleElemAmount = MuscleParameters.MuscleElemAmount; ///< The total amount of elements for this muscle
            F0 ??= ...DefaultMusPar.PCSAfactor*PCSA; ///< Maximum force output at optimum fiber length
            Lf0 ??= MuscleParameters.OptimalFiberlength / cos(pi/180*MuscleParameters.Pennationangle); //< Optimal fiber length corrected by pennation angle
            AnyVar PCSA ??= 1e4*...StrengthScaleSpine*MuscleParameters.MuscleVolumeSIScaled/(Lf0); ///< PCSA (cm2) of the individual element is total volumen divided by the sum of muscle element fiber lengths.
            Vol0 = (1e-4*PCSA) * Lf0; // New calculation of the vol for the specific muscle branch
        };
        #endif

        #if BM_TRUNK_MUSCLES
        AnyMuscleModel LCLgT7R9 = {
            AnyFolder& MuscleParameters = ....Data.unscaled.ModelParameters.Muscles.LevatorCostarum.LCLgT7R9;
            AnyIntVar MuscleElemNo = 1; ///< The number of this element of the muscle
            AnyIntVar MuscleElemAmount = MuscleParameters.MuscleElemAmount; ///< The total amount of elements for this muscle
            F0 ??= ...DefaultMusPar.PCSAfactor*PCSA; ///< Maximum force output at optimum fiber length
            Lf0 ??= MuscleParameters.OptimalFiberlength / cos(pi/180*MuscleParameters.Pennationangle); //< Optimal fiber length corrected by pennation angle
            AnyVar PCSA ??= 1e4*...StrengthScaleSpine*MuscleParameters.MuscleVolumeSIScaled/(Lf0); ///< PCSA (cm2) of the individual element is total volumen divided by the sum of muscle element fiber lengths.
            Vol0 = (1e-4*PCSA) * Lf0; // New calculation of the vol for the specific muscle branch
        };
        #endif

        #if BM_TRUNK_MUSCLES
        AnyMuscleModel LCLgT8R10 = {
            AnyFolder& MuscleParameters = ....Data.unscaled.ModelParameters.Muscles.LevatorCostarum.LCLgT8R10;
            AnyIntVar MuscleElemNo = 1; ///< The number of this element of the muscle
            AnyIntVar MuscleElemAmount = MuscleParameters.MuscleElemAmount; ///< The total amount of elements for this muscle
            F0 ??= ...DefaultMusPar.PCSAfactor*PCSA; ///< Maximum force output at optimum fiber length
            Lf0 ??= MuscleParameters.OptimalFiberlength / cos(pi/180*MuscleParameters.Pennationangle); //< Optimal fiber length corrected by pennation angle
            AnyVar PCSA ??= 1e4*...StrengthScaleSpine*MuscleParameters.MuscleVolumeSIScaled/(Lf0); ///< PCSA (cm2) of the individual element is total volumen divided by the sum of muscle element fiber lengths.
            Vol0 = (1e-4*PCSA) * Lf0; // New calculation of the vol for the specific muscle branch
        };
        #endif

        #if BM_TRUNK_MUSCLES
        AnyMuscleModel LCLgT9R11 = {
            AnyFolder& MuscleParameters = ....Data.unscaled.ModelParameters.Muscles.LevatorCostarum.LCLgT9R11;
            AnyIntVar MuscleElemNo = 1; ///< The number of this element of the muscle
            AnyIntVar MuscleElemAmount = MuscleParameters.MuscleElemAmount; ///< The total amount of elements for this muscle
            F0 ??= ...DefaultMusPar.PCSAfactor*PCSA; ///< Maximum force output at optimum fiber length
            Lf0 ??= MuscleParameters.OptimalFiberlength / cos(pi/180*MuscleParameters.Pennationangle); //< Optimal fiber length corrected by pennation angle
            AnyVar PCSA ??= 1e4*...StrengthScaleSpine*MuscleParameters.MuscleVolumeSIScaled/(Lf0); ///< PCSA (cm2) of the individual element is total volumen divided by the sum of muscle element fiber lengths.
            Vol0 = (1e-4*PCSA) * Lf0; // New calculation of the vol for the specific muscle branch
        };
        #endif

        #if BM_TRUNK_MUSCLES
        AnyMuscleModel LCLgT10R12 = {
            AnyFolder& MuscleParameters = ....Data.unscaled.ModelParameters.Muscles.LevatorCostarum.LCLgT10R12;
            AnyIntVar MuscleElemNo = 1; ///< The number of this element of the muscle
            AnyIntVar MuscleElemAmount = MuscleParameters.MuscleElemAmount; ///< The total amount of elements for this muscle
            F0 ??= ...DefaultMusPar.PCSAfactor*PCSA; ///< Maximum force output at optimum fiber length
            Lf0 ??= MuscleParameters.OptimalFiberlength / cos(pi/180*MuscleParameters.Pennationangle); //< Optimal fiber length corrected by pennation angle
            AnyVar PCSA ??= 1e4*...StrengthScaleSpine*MuscleParameters.MuscleVolumeSIScaled/(Lf0); ///< PCSA (cm2) of the individual element is total volumen divided by the sum of muscle element fiber lengths.
            Vol0 = (1e-4*PCSA) * Lf0; // New calculation of the vol for the specific muscle branch
        };
        #endif

    };

    AnyFolder LongissimusCapitis = {

        #if BM_TRUNK_MUSCLES
        AnyMuscleModel LongissimusCapitisC3C0 = {
            AnyFolder& MuscleParameters = ....Data.unscaled.ModelParameters.Muscles.LongissimusCapitis.LongissimusCapitisC3C0;
            AnyIntVar MuscleElemNo = 1; ///< The number of this element of the muscle
            AnyIntVar MuscleElemAmount = MuscleParameters.MuscleElemAmount; ///< The total amount of elements for this muscle
            F0 ??= ...DefaultMusPar.PCSAfactor*PCSA; ///< Maximum force output at optimum fiber length
            Lf0 ??= MuscleParameters.OptimalFiberlength / cos(pi/180*MuscleParameters.Pennationangle); //< Optimal fiber length corrected by pennation angle
            AnyVar PCSA ??= 1e4*...StrengthScaleSpine*MuscleParameters.MuscleVolumeSIScaled/(Lf0); ///< PCSA (cm2) of the individual element is total volumen divided by the sum of muscle element fiber lengths.
            Vol0 = (1e-4*PCSA) * Lf0; // New calculation of the vol for the specific muscle branch
        };
        #endif

        #if BM_TRUNK_MUSCLES
        AnyMuscleModel LongissimusCapitisC4C0 = {
            AnyFolder& MuscleParameters = ....Data.unscaled.ModelParameters.Muscles.LongissimusCapitis.LongissimusCapitisC4C0;
            AnyIntVar MuscleElemNo = 1; ///< The number of this element of the muscle
            AnyIntVar MuscleElemAmount = MuscleParameters.MuscleElemAmount; ///< The total amount of elements for this muscle
            F0 ??= ...DefaultMusPar.PCSAfactor*PCSA; ///< Maximum force output at optimum fiber length
            Lf0 ??= MuscleParameters.OptimalFiberlength / cos(pi/180*MuscleParameters.Pennationangle); //< Optimal fiber length corrected by pennation angle
            AnyVar PCSA ??= 1e4*...StrengthScaleSpine*MuscleParameters.MuscleVolumeSIScaled/(Lf0); ///< PCSA (cm2) of the individual element is total volumen divided by the sum of muscle element fiber lengths.
            Vol0 = (1e-4*PCSA) * Lf0; // New calculation of the vol for the specific muscle branch
        };
        #endif

        #if BM_TRUNK_MUSCLES
        AnyMuscleModel LongissimusCapitisC5C0 = {
            AnyFolder& MuscleParameters = ....Data.unscaled.ModelParameters.Muscles.LongissimusCapitis.LongissimusCapitisC5C0;
            AnyIntVar MuscleElemNo = 1; ///< The number of this element of the muscle
            AnyIntVar MuscleElemAmount = MuscleParameters.MuscleElemAmount; ///< The total amount of elements for this muscle
            F0 ??= ...DefaultMusPar.PCSAfactor*PCSA; ///< Maximum force output at optimum fiber length
            Lf0 ??= MuscleParameters.OptimalFiberlength / cos(pi/180*MuscleParameters.Pennationangle); //< Optimal fiber length corrected by pennation angle
            AnyVar PCSA ??= 1e4*...StrengthScaleSpine*MuscleParameters.MuscleVolumeSIScaled/(Lf0); ///< PCSA (cm2) of the individual element is total volumen divided by the sum of muscle element fiber lengths.
            Vol0 = (1e-4*PCSA) * Lf0; // New calculation of the vol for the specific muscle branch
        };
        #endif

        #if BM_TRUNK_MUSCLES
        AnyMuscleModel LongissimusCapitisC6C0 = {
            AnyFolder& MuscleParameters = ....Data.unscaled.ModelParameters.Muscles.LongissimusCapitis.LongissimusCapitisC6C0;
            AnyIntVar MuscleElemNo = 1; ///< The number of this element of the muscle
            AnyIntVar MuscleElemAmount = MuscleParameters.MuscleElemAmount; ///< The total amount of elements for this muscle
            F0 ??= ...DefaultMusPar.PCSAfactor*PCSA; ///< Maximum force output at optimum fiber length
            Lf0 ??= MuscleParameters.OptimalFiberlength / cos(pi/180*MuscleParameters.Pennationangle); //< Optimal fiber length corrected by pennation angle
            AnyVar PCSA ??= 1e4*...StrengthScaleSpine*MuscleParameters.MuscleVolumeSIScaled/(Lf0); ///< PCSA (cm2) of the individual element is total volumen divided by the sum of muscle element fiber lengths.
            Vol0 = (1e-4*PCSA) * Lf0; // New calculation of the vol for the specific muscle branch
        };
        #endif

        #if BM_TRUNK_MUSCLES
        AnyMuscleModel LongissimusCapitisC7C0 = {
            AnyFolder& MuscleParameters = ....Data.unscaled.ModelParameters.Muscles.LongissimusCapitis.LongissimusCapitisC7C0;
            AnyIntVar MuscleElemNo = 1; ///< The number of this element of the muscle
            AnyIntVar MuscleElemAmount = MuscleParameters.MuscleElemAmount; ///< The total amount of elements for this muscle
            F0 ??= ...DefaultMusPar.PCSAfactor*PCSA; ///< Maximum force output at optimum fiber length
            Lf0 ??= MuscleParameters.OptimalFiberlength / cos(pi/180*MuscleParameters.Pennationangle); //< Optimal fiber length corrected by pennation angle
            AnyVar PCSA ??= 1e4*...StrengthScaleSpine*MuscleParameters.MuscleVolumeSIScaled/(Lf0); ///< PCSA (cm2) of the individual element is total volumen divided by the sum of muscle element fiber lengths.
            Vol0 = (1e-4*PCSA) * Lf0; // New calculation of the vol for the specific muscle branch
        };
        #endif

        #if BM_TRUNK_MUSCLES
        AnyMuscleModel LongissimusCapitisT1C0 = {
            AnyFolder& MuscleParameters = ....Data.unscaled.ModelParameters.Muscles.LongissimusCapitis.LongissimusCapitisT1C0;
            AnyIntVar MuscleElemNo = 1; ///< The number of this element of the muscle
            AnyIntVar MuscleElemAmount = MuscleParameters.MuscleElemAmount; ///< The total amount of elements for this muscle
            F0 ??= ...DefaultMusPar.PCSAfactor*PCSA; ///< Maximum force output at optimum fiber length
            Lf0 ??= MuscleParameters.OptimalFiberlength / cos(pi/180*MuscleParameters.Pennationangle); //< Optimal fiber length corrected by pennation angle
            AnyVar PCSA ??= 1e4*...StrengthScaleSpine*MuscleParameters.MuscleVolumeSIScaled/(Lf0); ///< PCSA (cm2) of the individual element is total volumen divided by the sum of muscle element fiber lengths.
            Vol0 = (1e-4*PCSA) * Lf0; // New calculation of the vol for the specific muscle branch
        };
        #endif

        #if BM_TRUNK_MUSCLES
        AnyMuscleModel LongissimusCapitisT2C0 = {
            AnyFolder& MuscleParameters = ....Data.unscaled.ModelParameters.Muscles.LongissimusCapitis.LongissimusCapitisT2C0;
            AnyIntVar MuscleElemNo = 1; ///< The number of this element of the muscle
            AnyIntVar MuscleElemAmount = MuscleParameters.MuscleElemAmount; ///< The total amount of elements for this muscle
            F0 ??= ...DefaultMusPar.PCSAfactor*PCSA; ///< Maximum force output at optimum fiber length
            Lf0 ??= MuscleParameters.OptimalFiberlength / cos(pi/180*MuscleParameters.Pennationangle); //< Optimal fiber length corrected by pennation angle
            AnyVar PCSA ??= 1e4*...StrengthScaleSpine*MuscleParameters.MuscleVolumeSIScaled/(Lf0); ///< PCSA (cm2) of the individual element is total volumen divided by the sum of muscle element fiber lengths.
            Vol0 = (1e-4*PCSA) * Lf0; // New calculation of the vol for the specific muscle branch
        };
        #endif

        #if BM_TRUNK_MUSCLES
        AnyMuscleModel LongissimusCapitisT3C0 = {
            AnyFolder& MuscleParameters = ....Data.unscaled.ModelParameters.Muscles.LongissimusCapitis.LongissimusCapitisT3C0;
            AnyIntVar MuscleElemNo = 1; ///< The number of this element of the muscle
            AnyIntVar MuscleElemAmount = MuscleParameters.MuscleElemAmount; ///< The total amount of elements for this muscle
            F0 ??= ...DefaultMusPar.PCSAfactor*PCSA; ///< Maximum force output at optimum fiber length
            Lf0 ??= MuscleParameters.OptimalFiberlength / cos(pi/180*MuscleParameters.Pennationangle); //< Optimal fiber length corrected by pennation angle
            AnyVar PCSA ??= 1e4*...StrengthScaleSpine*MuscleParameters.MuscleVolumeSIScaled/(Lf0); ///< PCSA (cm2) of the individual element is total volumen divided by the sum of muscle element fiber lengths.
            Vol0 = (1e-4*PCSA) * Lf0; // New calculation of the vol for the specific muscle branch
        };
        #endif

        #if BM_TRUNK_MUSCLES
        AnyMuscleModel LongissimusCapitisT4C0 = {
            AnyFolder& MuscleParameters = ....Data.unscaled.ModelParameters.Muscles.LongissimusCapitis.LongissimusCapitisT4C0;
            AnyIntVar MuscleElemNo = 1; ///< The number of this element of the muscle
            AnyIntVar MuscleElemAmount = MuscleParameters.MuscleElemAmount; ///< The total amount of elements for this muscle
            F0 ??= ...DefaultMusPar.PCSAfactor*PCSA; ///< Maximum force output at optimum fiber length
            Lf0 ??= MuscleParameters.OptimalFiberlength / cos(pi/180*MuscleParameters.Pennationangle); //< Optimal fiber length corrected by pennation angle
            AnyVar PCSA ??= 1e4*...StrengthScaleSpine*MuscleParameters.MuscleVolumeSIScaled/(Lf0); ///< PCSA (cm2) of the individual element is total volumen divided by the sum of muscle element fiber lengths.
            Vol0 = (1e-4*PCSA) * Lf0; // New calculation of the vol for the specific muscle branch
        };
        #endif

        #if BM_TRUNK_MUSCLES
        AnyMuscleModel LongissimusCapitisT5C0 = {
            AnyFolder& MuscleParameters = ....Data.unscaled.ModelParameters.Muscles.LongissimusCapitis.LongissimusCapitisT5C0;
            AnyIntVar MuscleElemNo = 1; ///< The number of this element of the muscle
            AnyIntVar MuscleElemAmount = MuscleParameters.MuscleElemAmount; ///< The total amount of elements for this muscle
            F0 ??= ...DefaultMusPar.PCSAfactor*PCSA; ///< Maximum force output at optimum fiber length
            Lf0 ??= MuscleParameters.OptimalFiberlength / cos(pi/180*MuscleParameters.Pennationangle); //< Optimal fiber length corrected by pennation angle
            AnyVar PCSA ??= 1e4*...StrengthScaleSpine*MuscleParameters.MuscleVolumeSIScaled/(Lf0); ///< PCSA (cm2) of the individual element is total volumen divided by the sum of muscle element fiber lengths.
            Vol0 = (1e-4*PCSA) * Lf0; // New calculation of the vol for the specific muscle branch
        };
        #endif

    };

    AnyFolder LongissimusCervicis = {

        #if BM_TRUNK_MUSCLES
        AnyMuscleModel LongissimusCervicisT1C2 = {
            AnyFolder& MuscleParameters = ....Data.unscaled.ModelParameters.Muscles.LongissimusCervicis.LongissimusCervicisT1C2;
            AnyIntVar MuscleElemNo = 1; ///< The number of this element of the muscle
            AnyIntVar MuscleElemAmount = MuscleParameters.MuscleElemAmount; ///< The total amount of elements for this muscle
            F0 ??= ...DefaultMusPar.PCSAfactor*PCSA; ///< Maximum force output at optimum fiber length
            Lf0 ??= MuscleParameters.OptimalFiberlength / cos(pi/180*MuscleParameters.Pennationangle); //< Optimal fiber length corrected by pennation angle
            AnyVar PCSA ??= 1e4*...StrengthScaleSpine*MuscleParameters.MuscleVolumeSIScaled/(Lf0); ///< PCSA (cm2) of the individual element is total volumen divided by the sum of muscle element fiber lengths.
            Vol0 = (1e-4*PCSA) * Lf0; // New calculation of the vol for the specific muscle branch
        };
        #endif

        #if BM_TRUNK_MUSCLES
        AnyMuscleModel LongissimusCervicisT2C3 = {
            AnyFolder& MuscleParameters = ....Data.unscaled.ModelParameters.Muscles.LongissimusCervicis.LongissimusCervicisT2C3;
            AnyIntVar MuscleElemNo = 1; ///< The number of this element of the muscle
            AnyIntVar MuscleElemAmount = MuscleParameters.MuscleElemAmount; ///< The total amount of elements for this muscle
            F0 ??= ...DefaultMusPar.PCSAfactor*PCSA; ///< Maximum force output at optimum fiber length
            Lf0 ??= MuscleParameters.OptimalFiberlength / cos(pi/180*MuscleParameters.Pennationangle); //< Optimal fiber length corrected by pennation angle
            AnyVar PCSA ??= 1e4*...StrengthScaleSpine*MuscleParameters.MuscleVolumeSIScaled/(Lf0); ///< PCSA (cm2) of the individual element is total volumen divided by the sum of muscle element fiber lengths.
            Vol0 = (1e-4*PCSA) * Lf0; // New calculation of the vol for the specific muscle branch
        };
        #endif

        #if BM_TRUNK_MUSCLES
        AnyMuscleModel LongissimusCervicisT3C4 = {
            AnyFolder& MuscleParameters = ....Data.unscaled.ModelParameters.Muscles.LongissimusCervicis.LongissimusCervicisT3C4;
            AnyIntVar MuscleElemNo = 1; ///< The number of this element of the muscle
            AnyIntVar MuscleElemAmount = MuscleParameters.MuscleElemAmount; ///< The total amount of elements for this muscle
            F0 ??= ...DefaultMusPar.PCSAfactor*PCSA; ///< Maximum force output at optimum fiber length
            Lf0 ??= MuscleParameters.OptimalFiberlength / cos(pi/180*MuscleParameters.Pennationangle); //< Optimal fiber length corrected by pennation angle
            AnyVar PCSA ??= 1e4*...StrengthScaleSpine*MuscleParameters.MuscleVolumeSIScaled/(Lf0); ///< PCSA (cm2) of the individual element is total volumen divided by the sum of muscle element fiber lengths.
            Vol0 = (1e-4*PCSA) * Lf0; // New calculation of the vol for the specific muscle branch
        };
        #endif

        #if BM_TRUNK_MUSCLES
        AnyMuscleModel LongissimusCervicisT4C5 = {
            AnyFolder& MuscleParameters = ....Data.unscaled.ModelParameters.Muscles.LongissimusCervicis.LongissimusCervicisT4C5;
            AnyIntVar MuscleElemNo = 1; ///< The number of this element of the muscle
            AnyIntVar MuscleElemAmount = MuscleParameters.MuscleElemAmount; ///< The total amount of elements for this muscle
            F0 ??= ...DefaultMusPar.PCSAfactor*PCSA; ///< Maximum force output at optimum fiber length
            Lf0 ??= MuscleParameters.OptimalFiberlength / cos(pi/180*MuscleParameters.Pennationangle); //< Optimal fiber length corrected by pennation angle
            AnyVar PCSA ??= 1e4*...StrengthScaleSpine*MuscleParameters.MuscleVolumeSIScaled/(Lf0); ///< PCSA (cm2) of the individual element is total volumen divided by the sum of muscle element fiber lengths.
            Vol0 = (1e-4*PCSA) * Lf0; // New calculation of the vol for the specific muscle branch
        };
        #endif

        #if BM_TRUNK_MUSCLES
        AnyMuscleModel LongissimusCervicisT5C6 = {
            AnyFolder& MuscleParameters = ....Data.unscaled.ModelParameters.Muscles.LongissimusCervicis.LongissimusCervicisT5C6;
            AnyIntVar MuscleElemNo = 1; ///< The number of this element of the muscle
            AnyIntVar MuscleElemAmount = MuscleParameters.MuscleElemAmount; ///< The total amount of elements for this muscle
            F0 ??= ...DefaultMusPar.PCSAfactor*PCSA; ///< Maximum force output at optimum fiber length
            Lf0 ??= MuscleParameters.OptimalFiberlength / cos(pi/180*MuscleParameters.Pennationangle); //< Optimal fiber length corrected by pennation angle
            AnyVar PCSA ??= 1e4*...StrengthScaleSpine*MuscleParameters.MuscleVolumeSIScaled/(Lf0); ///< PCSA (cm2) of the individual element is total volumen divided by the sum of muscle element fiber lengths.
            Vol0 = (1e-4*PCSA) * Lf0; // New calculation of the vol for the specific muscle branch
        };
        #endif

    };

    AnyFolder LongissimusThoracis = {

        #if BM_TRUNK_MUSCLES
        AnyMuscleModel LTplL1SIPS = {
            AnyFolder& MuscleParameters = ....Data.unscaled.ModelParameters.Muscles.LongissimusThoracis.LTplL1SIPS;
            AnyIntVar MuscleElemNo = 1; ///< The number of this element of the muscle
            AnyIntVar MuscleElemAmount = MuscleParameters.MuscleElemAmount; ///< The total amount of elements for this muscle
            F0 ??= ...DefaultMusPar.PCSAfactor*PCSA; ///< Maximum force output at optimum fiber length
            Lf0 ??= MuscleParameters.OptimalFiberlength / cos(pi/180*MuscleParameters.Pennationangle); //< Optimal fiber length corrected by pennation angle
            AnyVar PCSA ??= 1e4*...StrengthScaleSpine*MuscleParameters.MuscleVolumeSIScaled/(Lf0); ///< PCSA (cm2) of the individual element is total volumen divided by the sum of muscle element fiber lengths.
            Vol0 = (1e-4*PCSA) * Lf0; // New calculation of the vol for the specific muscle branch
        };
        #endif

        #if BM_TRUNK_MUSCLES
        AnyMuscleModel LTplL2SIPS = {
            AnyFolder& MuscleParameters = ....Data.unscaled.ModelParameters.Muscles.LongissimusThoracis.LTplL2SIPS;
            AnyIntVar MuscleElemNo = 1; ///< The number of this element of the muscle
            AnyIntVar MuscleElemAmount = MuscleParameters.MuscleElemAmount; ///< The total amount of elements for this muscle
            F0 ??= ...DefaultMusPar.PCSAfactor*PCSA; ///< Maximum force output at optimum fiber length
            Lf0 ??= MuscleParameters.OptimalFiberlength / cos(pi/180*MuscleParameters.Pennationangle); //< Optimal fiber length corrected by pennation angle
            AnyVar PCSA ??= 1e4*...StrengthScaleSpine*MuscleParameters.MuscleVolumeSIScaled/(Lf0); ///< PCSA (cm2) of the individual element is total volumen divided by the sum of muscle element fiber lengths.
            Vol0 = (1e-4*PCSA) * Lf0; // New calculation of the vol for the specific muscle branch
        };
        #endif

        #if BM_TRUNK_MUSCLES
        AnyMuscleModel LTplL3SIPS = {
            AnyFolder& MuscleParameters = ....Data.unscaled.ModelParameters.Muscles.LongissimusThoracis.LTplL3SIPS;
            AnyIntVar MuscleElemNo = 1; ///< The number of this element of the muscle
            AnyIntVar MuscleElemAmount = MuscleParameters.MuscleElemAmount; ///< The total amount of elements for this muscle
            F0 ??= ...DefaultMusPar.PCSAfactor*PCSA; ///< Maximum force output at optimum fiber length
            Lf0 ??= MuscleParameters.OptimalFiberlength / cos(pi/180*MuscleParameters.Pennationangle); //< Optimal fiber length corrected by pennation angle
            AnyVar PCSA ??= 1e4*...StrengthScaleSpine*MuscleParameters.MuscleVolumeSIScaled/(Lf0); ///< PCSA (cm2) of the individual element is total volumen divided by the sum of muscle element fiber lengths.
            Vol0 = (1e-4*PCSA) * Lf0; // New calculation of the vol for the specific muscle branch
        };
        #endif

        #if BM_TRUNK_MUSCLES
        AnyMuscleModel LTplL4SIPS = {
            AnyFolder& MuscleParameters = ....Data.unscaled.ModelParameters.Muscles.LongissimusThoracis.LTplL4SIPS;
            AnyIntVar MuscleElemNo = 1; ///< The number of this element of the muscle
            AnyIntVar MuscleElemAmount = MuscleParameters.MuscleElemAmount; ///< The total amount of elements for this muscle
            F0 ??= ...DefaultMusPar.PCSAfactor*PCSA; ///< Maximum force output at optimum fiber length
            Lf0 ??= MuscleParameters.OptimalFiberlength / cos(pi/180*MuscleParameters.Pennationangle); //< Optimal fiber length corrected by pennation angle
            AnyVar PCSA ??= 1e4*...StrengthScaleSpine*MuscleParameters.MuscleVolumeSIScaled/(Lf0); ///< PCSA (cm2) of the individual element is total volumen divided by the sum of muscle element fiber lengths.
            Vol0 = (1e-4*PCSA) * Lf0; // New calculation of the vol for the specific muscle branch
        };
        #endif

        #if BM_TRUNK_MUSCLES
        AnyMuscleModel LTplL5Ilium = {
            AnyFolder& MuscleParameters = ....Data.unscaled.ModelParameters.Muscles.LongissimusThoracis.LTplL5Ilium;
            AnyIntVar MuscleElemNo = 1; ///< The number of this element of the muscle
            AnyIntVar MuscleElemAmount = MuscleParameters.MuscleElemAmount; ///< The total amount of elements for this muscle
            F0 ??= ...DefaultMusPar.PCSAfactor*PCSA; ///< Maximum force output at optimum fiber length
            Lf0 ??= MuscleParameters.OptimalFiberlength / cos(pi/180*MuscleParameters.Pennationangle); //< Optimal fiber length corrected by pennation angle
            AnyVar PCSA ??= 1e4*...StrengthScaleSpine*MuscleParameters.MuscleVolumeSIScaled/(Lf0); ///< PCSA (cm2) of the individual element is total volumen divided by the sum of muscle element fiber lengths.
            Vol0 = (1e-4*PCSA) * Lf0; // New calculation of the vol for the specific muscle branch
        };
        #endif

        #if BM_TRUNK_MUSCLES
        AnyMuscleModel LTptT1L1 = {
            AnyFolder& MuscleParameters = ....Data.unscaled.ModelParameters.Muscles.LongissimusThoracis.LTptT1L1;
            AnyIntVar MuscleElemNo = 1; ///< The number of this element of the muscle
            AnyIntVar MuscleElemAmount = MuscleParameters.MuscleElemAmount; ///< The total amount of elements for this muscle
            F0 ??= ...DefaultMusPar.PCSAfactor*PCSA; ///< Maximum force output at optimum fiber length
            Lf0 ??= MuscleParameters.OptimalFiberlength / cos(pi/180*MuscleParameters.Pennationangle); //< Optimal fiber length corrected by pennation angle
            AnyVar PCSA ??= 1e4*...StrengthScaleSpine*MuscleParameters.MuscleVolumeSIScaled/(Lf0); ///< PCSA (cm2) of the individual element is total volumen divided by the sum of muscle element fiber lengths.
            Vol0 = (1e-4*PCSA) * Lf0; // New calculation of the vol for the specific muscle branch
        };
        #endif

        #if BM_TRUNK_MUSCLES
        AnyMuscleModel LTptT2L2 = {
            AnyFolder& MuscleParameters = ....Data.unscaled.ModelParameters.Muscles.LongissimusThoracis.LTptT2L2;
            AnyIntVar MuscleElemNo = 1; ///< The number of this element of the muscle
            AnyIntVar MuscleElemAmount = MuscleParameters.MuscleElemAmount; ///< The total amount of elements for this muscle
            F0 ??= ...DefaultMusPar.PCSAfactor*PCSA; ///< Maximum force output at optimum fiber length
            Lf0 ??= MuscleParameters.OptimalFiberlength / cos(pi/180*MuscleParameters.Pennationangle); //< Optimal fiber length corrected by pennation angle
            AnyVar PCSA ??= 1e4*...StrengthScaleSpine*MuscleParameters.MuscleVolumeSIScaled/(Lf0); ///< PCSA (cm2) of the individual element is total volumen divided by the sum of muscle element fiber lengths.
            Vol0 = (1e-4*PCSA) * Lf0; // New calculation of the vol for the specific muscle branch
        };
        #endif

        #if BM_TRUNK_MUSCLES
        AnyMuscleModel LTptT3L3 = {
            AnyFolder& MuscleParameters = ....Data.unscaled.ModelParameters.Muscles.LongissimusThoracis.LTptT3L3;
            AnyIntVar MuscleElemNo = 1; ///< The number of this element of the muscle
            AnyIntVar MuscleElemAmount = MuscleParameters.MuscleElemAmount; ///< The total amount of elements for this muscle
            F0 ??= ...DefaultMusPar.PCSAfactor*PCSA; ///< Maximum force output at optimum fiber length
            Lf0 ??= MuscleParameters.OptimalFiberlength / cos(pi/180*MuscleParameters.Pennationangle); //< Optimal fiber length corrected by pennation angle
            AnyVar PCSA ??= 1e4*...StrengthScaleSpine*MuscleParameters.MuscleVolumeSIScaled/(Lf0); ///< PCSA (cm2) of the individual element is total volumen divided by the sum of muscle element fiber lengths.
            Vol0 = (1e-4*PCSA) * Lf0; // New calculation of the vol for the specific muscle branch
        };
        #endif

        #if BM_TRUNK_MUSCLES
        AnyMuscleModel LTptT4L4 = {
            AnyFolder& MuscleParameters = ....Data.unscaled.ModelParameters.Muscles.LongissimusThoracis.LTptT4L4;
            AnyIntVar MuscleElemNo = 1; ///< The number of this element of the muscle
            AnyIntVar MuscleElemAmount = MuscleParameters.MuscleElemAmount; ///< The total amount of elements for this muscle
            F0 ??= ...DefaultMusPar.PCSAfactor*PCSA; ///< Maximum force output at optimum fiber length
            Lf0 ??= MuscleParameters.OptimalFiberlength / cos(pi/180*MuscleParameters.Pennationangle); //< Optimal fiber length corrected by pennation angle
            AnyVar PCSA ??= 1e4*...StrengthScaleSpine*MuscleParameters.MuscleVolumeSIScaled/(Lf0); ///< PCSA (cm2) of the individual element is total volumen divided by the sum of muscle element fiber lengths.
            Vol0 = (1e-4*PCSA) * Lf0; // New calculation of the vol for the specific muscle branch
        };
        #endif

        #if BM_TRUNK_MUSCLES
        AnyMuscleModel LTptT5L5 = {
            AnyFolder& MuscleParameters = ....Data.unscaled.ModelParameters.Muscles.LongissimusThoracis.LTptT5L5;
            AnyIntVar MuscleElemNo = 1; ///< The number of this element of the muscle
            AnyIntVar MuscleElemAmount = MuscleParameters.MuscleElemAmount; ///< The total amount of elements for this muscle
            F0 ??= ...DefaultMusPar.PCSAfactor*PCSA; ///< Maximum force output at optimum fiber length
            Lf0 ??= MuscleParameters.OptimalFiberlength / cos(pi/180*MuscleParameters.Pennationangle); //< Optimal fiber length corrected by pennation angle
            AnyVar PCSA ??= 1e4*...StrengthScaleSpine*MuscleParameters.MuscleVolumeSIScaled/(Lf0); ///< PCSA (cm2) of the individual element is total volumen divided by the sum of muscle element fiber lengths.
            Vol0 = (1e-4*PCSA) * Lf0; // New calculation of the vol for the specific muscle branch
        };
        #endif

        #if BM_TRUNK_MUSCLES
        AnyMuscleModel LTptT6S1 = {
            AnyFolder& MuscleParameters = ....Data.unscaled.ModelParameters.Muscles.LongissimusThoracis.LTptT6S1;
            AnyIntVar MuscleElemNo = 1; ///< The number of this element of the muscle
            AnyIntVar MuscleElemAmount = MuscleParameters.MuscleElemAmount; ///< The total amount of elements for this muscle
            F0 ??= ...DefaultMusPar.PCSAfactor*PCSA; ///< Maximum force output at optimum fiber length
            Lf0 ??= MuscleParameters.OptimalFiberlength / cos(pi/180*MuscleParameters.Pennationangle); //< Optimal fiber length corrected by pennation angle
            AnyVar PCSA ??= 1e4*...StrengthScaleSpine*MuscleParameters.MuscleVolumeSIScaled/(Lf0); ///< PCSA (cm2) of the individual element is total volumen divided by the sum of muscle element fiber lengths.
            Vol0 = (1e-4*PCSA) * Lf0; // New calculation of the vol for the specific muscle branch
        };
        #endif

        #if BM_TRUNK_MUSCLES
        AnyMuscleModel LTptT7S2 = {
            AnyFolder& MuscleParameters = ....Data.unscaled.ModelParameters.Muscles.LongissimusThoracis.LTptT7S2;
            AnyIntVar MuscleElemNo = 1; ///< The number of this element of the muscle
            AnyIntVar MuscleElemAmount = MuscleParameters.MuscleElemAmount; ///< The total amount of elements for this muscle
            F0 ??= ...DefaultMusPar.PCSAfactor*PCSA; ///< Maximum force output at optimum fiber length
            Lf0 ??= MuscleParameters.OptimalFiberlength / cos(pi/180*MuscleParameters.Pennationangle); //< Optimal fiber length corrected by pennation angle
            AnyVar PCSA ??= 1e4*...StrengthScaleSpine*MuscleParameters.MuscleVolumeSIScaled/(Lf0); ///< PCSA (cm2) of the individual element is total volumen divided by the sum of muscle element fiber lengths.
            Vol0 = (1e-4*PCSA) * Lf0; // New calculation of the vol for the specific muscle branch
        };
        #endif

        #if BM_TRUNK_MUSCLES
        AnyMuscleModel LTptT8S3 = {
            AnyFolder& MuscleParameters = ....Data.unscaled.ModelParameters.Muscles.LongissimusThoracis.LTptT8S3;
            AnyIntVar MuscleElemNo = 1; ///< The number of this element of the muscle
            AnyIntVar MuscleElemAmount = MuscleParameters.MuscleElemAmount; ///< The total amount of elements for this muscle
            F0 ??= ...DefaultMusPar.PCSAfactor*PCSA; ///< Maximum force output at optimum fiber length
            Lf0 ??= MuscleParameters.OptimalFiberlength / cos(pi/180*MuscleParameters.Pennationangle); //< Optimal fiber length corrected by pennation angle
            AnyVar PCSA ??= 1e4*...StrengthScaleSpine*MuscleParameters.MuscleVolumeSIScaled/(Lf0); ///< PCSA (cm2) of the individual element is total volumen divided by the sum of muscle element fiber lengths.
            Vol0 = (1e-4*PCSA) * Lf0; // New calculation of the vol for the specific muscle branch
        };
        #endif

        #if BM_TRUNK_MUSCLES
        AnyMuscleModel LTptT9S4 = {
            AnyFolder& MuscleParameters = ....Data.unscaled.ModelParameters.Muscles.LongissimusThoracis.LTptT9S4;
            AnyIntVar MuscleElemNo = 1; ///< The number of this element of the muscle
            AnyIntVar MuscleElemAmount = MuscleParameters.MuscleElemAmount; ///< The total amount of elements for this muscle
            F0 ??= ...DefaultMusPar.PCSAfactor*PCSA; ///< Maximum force output at optimum fiber length
            Lf0 ??= MuscleParameters.OptimalFiberlength / cos(pi/180*MuscleParameters.Pennationangle); //< Optimal fiber length corrected by pennation angle
            AnyVar PCSA ??= 1e4*...StrengthScaleSpine*MuscleParameters.MuscleVolumeSIScaled/(Lf0); ///< PCSA (cm2) of the individual element is total volumen divided by the sum of muscle element fiber lengths.
            Vol0 = (1e-4*PCSA) * Lf0; // New calculation of the vol for the specific muscle branch
        };
        #endif

        #if BM_TRUNK_MUSCLES
        AnyMuscleModel LTptT10Sacrum = {
            AnyFolder& MuscleParameters = ....Data.unscaled.ModelParameters.Muscles.LongissimusThoracis.LTptT10Sacrum;
            AnyIntVar MuscleElemNo = 1; ///< The number of this element of the muscle
            AnyIntVar MuscleElemAmount = MuscleParameters.MuscleElemAmount; ///< The total amount of elements for this muscle
            F0 ??= ...DefaultMusPar.PCSAfactor*PCSA; ///< Maximum force output at optimum fiber length
            Lf0 ??= MuscleParameters.OptimalFiberlength / cos(pi/180*MuscleParameters.Pennationangle); //< Optimal fiber length corrected by pennation angle
            AnyVar PCSA ??= 1e4*...StrengthScaleSpine*MuscleParameters.MuscleVolumeSIScaled/(Lf0); ///< PCSA (cm2) of the individual element is total volumen divided by the sum of muscle element fiber lengths.
            Vol0 = (1e-4*PCSA) * Lf0; // New calculation of the vol for the specific muscle branch
        };
        #endif

        #if BM_TRUNK_MUSCLES
        AnyMuscleModel LTptT11Sacrum = {
            AnyFolder& MuscleParameters = ....Data.unscaled.ModelParameters.Muscles.LongissimusThoracis.LTptT11Sacrum;
            AnyIntVar MuscleElemNo = 1; ///< The number of this element of the muscle
            AnyIntVar MuscleElemAmount = MuscleParameters.MuscleElemAmount; ///< The total amount of elements for this muscle
            F0 ??= ...DefaultMusPar.PCSAfactor*PCSA; ///< Maximum force output at optimum fiber length
            Lf0 ??= MuscleParameters.OptimalFiberlength / cos(pi/180*MuscleParameters.Pennationangle); //< Optimal fiber length corrected by pennation angle
            AnyVar PCSA ??= 1e4*...StrengthScaleSpine*MuscleParameters.MuscleVolumeSIScaled/(Lf0); ///< PCSA (cm2) of the individual element is total volumen divided by the sum of muscle element fiber lengths.
            Vol0 = (1e-4*PCSA) * Lf0; // New calculation of the vol for the specific muscle branch
        };
        #endif

        #if BM_TRUNK_MUSCLES
        AnyMuscleModel LTptT12Sacrum = {
            AnyFolder& MuscleParameters = ....Data.unscaled.ModelParameters.Muscles.LongissimusThoracis.LTptT12Sacrum;
            AnyIntVar MuscleElemNo = 1; ///< The number of this element of the muscle
            AnyIntVar MuscleElemAmount = MuscleParameters.MuscleElemAmount; ///< The total amount of elements for this muscle
            F0 ??= ...DefaultMusPar.PCSAfactor*PCSA; ///< Maximum force output at optimum fiber length
            Lf0 ??= MuscleParameters.OptimalFiberlength / cos(pi/180*MuscleParameters.Pennationangle); //< Optimal fiber length corrected by pennation angle
            AnyVar PCSA ??= 1e4*...StrengthScaleSpine*MuscleParameters.MuscleVolumeSIScaled/(Lf0); ///< PCSA (cm2) of the individual element is total volumen divided by the sum of muscle element fiber lengths.
            Vol0 = (1e-4*PCSA) * Lf0; // New calculation of the vol for the specific muscle branch
        };
        #endif

        #if BM_TRUNK_MUSCLES
        AnyMuscleModel LTptC3L3 = {
            AnyFolder& MuscleParameters = ....Data.unscaled.ModelParameters.Muscles.LongissimusThoracis.LTptC3L3;
            AnyIntVar MuscleElemNo = 1; ///< The number of this element of the muscle
            AnyIntVar MuscleElemAmount = MuscleParameters.MuscleElemAmount; ///< The total amount of elements for this muscle
            F0 ??= ...DefaultMusPar.PCSAfactor*PCSA; ///< Maximum force output at optimum fiber length
            Lf0 ??= MuscleParameters.OptimalFiberlength / cos(pi/180*MuscleParameters.Pennationangle); //< Optimal fiber length corrected by pennation angle
            AnyVar PCSA ??= 1e4*...StrengthScaleSpine*MuscleParameters.MuscleVolumeSIScaled/(Lf0); ///< PCSA (cm2) of the individual element is total volumen divided by the sum of muscle element fiber lengths.
            Vol0 = (1e-4*PCSA) * Lf0; // New calculation of the vol for the specific muscle branch
        };
        #endif

        #if BM_TRUNK_MUSCLES
        AnyMuscleModel LTptC4L4 = {
            AnyFolder& MuscleParameters = ....Data.unscaled.ModelParameters.Muscles.LongissimusThoracis.LTptC4L4;
            AnyIntVar MuscleElemNo = 1; ///< The number of this element of the muscle
            AnyIntVar MuscleElemAmount = MuscleParameters.MuscleElemAmount; ///< The total amount of elements for this muscle
            F0 ??= ...DefaultMusPar.PCSAfactor*PCSA; ///< Maximum force output at optimum fiber length
            Lf0 ??= MuscleParameters.OptimalFiberlength / cos(pi/180*MuscleParameters.Pennationangle); //< Optimal fiber length corrected by pennation angle
            AnyVar PCSA ??= 1e4*...StrengthScaleSpine*MuscleParameters.MuscleVolumeSIScaled/(Lf0); ///< PCSA (cm2) of the individual element is total volumen divided by the sum of muscle element fiber lengths.
            Vol0 = (1e-4*PCSA) * Lf0; // New calculation of the vol for the specific muscle branch
        };
        #endif

        #if BM_TRUNK_MUSCLES
        AnyMuscleModel LTptC5L5 = {
            AnyFolder& MuscleParameters = ....Data.unscaled.ModelParameters.Muscles.LongissimusThoracis.LTptC5L5;
            AnyIntVar MuscleElemNo = 1; ///< The number of this element of the muscle
            AnyIntVar MuscleElemAmount = MuscleParameters.MuscleElemAmount; ///< The total amount of elements for this muscle
            F0 ??= ...DefaultMusPar.PCSAfactor*PCSA; ///< Maximum force output at optimum fiber length
            Lf0 ??= MuscleParameters.OptimalFiberlength / cos(pi/180*MuscleParameters.Pennationangle); //< Optimal fiber length corrected by pennation angle
            AnyVar PCSA ??= 1e4*...StrengthScaleSpine*MuscleParameters.MuscleVolumeSIScaled/(Lf0); ///< PCSA (cm2) of the individual element is total volumen divided by the sum of muscle element fiber lengths.
            Vol0 = (1e-4*PCSA) * Lf0; // New calculation of the vol for the specific muscle branch
        };
        #endif

        #if BM_TRUNK_MUSCLES
        AnyMuscleModel LTptC6S1 = {
            AnyFolder& MuscleParameters = ....Data.unscaled.ModelParameters.Muscles.LongissimusThoracis.LTptC6S1;
            AnyIntVar MuscleElemNo = 1; ///< The number of this element of the muscle
            AnyIntVar MuscleElemAmount = MuscleParameters.MuscleElemAmount; ///< The total amount of elements for this muscle
            F0 ??= ...DefaultMusPar.PCSAfactor*PCSA; ///< Maximum force output at optimum fiber length
            Lf0 ??= MuscleParameters.OptimalFiberlength / cos(pi/180*MuscleParameters.Pennationangle); //< Optimal fiber length corrected by pennation angle
            AnyVar PCSA ??= 1e4*...StrengthScaleSpine*MuscleParameters.MuscleVolumeSIScaled/(Lf0); ///< PCSA (cm2) of the individual element is total volumen divided by the sum of muscle element fiber lengths.
            Vol0 = (1e-4*PCSA) * Lf0; // New calculation of the vol for the specific muscle branch
        };
        #endif

        #if BM_TRUNK_MUSCLES
        AnyMuscleModel LTptC7S2 = {
            AnyFolder& MuscleParameters = ....Data.unscaled.ModelParameters.Muscles.LongissimusThoracis.LTptC7S2;
            AnyIntVar MuscleElemNo = 1; ///< The number of this element of the muscle
            AnyIntVar MuscleElemAmount = MuscleParameters.MuscleElemAmount; ///< The total amount of elements for this muscle
            F0 ??= ...DefaultMusPar.PCSAfactor*PCSA; ///< Maximum force output at optimum fiber length
            Lf0 ??= MuscleParameters.OptimalFiberlength / cos(pi/180*MuscleParameters.Pennationangle); //< Optimal fiber length corrected by pennation angle
            AnyVar PCSA ??= 1e4*...StrengthScaleSpine*MuscleParameters.MuscleVolumeSIScaled/(Lf0); ///< PCSA (cm2) of the individual element is total volumen divided by the sum of muscle element fiber lengths.
            Vol0 = (1e-4*PCSA) * Lf0; // New calculation of the vol for the specific muscle branch
        };
        #endif

        #if BM_TRUNK_MUSCLES
        AnyMuscleModel LTptC8S3 = {
            AnyFolder& MuscleParameters = ....Data.unscaled.ModelParameters.Muscles.LongissimusThoracis.LTptC8S3;
            AnyIntVar MuscleElemNo = 1; ///< The number of this element of the muscle
            AnyIntVar MuscleElemAmount = MuscleParameters.MuscleElemAmount; ///< The total amount of elements for this muscle
            F0 ??= ...DefaultMusPar.PCSAfactor*PCSA; ///< Maximum force output at optimum fiber length
            Lf0 ??= MuscleParameters.OptimalFiberlength / cos(pi/180*MuscleParameters.Pennationangle); //< Optimal fiber length corrected by pennation angle
            AnyVar PCSA ??= 1e4*...StrengthScaleSpine*MuscleParameters.MuscleVolumeSIScaled/(Lf0); ///< PCSA (cm2) of the individual element is total volumen divided by the sum of muscle element fiber lengths.
            Vol0 = (1e-4*PCSA) * Lf0; // New calculation of the vol for the specific muscle branch
        };
        #endif

        #if BM_TRUNK_MUSCLES
        AnyMuscleModel LTptC9S4 = {
            AnyFolder& MuscleParameters = ....Data.unscaled.ModelParameters.Muscles.LongissimusThoracis.LTptC9S4;
            AnyIntVar MuscleElemNo = 1; ///< The number of this element of the muscle
            AnyIntVar MuscleElemAmount = MuscleParameters.MuscleElemAmount; ///< The total amount of elements for this muscle
            F0 ??= ...DefaultMusPar.PCSAfactor*PCSA; ///< Maximum force output at optimum fiber length
            Lf0 ??= MuscleParameters.OptimalFiberlength / cos(pi/180*MuscleParameters.Pennationangle); //< Optimal fiber length corrected by pennation angle
            AnyVar PCSA ??= 1e4*...StrengthScaleSpine*MuscleParameters.MuscleVolumeSIScaled/(Lf0); ///< PCSA (cm2) of the individual element is total volumen divided by the sum of muscle element fiber lengths.
            Vol0 = (1e-4*PCSA) * Lf0; // New calculation of the vol for the specific muscle branch
        };
        #endif

        #if BM_TRUNK_MUSCLES
        AnyMuscleModel LTptC10Sacrum = {
            AnyFolder& MuscleParameters = ....Data.unscaled.ModelParameters.Muscles.LongissimusThoracis.LTptC10Sacrum;
            AnyIntVar MuscleElemNo = 1; ///< The number of this element of the muscle
            AnyIntVar MuscleElemAmount = MuscleParameters.MuscleElemAmount; ///< The total amount of elements for this muscle
            F0 ??= ...DefaultMusPar.PCSAfactor*PCSA; ///< Maximum force output at optimum fiber length
            Lf0 ??= MuscleParameters.OptimalFiberlength / cos(pi/180*MuscleParameters.Pennationangle); //< Optimal fiber length corrected by pennation angle
            AnyVar PCSA ??= 1e4*...StrengthScaleSpine*MuscleParameters.MuscleVolumeSIScaled/(Lf0); ///< PCSA (cm2) of the individual element is total volumen divided by the sum of muscle element fiber lengths.
            Vol0 = (1e-4*PCSA) * Lf0; // New calculation of the vol for the specific muscle branch
        };
        #endif

        #if BM_TRUNK_MUSCLES
        AnyMuscleModel LTptC11Sacrum = {
            AnyFolder& MuscleParameters = ....Data.unscaled.ModelParameters.Muscles.LongissimusThoracis.LTptC11Sacrum;
            AnyIntVar MuscleElemNo = 1; ///< The number of this element of the muscle
            AnyIntVar MuscleElemAmount = MuscleParameters.MuscleElemAmount; ///< The total amount of elements for this muscle
            F0 ??= ...DefaultMusPar.PCSAfactor*PCSA; ///< Maximum force output at optimum fiber length
            Lf0 ??= MuscleParameters.OptimalFiberlength / cos(pi/180*MuscleParameters.Pennationangle); //< Optimal fiber length corrected by pennation angle
            AnyVar PCSA ??= 1e4*...StrengthScaleSpine*MuscleParameters.MuscleVolumeSIScaled/(Lf0); ///< PCSA (cm2) of the individual element is total volumen divided by the sum of muscle element fiber lengths.
            Vol0 = (1e-4*PCSA) * Lf0; // New calculation of the vol for the specific muscle branch
        };
        #endif

        #if BM_TRUNK_MUSCLES
        AnyMuscleModel LTptC12Sacrum = {
            AnyFolder& MuscleParameters = ....Data.unscaled.ModelParameters.Muscles.LongissimusThoracis.LTptC12Sacrum;
            AnyIntVar MuscleElemNo = 1; ///< The number of this element of the muscle
            AnyIntVar MuscleElemAmount = MuscleParameters.MuscleElemAmount; ///< The total amount of elements for this muscle
            F0 ??= ...DefaultMusPar.PCSAfactor*PCSA; ///< Maximum force output at optimum fiber length
            Lf0 ??= MuscleParameters.OptimalFiberlength / cos(pi/180*MuscleParameters.Pennationangle); //< Optimal fiber length corrected by pennation angle
            AnyVar PCSA ??= 1e4*...StrengthScaleSpine*MuscleParameters.MuscleVolumeSIScaled/(Lf0); ///< PCSA (cm2) of the individual element is total volumen divided by the sum of muscle element fiber lengths.
            Vol0 = (1e-4*PCSA) * Lf0; // New calculation of the vol for the specific muscle branch
        };
        #endif

    };

    AnyFolder LongusCapitis = {

        #if BM_TRUNK_MUSCLES
        AnyMuscleModel LongusCapitisC6C0 = {
            AnyFolder& MuscleParameters = ....Data.unscaled.ModelParameters.Muscles.LongusCapitis.LongusCapitisC6C0;
            AnyIntVar MuscleElemNo = 1; ///< The number of this element of the muscle
            AnyIntVar MuscleElemAmount = MuscleParameters.MuscleElemAmount; ///< The total amount of elements for this muscle
            F0 ??= ...DefaultMusPar.PCSAfactor*PCSA; ///< Maximum force output at optimum fiber length
            Lf0 ??= MuscleParameters.OptimalFiberlength / cos(pi/180*MuscleParameters.Pennationangle); //< Optimal fiber length corrected by pennation angle
            AnyVar PCSA ??= 1e4*...StrengthScaleSpine*MuscleParameters.MuscleVolumeSIScaled/(Lf0); ///< PCSA (cm2) of the individual element is total volumen divided by the sum of muscle element fiber lengths.
            Vol0 = (1e-4*PCSA) * Lf0; // New calculation of the vol for the specific muscle branch
        };
        #endif

        #if BM_TRUNK_MUSCLES
        AnyMuscleModel LongusCapitisC5C0 = {
            AnyFolder& MuscleParameters = ....Data.unscaled.ModelParameters.Muscles.LongusCapitis.LongusCapitisC5C0;
            AnyIntVar MuscleElemNo = 1; ///< The number of this element of the muscle
            AnyIntVar MuscleElemAmount = MuscleParameters.MuscleElemAmount; ///< The total amount of elements for this muscle
            F0 ??= ...DefaultMusPar.PCSAfactor*PCSA; ///< Maximum force output at optimum fiber length
            Lf0 ??= MuscleParameters.OptimalFiberlength / cos(pi/180*MuscleParameters.Pennationangle); //< Optimal fiber length corrected by pennation angle
            AnyVar PCSA ??= 1e4*...StrengthScaleSpine*MuscleParameters.MuscleVolumeSIScaled/(Lf0); ///< PCSA (cm2) of the individual element is total volumen divided by the sum of muscle element fiber lengths.
            Vol0 = (1e-4*PCSA) * Lf0; // New calculation of the vol for the specific muscle branch
        };
        #endif

        #if BM_TRUNK_MUSCLES
        AnyMuscleModel LongusCapitisC4C0 = {
            AnyFolder& MuscleParameters = ....Data.unscaled.ModelParameters.Muscles.LongusCapitis.LongusCapitisC4C0;
            AnyIntVar MuscleElemNo = 1; ///< The number of this element of the muscle
            AnyIntVar MuscleElemAmount = MuscleParameters.MuscleElemAmount; ///< The total amount of elements for this muscle
            F0 ??= ...DefaultMusPar.PCSAfactor*PCSA; ///< Maximum force output at optimum fiber length
            Lf0 ??= MuscleParameters.OptimalFiberlength / cos(pi/180*MuscleParameters.Pennationangle); //< Optimal fiber length corrected by pennation angle
            AnyVar PCSA ??= 1e4*...StrengthScaleSpine*MuscleParameters.MuscleVolumeSIScaled/(Lf0); ///< PCSA (cm2) of the individual element is total volumen divided by the sum of muscle element fiber lengths.
            Vol0 = (1e-4*PCSA) * Lf0; // New calculation of the vol for the specific muscle branch
        };
        #endif

        #if BM_TRUNK_MUSCLES
        AnyMuscleModel LongusCapitisC3C0 = {
            AnyFolder& MuscleParameters = ....Data.unscaled.ModelParameters.Muscles.LongusCapitis.LongusCapitisC3C0;
            AnyIntVar MuscleElemNo = 1; ///< The number of this element of the muscle
            AnyIntVar MuscleElemAmount = MuscleParameters.MuscleElemAmount; ///< The total amount of elements for this muscle
            F0 ??= ...DefaultMusPar.PCSAfactor*PCSA; ///< Maximum force output at optimum fiber length
            Lf0 ??= MuscleParameters.OptimalFiberlength / cos(pi/180*MuscleParameters.Pennationangle); //< Optimal fiber length corrected by pennation angle
            AnyVar PCSA ??= 1e4*...StrengthScaleSpine*MuscleParameters.MuscleVolumeSIScaled/(Lf0); ///< PCSA (cm2) of the individual element is total volumen divided by the sum of muscle element fiber lengths.
            Vol0 = (1e-4*PCSA) * Lf0; // New calculation of the vol for the specific muscle branch
        };
        #endif

    };

    AnyFolder LongusColli = {

        #if BM_TRUNK_MUSCLES
        AnyMuscleModel LongusColliT3C6 = {
            AnyFolder& MuscleParameters = ....Data.unscaled.ModelParameters.Muscles.LongusColli.LongusColliT3C6;
            AnyIntVar MuscleElemNo = 1; ///< The number of this element of the muscle
            AnyIntVar MuscleElemAmount = MuscleParameters.MuscleElemAmount; ///< The total amount of elements for this muscle
            F0 ??= ...DefaultMusPar.PCSAfactor*PCSA; ///< Maximum force output at optimum fiber length
            Lf0 ??= MuscleParameters.OptimalFiberlength / cos(pi/180*MuscleParameters.Pennationangle); //< Optimal fiber length corrected by pennation angle
            AnyVar PCSA ??= 1e4*...StrengthScaleSpine*MuscleParameters.MuscleVolumeSIScaled/(Lf0); ///< PCSA (cm2) of the individual element is total volumen divided by the sum of muscle element fiber lengths.
            Vol0 = (1e-4*PCSA) * Lf0; // New calculation of the vol for the specific muscle branch
        };
        #endif

        #if BM_TRUNK_MUSCLES
        AnyMuscleModel LongusColliT2C5 = {
            AnyFolder& MuscleParameters = ....Data.unscaled.ModelParameters.Muscles.LongusColli.LongusColliT2C5;
            AnyIntVar MuscleElemNo = 1; ///< The number of this element of the muscle
            AnyIntVar MuscleElemAmount = MuscleParameters.MuscleElemAmount; ///< The total amount of elements for this muscle
            F0 ??= ...DefaultMusPar.PCSAfactor*PCSA; ///< Maximum force output at optimum fiber length
            Lf0 ??= MuscleParameters.OptimalFiberlength / cos(pi/180*MuscleParameters.Pennationangle); //< Optimal fiber length corrected by pennation angle
            AnyVar PCSA ??= 1e4*...StrengthScaleSpine*MuscleParameters.MuscleVolumeSIScaled/(Lf0); ///< PCSA (cm2) of the individual element is total volumen divided by the sum of muscle element fiber lengths.
            Vol0 = (1e-4*PCSA) * Lf0; // New calculation of the vol for the specific muscle branch
        };
        #endif

        #if BM_TRUNK_MUSCLES
        AnyMuscleModel LongusColliT2C3 = {
            AnyFolder& MuscleParameters = ....Data.unscaled.ModelParameters.Muscles.LongusColli.LongusColliT2C3;
            AnyIntVar MuscleElemNo = 1; ///< The number of this element of the muscle
            AnyIntVar MuscleElemAmount = MuscleParameters.MuscleElemAmount; ///< The total amount of elements for this muscle
            F0 ??= ...DefaultMusPar.PCSAfactor*PCSA; ///< Maximum force output at optimum fiber length
            Lf0 ??= MuscleParameters.OptimalFiberlength / cos(pi/180*MuscleParameters.Pennationangle); //< Optimal fiber length corrected by pennation angle
            AnyVar PCSA ??= 1e4*...StrengthScaleSpine*MuscleParameters.MuscleVolumeSIScaled/(Lf0); ///< PCSA (cm2) of the individual element is total volumen divided by the sum of muscle element fiber lengths.
            Vol0 = (1e-4*PCSA) * Lf0; // New calculation of the vol for the specific muscle branch
        };
        #endif

        #if BM_TRUNK_MUSCLES
        AnyMuscleModel LongusColliT2C2 = {
            AnyFolder& MuscleParameters = ....Data.unscaled.ModelParameters.Muscles.LongusColli.LongusColliT2C2;
            AnyIntVar MuscleElemNo = 1; ///< The number of this element of the muscle
            AnyIntVar MuscleElemAmount = MuscleParameters.MuscleElemAmount; ///< The total amount of elements for this muscle
            F0 ??= ...DefaultMusPar.PCSAfactor*PCSA; ///< Maximum force output at optimum fiber length
            Lf0 ??= MuscleParameters.OptimalFiberlength / cos(pi/180*MuscleParameters.Pennationangle); //< Optimal fiber length corrected by pennation angle
            AnyVar PCSA ??= 1e4*...StrengthScaleSpine*MuscleParameters.MuscleVolumeSIScaled/(Lf0); ///< PCSA (cm2) of the individual element is total volumen divided by the sum of muscle element fiber lengths.
            Vol0 = (1e-4*PCSA) * Lf0; // New calculation of the vol for the specific muscle branch
        };
        #endif

        #if BM_TRUNK_MUSCLES
        AnyMuscleModel LongusColliT1C4 = {
            AnyFolder& MuscleParameters = ....Data.unscaled.ModelParameters.Muscles.LongusColli.LongusColliT1C4;
            AnyIntVar MuscleElemNo = 1; ///< The number of this element of the muscle
            AnyIntVar MuscleElemAmount = MuscleParameters.MuscleElemAmount; ///< The total amount of elements for this muscle
            F0 ??= ...DefaultMusPar.PCSAfactor*PCSA; ///< Maximum force output at optimum fiber length
            Lf0 ??= MuscleParameters.OptimalFiberlength / cos(pi/180*MuscleParameters.Pennationangle); //< Optimal fiber length corrected by pennation angle
            AnyVar PCSA ??= 1e4*...StrengthScaleSpine*MuscleParameters.MuscleVolumeSIScaled/(Lf0); ///< PCSA (cm2) of the individual element is total volumen divided by the sum of muscle element fiber lengths.
            Vol0 = (1e-4*PCSA) * Lf0; // New calculation of the vol for the specific muscle branch
        };
        #endif

        #if BM_TRUNK_MUSCLES
        AnyMuscleModel LongusColliT1C3 = {
            AnyFolder& MuscleParameters = ....Data.unscaled.ModelParameters.Muscles.LongusColli.LongusColliT1C3;
            AnyIntVar MuscleElemNo = 1; ///< The number of this element of the muscle
            AnyIntVar MuscleElemAmount = MuscleParameters.MuscleElemAmount; ///< The total amount of elements for this muscle
            F0 ??= ...DefaultMusPar.PCSAfactor*PCSA; ///< Maximum force output at optimum fiber length
            Lf0 ??= MuscleParameters.OptimalFiberlength / cos(pi/180*MuscleParameters.Pennationangle); //< Optimal fiber length corrected by pennation angle
            AnyVar PCSA ??= 1e4*...StrengthScaleSpine*MuscleParameters.MuscleVolumeSIScaled/(Lf0); ///< PCSA (cm2) of the individual element is total volumen divided by the sum of muscle element fiber lengths.
            Vol0 = (1e-4*PCSA) * Lf0; // New calculation of the vol for the specific muscle branch
        };
        #endif

        #if BM_TRUNK_MUSCLES
        AnyMuscleModel LongusColliT1C2 = {
            AnyFolder& MuscleParameters = ....Data.unscaled.ModelParameters.Muscles.LongusColli.LongusColliT1C2;
            AnyIntVar MuscleElemNo = 1; ///< The number of this element of the muscle
            AnyIntVar MuscleElemAmount = MuscleParameters.MuscleElemAmount; ///< The total amount of elements for this muscle
            F0 ??= ...DefaultMusPar.PCSAfactor*PCSA; ///< Maximum force output at optimum fiber length
            Lf0 ??= MuscleParameters.OptimalFiberlength / cos(pi/180*MuscleParameters.Pennationangle); //< Optimal fiber length corrected by pennation angle
            AnyVar PCSA ??= 1e4*...StrengthScaleSpine*MuscleParameters.MuscleVolumeSIScaled/(Lf0); ///< PCSA (cm2) of the individual element is total volumen divided by the sum of muscle element fiber lengths.
            Vol0 = (1e-4*PCSA) * Lf0; // New calculation of the vol for the specific muscle branch
        };
        #endif

        #if BM_TRUNK_MUSCLES
        AnyMuscleModel LongusColliC7C3 = {
            AnyFolder& MuscleParameters = ....Data.unscaled.ModelParameters.Muscles.LongusColli.LongusColliC7C3;
            AnyIntVar MuscleElemNo = 1; ///< The number of this element of the muscle
            AnyIntVar MuscleElemAmount = MuscleParameters.MuscleElemAmount; ///< The total amount of elements for this muscle
            F0 ??= ...DefaultMusPar.PCSAfactor*PCSA; ///< Maximum force output at optimum fiber length
            Lf0 ??= MuscleParameters.OptimalFiberlength / cos(pi/180*MuscleParameters.Pennationangle); //< Optimal fiber length corrected by pennation angle
            AnyVar PCSA ??= 1e4*...StrengthScaleSpine*MuscleParameters.MuscleVolumeSIScaled/(Lf0); ///< PCSA (cm2) of the individual element is total volumen divided by the sum of muscle element fiber lengths.
            Vol0 = (1e-4*PCSA) * Lf0; // New calculation of the vol for the specific muscle branch
        };
        #endif

        #if BM_TRUNK_MUSCLES
        AnyMuscleModel LongusColliC6C2 = {
            AnyFolder& MuscleParameters = ....Data.unscaled.ModelParameters.Muscles.LongusColli.LongusColliC6C2;
            AnyIntVar MuscleElemNo = 1; ///< The number of this element of the muscle
            AnyIntVar MuscleElemAmount = MuscleParameters.MuscleElemAmount; ///< The total amount of elements for this muscle
            F0 ??= ...DefaultMusPar.PCSAfactor*PCSA; ///< Maximum force output at optimum fiber length
            Lf0 ??= MuscleParameters.OptimalFiberlength / cos(pi/180*MuscleParameters.Pennationangle); //< Optimal fiber length corrected by pennation angle
            AnyVar PCSA ??= 1e4*...StrengthScaleSpine*MuscleParameters.MuscleVolumeSIScaled/(Lf0); ///< PCSA (cm2) of the individual element is total volumen divided by the sum of muscle element fiber lengths.
            Vol0 = (1e-4*PCSA) * Lf0; // New calculation of the vol for the specific muscle branch
        };
        #endif

        #if BM_TRUNK_MUSCLES
        AnyMuscleModel LongusColliC5C1 = {
            AnyFolder& MuscleParameters = ....Data.unscaled.ModelParameters.Muscles.LongusColli.LongusColliC5C1;
            AnyIntVar MuscleElemNo = 1; ///< The number of this element of the muscle
            AnyIntVar MuscleElemAmount = MuscleParameters.MuscleElemAmount; ///< The total amount of elements for this muscle
            F0 ??= ...DefaultMusPar.PCSAfactor*PCSA; ///< Maximum force output at optimum fiber length
            Lf0 ??= MuscleParameters.OptimalFiberlength / cos(pi/180*MuscleParameters.Pennationangle); //< Optimal fiber length corrected by pennation angle
            AnyVar PCSA ??= 1e4*...StrengthScaleSpine*MuscleParameters.MuscleVolumeSIScaled/(Lf0); ///< PCSA (cm2) of the individual element is total volumen divided by the sum of muscle element fiber lengths.
            Vol0 = (1e-4*PCSA) * Lf0; // New calculation of the vol for the specific muscle branch
        };
        #endif

        #if BM_TRUNK_MUSCLES
        AnyMuscleModel LongusColliSuperiorObliqueC3C1 = {
            AnyFolder& MuscleParameters = ....Data.unscaled.ModelParameters.Muscles.LongusColli.LongusColliSuperiorObliqueC3C1;
            AnyIntVar MuscleElemNo = 1; ///< The number of this element of the muscle
            AnyIntVar MuscleElemAmount = MuscleParameters.MuscleElemAmount; ///< The total amount of elements for this muscle
            F0 ??= ...DefaultMusPar.PCSAfactor*PCSA; ///< Maximum force output at optimum fiber length
            Lf0 ??= MuscleParameters.OptimalFiberlength / cos(pi/180*MuscleParameters.Pennationangle); //< Optimal fiber length corrected by pennation angle
            AnyVar PCSA ??= 1e4*...StrengthScaleSpine*MuscleParameters.MuscleVolumeSIScaled/(Lf0); ///< PCSA (cm2) of the individual element is total volumen divided by the sum of muscle element fiber lengths.
            Vol0 = (1e-4*PCSA) * Lf0; // New calculation of the vol for the specific muscle branch
        };
        #endif

        #if BM_TRUNK_MUSCLES
        AnyMuscleModel LongusColliSuperiorObliqueC4C1 = {
            AnyFolder& MuscleParameters = ....Data.unscaled.ModelParameters.Muscles.LongusColli.LongusColliSuperiorObliqueC4C1;
            AnyIntVar MuscleElemNo = 1; ///< The number of this element of the muscle
            AnyIntVar MuscleElemAmount = MuscleParameters.MuscleElemAmount; ///< The total amount of elements for this muscle
            F0 ??= ...DefaultMusPar.PCSAfactor*PCSA; ///< Maximum force output at optimum fiber length
            Lf0 ??= MuscleParameters.OptimalFiberlength / cos(pi/180*MuscleParameters.Pennationangle); //< Optimal fiber length corrected by pennation angle
            AnyVar PCSA ??= 1e4*...StrengthScaleSpine*MuscleParameters.MuscleVolumeSIScaled/(Lf0); ///< PCSA (cm2) of the individual element is total volumen divided by the sum of muscle element fiber lengths.
            Vol0 = (1e-4*PCSA) * Lf0; // New calculation of the vol for the specific muscle branch
        };
        #endif

        #if BM_TRUNK_MUSCLES
        AnyMuscleModel LongusColliSuperiorObliqueC5C1 = {
            AnyFolder& MuscleParameters = ....Data.unscaled.ModelParameters.Muscles.LongusColli.LongusColliSuperiorObliqueC5C1;
            AnyIntVar MuscleElemNo = 1; ///< The number of this element of the muscle
            AnyIntVar MuscleElemAmount = MuscleParameters.MuscleElemAmount; ///< The total amount of elements for this muscle
            F0 ??= ...DefaultMusPar.PCSAfactor*PCSA; ///< Maximum force output at optimum fiber length
            Lf0 ??= MuscleParameters.OptimalFiberlength / cos(pi/180*MuscleParameters.Pennationangle); //< Optimal fiber length corrected by pennation angle
            AnyVar PCSA ??= 1e4*...StrengthScaleSpine*MuscleParameters.MuscleVolumeSIScaled/(Lf0); ///< PCSA (cm2) of the individual element is total volumen divided by the sum of muscle element fiber lengths.
            Vol0 = (1e-4*PCSA) * Lf0; // New calculation of the vol for the specific muscle branch
        };
        #endif

        #if BM_TRUNK_MUSCLES
        AnyMuscleModel LongusColliSuperiorObliqueC4C2 = {
            AnyFolder& MuscleParameters = ....Data.unscaled.ModelParameters.Muscles.LongusColli.LongusColliSuperiorObliqueC4C2;
            AnyIntVar MuscleElemNo = 1; ///< The number of this element of the muscle
            AnyIntVar MuscleElemAmount = MuscleParameters.MuscleElemAmount; ///< The total amount of elements for this muscle
            F0 ??= ...DefaultMusPar.PCSAfactor*PCSA; ///< Maximum force output at optimum fiber length
            Lf0 ??= MuscleParameters.OptimalFiberlength / cos(pi/180*MuscleParameters.Pennationangle); //< Optimal fiber length corrected by pennation angle
            AnyVar PCSA ??= 1e4*...StrengthScaleSpine*MuscleParameters.MuscleVolumeSIScaled/(Lf0); ///< PCSA (cm2) of the individual element is total volumen divided by the sum of muscle element fiber lengths.
            Vol0 = (1e-4*PCSA) * Lf0; // New calculation of the vol for the specific muscle branch
        };
        #endif

        #if BM_TRUNK_MUSCLES
        AnyMuscleModel LongusColliSuperiorObliqueC5C2 = {
            AnyFolder& MuscleParameters = ....Data.unscaled.ModelParameters.Muscles.LongusColli.LongusColliSuperiorObliqueC5C2;
            AnyIntVar MuscleElemNo = 1; ///< The number of this element of the muscle
            AnyIntVar MuscleElemAmount = MuscleParameters.MuscleElemAmount; ///< The total amount of elements for this muscle
            F0 ??= ...DefaultMusPar.PCSAfactor*PCSA; ///< Maximum force output at optimum fiber length
            Lf0 ??= MuscleParameters.OptimalFiberlength / cos(pi/180*MuscleParameters.Pennationangle); //< Optimal fiber length corrected by pennation angle
            AnyVar PCSA ??= 1e4*...StrengthScaleSpine*MuscleParameters.MuscleVolumeSIScaled/(Lf0); ///< PCSA (cm2) of the individual element is total volumen divided by the sum of muscle element fiber lengths.
            Vol0 = (1e-4*PCSA) * Lf0; // New calculation of the vol for the specific muscle branch
        };
        #endif

        #if BM_TRUNK_MUSCLES
        AnyMuscleModel LongusColliSuperiorObliqueC6C2 = {
            AnyFolder& MuscleParameters = ....Data.unscaled.ModelParameters.Muscles.LongusColli.LongusColliSuperiorObliqueC6C2;
            AnyIntVar MuscleElemNo = 1; ///< The number of this element of the muscle
            AnyIntVar MuscleElemAmount = MuscleParameters.MuscleElemAmount; ///< The total amount of elements for this muscle
            F0 ??= ...DefaultMusPar.PCSAfactor*PCSA; ///< Maximum force output at optimum fiber length
            Lf0 ??= MuscleParameters.OptimalFiberlength / cos(pi/180*MuscleParameters.Pennationangle); //< Optimal fiber length corrected by pennation angle
            AnyVar PCSA ??= 1e4*...StrengthScaleSpine*MuscleParameters.MuscleVolumeSIScaled/(Lf0); ///< PCSA (cm2) of the individual element is total volumen divided by the sum of muscle element fiber lengths.
            Vol0 = (1e-4*PCSA) * Lf0; // New calculation of the vol for the specific muscle branch
        };
        #endif

        #if BM_TRUNK_MUSCLES
        AnyMuscleModel LongusColliSuperiorObliqueC6C3 = {
            AnyFolder& MuscleParameters = ....Data.unscaled.ModelParameters.Muscles.LongusColli.LongusColliSuperiorObliqueC6C3;
            AnyIntVar MuscleElemNo = 1; ///< The number of this element of the muscle
            AnyIntVar MuscleElemAmount = MuscleParameters.MuscleElemAmount; ///< The total amount of elements for this muscle
            F0 ??= ...DefaultMusPar.PCSAfactor*PCSA; ///< Maximum force output at optimum fiber length
            Lf0 ??= MuscleParameters.OptimalFiberlength / cos(pi/180*MuscleParameters.Pennationangle); //< Optimal fiber length corrected by pennation angle
            AnyVar PCSA ??= 1e4*...StrengthScaleSpine*MuscleParameters.MuscleVolumeSIScaled/(Lf0); ///< PCSA (cm2) of the individual element is total volumen divided by the sum of muscle element fiber lengths.
            Vol0 = (1e-4*PCSA) * Lf0; // New calculation of the vol for the specific muscle branch
        };
        #endif

        #if BM_TRUNK_MUSCLES
        AnyMuscleModel LongusColliInferiorObliqueT1C6 = {
            AnyFolder& MuscleParameters = ....Data.unscaled.ModelParameters.Muscles.LongusColli.LongusColliInferiorObliqueT1C6;
            AnyIntVar MuscleElemNo = 1; ///< The number of this element of the muscle
            AnyIntVar MuscleElemAmount = MuscleParameters.MuscleElemAmount; ///< The total amount of elements for this muscle
            F0 ??= ...DefaultMusPar.PCSAfactor*PCSA; ///< Maximum force output at optimum fiber length
            Lf0 ??= MuscleParameters.OptimalFiberlength / cos(pi/180*MuscleParameters.Pennationangle); //< Optimal fiber length corrected by pennation angle
            AnyVar PCSA ??= 1e4*...StrengthScaleSpine*MuscleParameters.MuscleVolumeSIScaled/(Lf0); ///< PCSA (cm2) of the individual element is total volumen divided by the sum of muscle element fiber lengths.
            Vol0 = (1e-4*PCSA) * Lf0; // New calculation of the vol for the specific muscle branch
        };
        #endif

        #if BM_TRUNK_MUSCLES
        AnyMuscleModel LongusColliInferiorObliqueT2C6 = {
            AnyFolder& MuscleParameters = ....Data.unscaled.ModelParameters.Muscles.LongusColli.LongusColliInferiorObliqueT2C6;
            AnyIntVar MuscleElemNo = 1; ///< The number of this element of the muscle
            AnyIntVar MuscleElemAmount = MuscleParameters.MuscleElemAmount; ///< The total amount of elements for this muscle
            F0 ??= ...DefaultMusPar.PCSAfactor*PCSA; ///< Maximum force output at optimum fiber length
            Lf0 ??= MuscleParameters.OptimalFiberlength / cos(pi/180*MuscleParameters.Pennationangle); //< Optimal fiber length corrected by pennation angle
            AnyVar PCSA ??= 1e4*...StrengthScaleSpine*MuscleParameters.MuscleVolumeSIScaled/(Lf0); ///< PCSA (cm2) of the individual element is total volumen divided by the sum of muscle element fiber lengths.
            Vol0 = (1e-4*PCSA) * Lf0; // New calculation of the vol for the specific muscle branch
        };
        #endif

        #if BM_TRUNK_MUSCLES
        AnyMuscleModel LongusColliInferiorObliqueT2C5 = {
            AnyFolder& MuscleParameters = ....Data.unscaled.ModelParameters.Muscles.LongusColli.LongusColliInferiorObliqueT2C5;
            AnyIntVar MuscleElemNo = 1; ///< The number of this element of the muscle
            AnyIntVar MuscleElemAmount = MuscleParameters.MuscleElemAmount; ///< The total amount of elements for this muscle
            F0 ??= ...DefaultMusPar.PCSAfactor*PCSA; ///< Maximum force output at optimum fiber length
            Lf0 ??= MuscleParameters.OptimalFiberlength / cos(pi/180*MuscleParameters.Pennationangle); //< Optimal fiber length corrected by pennation angle
            AnyVar PCSA ??= 1e4*...StrengthScaleSpine*MuscleParameters.MuscleVolumeSIScaled/(Lf0); ///< PCSA (cm2) of the individual element is total volumen divided by the sum of muscle element fiber lengths.
            Vol0 = (1e-4*PCSA) * Lf0; // New calculation of the vol for the specific muscle branch
        };
        #endif

    };

    AnyFolder MultifidusCervicis = {

        #if BM_TRUNK_MUSCLES
        AnyMuscleModel MultifidusCervicisC5C2 = {
            AnyFolder& MuscleParameters = ....Data.unscaled.ModelParameters.Muscles.MultifidusCervicis.MultifidusCervicisC5C2;
            AnyIntVar MuscleElemNo = 1; ///< The number of this element of the muscle
            AnyIntVar MuscleElemAmount = MuscleParameters.MuscleElemAmount; ///< The total amount of elements for this muscle
            F0 ??= ...DefaultMusPar.PCSAfactor*PCSA; ///< Maximum force output at optimum fiber length
            Lf0 ??= MuscleParameters.OptimalFiberlength / cos(pi/180*MuscleParameters.Pennationangle); //< Optimal fiber length corrected by pennation angle
            AnyVar PCSA ??= 1e4*...StrengthScaleSpine*MuscleParameters.MuscleVolumeSIScaled/(Lf0); ///< PCSA (cm2) of the individual element is total volumen divided by the sum of muscle element fiber lengths.
            Vol0 = (1e-4*PCSA) * Lf0; // New calculation of the vol for the specific muscle branch
        };
        #endif

        #if BM_TRUNK_MUSCLES
        AnyMuscleModel MultifidusCervicisC6C2 = {
            AnyFolder& MuscleParameters = ....Data.unscaled.ModelParameters.Muscles.MultifidusCervicis.MultifidusCervicisC6C2;
            AnyIntVar MuscleElemNo = 1; ///< The number of this element of the muscle
            AnyIntVar MuscleElemAmount = MuscleParameters.MuscleElemAmount; ///< The total amount of elements for this muscle
            F0 ??= ...DefaultMusPar.PCSAfactor*PCSA; ///< Maximum force output at optimum fiber length
            Lf0 ??= MuscleParameters.OptimalFiberlength / cos(pi/180*MuscleParameters.Pennationangle); //< Optimal fiber length corrected by pennation angle
            AnyVar PCSA ??= 1e4*...StrengthScaleSpine*MuscleParameters.MuscleVolumeSIScaled/(Lf0); ///< PCSA (cm2) of the individual element is total volumen divided by the sum of muscle element fiber lengths.
            Vol0 = (1e-4*PCSA) * Lf0; // New calculation of the vol for the specific muscle branch
        };
        #endif

        #if BM_TRUNK_MUSCLES
        AnyMuscleModel MultifidusCervicisC6C3 = {
            AnyFolder& MuscleParameters = ....Data.unscaled.ModelParameters.Muscles.MultifidusCervicis.MultifidusCervicisC6C3;
            AnyIntVar MuscleElemNo = 1; ///< The number of this element of the muscle
            AnyIntVar MuscleElemAmount = MuscleParameters.MuscleElemAmount; ///< The total amount of elements for this muscle
            F0 ??= ...DefaultMusPar.PCSAfactor*PCSA; ///< Maximum force output at optimum fiber length
            Lf0 ??= MuscleParameters.OptimalFiberlength / cos(pi/180*MuscleParameters.Pennationangle); //< Optimal fiber length corrected by pennation angle
            AnyVar PCSA ??= 1e4*...StrengthScaleSpine*MuscleParameters.MuscleVolumeSIScaled/(Lf0); ///< PCSA (cm2) of the individual element is total volumen divided by the sum of muscle element fiber lengths.
            Vol0 = (1e-4*PCSA) * Lf0; // New calculation of the vol for the specific muscle branch
        };
        #endif

        #if BM_TRUNK_MUSCLES
        AnyMuscleModel MultifidusCervicisC7C3 = {
            AnyFolder& MuscleParameters = ....Data.unscaled.ModelParameters.Muscles.MultifidusCervicis.MultifidusCervicisC7C3;
            AnyIntVar MuscleElemNo = 1; ///< The number of this element of the muscle
            AnyIntVar MuscleElemAmount = MuscleParameters.MuscleElemAmount; ///< The total amount of elements for this muscle
            F0 ??= ...DefaultMusPar.PCSAfactor*PCSA; ///< Maximum force output at optimum fiber length
            Lf0 ??= MuscleParameters.OptimalFiberlength / cos(pi/180*MuscleParameters.Pennationangle); //< Optimal fiber length corrected by pennation angle
            AnyVar PCSA ??= 1e4*...StrengthScaleSpine*MuscleParameters.MuscleVolumeSIScaled/(Lf0); ///< PCSA (cm2) of the individual element is total volumen divided by the sum of muscle element fiber lengths.
            Vol0 = (1e-4*PCSA) * Lf0; // New calculation of the vol for the specific muscle branch
        };
        #endif

        #if BM_TRUNK_MUSCLES
        AnyMuscleModel MultifidusCervicisC7C4 = {
            AnyFolder& MuscleParameters = ....Data.unscaled.ModelParameters.Muscles.MultifidusCervicis.MultifidusCervicisC7C4;
            AnyIntVar MuscleElemNo = 1; ///< The number of this element of the muscle
            AnyIntVar MuscleElemAmount = MuscleParameters.MuscleElemAmount; ///< The total amount of elements for this muscle
            F0 ??= ...DefaultMusPar.PCSAfactor*PCSA; ///< Maximum force output at optimum fiber length
            Lf0 ??= MuscleParameters.OptimalFiberlength / cos(pi/180*MuscleParameters.Pennationangle); //< Optimal fiber length corrected by pennation angle
            AnyVar PCSA ??= 1e4*...StrengthScaleSpine*MuscleParameters.MuscleVolumeSIScaled/(Lf0); ///< PCSA (cm2) of the individual element is total volumen divided by the sum of muscle element fiber lengths.
            Vol0 = (1e-4*PCSA) * Lf0; // New calculation of the vol for the specific muscle branch
        };
        #endif

        #if BM_TRUNK_MUSCLES
        AnyMuscleModel MultifidusCervicisT1C4 = {
            AnyFolder& MuscleParameters = ....Data.unscaled.ModelParameters.Muscles.MultifidusCervicis.MultifidusCervicisT1C4;
            AnyIntVar MuscleElemNo = 1; ///< The number of this element of the muscle
            AnyIntVar MuscleElemAmount = MuscleParameters.MuscleElemAmount; ///< The total amount of elements for this muscle
            F0 ??= ...DefaultMusPar.PCSAfactor*PCSA; ///< Maximum force output at optimum fiber length
            Lf0 ??= MuscleParameters.OptimalFiberlength / cos(pi/180*MuscleParameters.Pennationangle); //< Optimal fiber length corrected by pennation angle
            AnyVar PCSA ??= 1e4*...StrengthScaleSpine*MuscleParameters.MuscleVolumeSIScaled/(Lf0); ///< PCSA (cm2) of the individual element is total volumen divided by the sum of muscle element fiber lengths.
            Vol0 = (1e-4*PCSA) * Lf0; // New calculation of the vol for the specific muscle branch
        };
        #endif

        #if BM_TRUNK_MUSCLES
        AnyMuscleModel MultifidusCervicisT1C5 = {
            AnyFolder& MuscleParameters = ....Data.unscaled.ModelParameters.Muscles.MultifidusCervicis.MultifidusCervicisT1C5;
            AnyIntVar MuscleElemNo = 1; ///< The number of this element of the muscle
            AnyIntVar MuscleElemAmount = MuscleParameters.MuscleElemAmount; ///< The total amount of elements for this muscle
            F0 ??= ...DefaultMusPar.PCSAfactor*PCSA; ///< Maximum force output at optimum fiber length
            Lf0 ??= MuscleParameters.OptimalFiberlength / cos(pi/180*MuscleParameters.Pennationangle); //< Optimal fiber length corrected by pennation angle
            AnyVar PCSA ??= 1e4*...StrengthScaleSpine*MuscleParameters.MuscleVolumeSIScaled/(Lf0); ///< PCSA (cm2) of the individual element is total volumen divided by the sum of muscle element fiber lengths.
            Vol0 = (1e-4*PCSA) * Lf0; // New calculation of the vol for the specific muscle branch
        };
        #endif

        #if BM_TRUNK_MUSCLES
        AnyMuscleModel MultifidusCervicisT2C5 = {
            AnyFolder& MuscleParameters = ....Data.unscaled.ModelParameters.Muscles.MultifidusCervicis.MultifidusCervicisT2C5;
            AnyIntVar MuscleElemNo = 1; ///< The number of this element of the muscle
            AnyIntVar MuscleElemAmount = MuscleParameters.MuscleElemAmount; ///< The total amount of elements for this muscle
            F0 ??= ...DefaultMusPar.PCSAfactor*PCSA; ///< Maximum force output at optimum fiber length
            Lf0 ??= MuscleParameters.OptimalFiberlength / cos(pi/180*MuscleParameters.Pennationangle); //< Optimal fiber length corrected by pennation angle
            AnyVar PCSA ??= 1e4*...StrengthScaleSpine*MuscleParameters.MuscleVolumeSIScaled/(Lf0); ///< PCSA (cm2) of the individual element is total volumen divided by the sum of muscle element fiber lengths.
            Vol0 = (1e-4*PCSA) * Lf0; // New calculation of the vol for the specific muscle branch
        };
        #endif

        #if BM_TRUNK_MUSCLES
        AnyMuscleModel MultifidusCervicisT2C6 = {
            AnyFolder& MuscleParameters = ....Data.unscaled.ModelParameters.Muscles.MultifidusCervicis.MultifidusCervicisT2C6;
            AnyIntVar MuscleElemNo = 1; ///< The number of this element of the muscle
            AnyIntVar MuscleElemAmount = MuscleParameters.MuscleElemAmount; ///< The total amount of elements for this muscle
            F0 ??= ...DefaultMusPar.PCSAfactor*PCSA; ///< Maximum force output at optimum fiber length
            Lf0 ??= MuscleParameters.OptimalFiberlength / cos(pi/180*MuscleParameters.Pennationangle); //< Optimal fiber length corrected by pennation angle
            AnyVar PCSA ??= 1e4*...StrengthScaleSpine*MuscleParameters.MuscleVolumeSIScaled/(Lf0); ///< PCSA (cm2) of the individual element is total volumen divided by the sum of muscle element fiber lengths.
            Vol0 = (1e-4*PCSA) * Lf0; // New calculation of the vol for the specific muscle branch
        };
        #endif

        #if BM_TRUNK_MUSCLES
        AnyMuscleModel MultifidusCervicisT3C6 = {
            AnyFolder& MuscleParameters = ....Data.unscaled.ModelParameters.Muscles.MultifidusCervicis.MultifidusCervicisT3C6;
            AnyIntVar MuscleElemNo = 1; ///< The number of this element of the muscle
            AnyIntVar MuscleElemAmount = MuscleParameters.MuscleElemAmount; ///< The total amount of elements for this muscle
            F0 ??= ...DefaultMusPar.PCSAfactor*PCSA; ///< Maximum force output at optimum fiber length
            Lf0 ??= MuscleParameters.OptimalFiberlength / cos(pi/180*MuscleParameters.Pennationangle); //< Optimal fiber length corrected by pennation angle
            AnyVar PCSA ??= 1e4*...StrengthScaleSpine*MuscleParameters.MuscleVolumeSIScaled/(Lf0); ///< PCSA (cm2) of the individual element is total volumen divided by the sum of muscle element fiber lengths.
            Vol0 = (1e-4*PCSA) * Lf0; // New calculation of the vol for the specific muscle branch
        };
        #endif

        #if BM_TRUNK_MUSCLES
        AnyMuscleModel MultifidusCervicisT3C7 = {
            AnyFolder& MuscleParameters = ....Data.unscaled.ModelParameters.Muscles.MultifidusCervicis.MultifidusCervicisT3C7;
            AnyIntVar MuscleElemNo = 1; ///< The number of this element of the muscle
            AnyIntVar MuscleElemAmount = MuscleParameters.MuscleElemAmount; ///< The total amount of elements for this muscle
            F0 ??= ...DefaultMusPar.PCSAfactor*PCSA; ///< Maximum force output at optimum fiber length
            Lf0 ??= MuscleParameters.OptimalFiberlength / cos(pi/180*MuscleParameters.Pennationangle); //< Optimal fiber length corrected by pennation angle
            AnyVar PCSA ??= 1e4*...StrengthScaleSpine*MuscleParameters.MuscleVolumeSIScaled/(Lf0); ///< PCSA (cm2) of the individual element is total volumen divided by the sum of muscle element fiber lengths.
            Vol0 = (1e-4*PCSA) * Lf0; // New calculation of the vol for the specific muscle branch
        };
        #endif

        #if BM_TRUNK_MUSCLES
        AnyMuscleModel MultifidusCervicisT4C7 = {
            AnyFolder& MuscleParameters = ....Data.unscaled.ModelParameters.Muscles.MultifidusCervicis.MultifidusCervicisT4C7;
            AnyIntVar MuscleElemNo = 1; ///< The number of this element of the muscle
            AnyIntVar MuscleElemAmount = MuscleParameters.MuscleElemAmount; ///< The total amount of elements for this muscle
            F0 ??= ...DefaultMusPar.PCSAfactor*PCSA; ///< Maximum force output at optimum fiber length
            Lf0 ??= MuscleParameters.OptimalFiberlength / cos(pi/180*MuscleParameters.Pennationangle); //< Optimal fiber length corrected by pennation angle
            AnyVar PCSA ??= 1e4*...StrengthScaleSpine*MuscleParameters.MuscleVolumeSIScaled/(Lf0); ///< PCSA (cm2) of the individual element is total volumen divided by the sum of muscle element fiber lengths.
            Vol0 = (1e-4*PCSA) * Lf0; // New calculation of the vol for the specific muscle branch
        };
        #endif

    };
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