/* Range of Motion definition for the trunk model */

AnyFolder RangeOfMotion = {
  AnyVar MaxSkullThoraxFlexionAngle = 70;
  AnyVar MaxSkullThoraxExtensionAngle = -77;
  AnyVar MaxSkullThoraxLateralBendingAngle = 41;
  AnyVar MinSkullThoraxLateralBendingAngle = -41;
  AnyVar MaxSkullThoraxAxialRotationAngle = 79;
  AnyVar MinSkullThoraxAxialRotationAngle = -79;
  AnyVar MaxPelvisThoraxFlexionAngle = 30;
  AnyVar MaxPelvisThoraxExtensionAngle = -60;
  AnyVar MaxPelvisThoraxLateralBendingAngle = 35;
  AnyVar MinPelvisThoraxLateralBendingAngle = -35;
  AnyVar MaxPelvisThoraxAxialRotationAngle = 35;
  AnyVar MinPelvisThoraxAxialRotationAngle = -35;
  AnyVar MaxPelvisSacrumFlexionAngle = 5;
  AnyVar MaxPelvisSacrumExtensionAngle = -5;
  AnyVar MaxPelvisSacrumLateralBendingAngle = 5;
  AnyVar MinPelvisSacrumLateralBendingAngle = -5;
  AnyVar Neutral = 0;

  // AnyFolder Right = {};
  // AnyFolder Left = {};
};
