//# Defintions for the python test framwork
//ignore_errors = ["'Set Value' operation on"]
//fatal_warnings = True
//pytest_markers=["slow"]
//save_study=[
//  "Main.Studies.MarkerTracking",
//  "Main.Studies.InverseDynamicStudy",
//]


#include "../libdef.any"

#path MOCAP_PATH_MAINFILEDIR "<ANYMOCAP_EXAMPLES>/Plug-in-gait_Simple"
#path MOCAP_PATH_MAINFILE "<MOCAP_PATH_MAINFILEDIR>/LowerExtremity_ToeFlexion.main.any"
#define MOCAP_NAME_MAINFILEDIR "Plug-in-gait_Simple_ToeFlex_GM"

//// Run Analysis with a reduced number of time steps
//// to make test go faster.
//#define N_STEP_KINEMATICS 20
//#define N_STEP 20


#define MOCAP_TEST_FILENAME_PREFIX "LowerExtremityToeFlex_"

#ifndef TEST_NAME
#endif


#ifdef CREATE_IMAGE
#undef MOCAP_TEST_FILENAME_PREFIX
#define MOCAP_TEST_FILENAME_PREFIX "LowerExtremity_"
#path TEMP_PATH "<MOCAP_PATH_MAINFILEDIR>/Output"
#endif


#include "<MOCAP_PATH_MAINFILE>"

Main =
{

  AnyOperationSequence  TestRunApplication =
  {
    AnyOperation& RunAnalysis = Main.RunAnalysis;
  };

  #ifndef CREATE_IMAGE
    AnyOperation& RunTest = Main.TestRunApplication;
  #else
    Main.ModelSetup.TrialSpecificData.tStart = 2.87;
    Main.ModelSetup.TrialSpecificData.tEnd = 2.97;
    #include "../Cameras.any"
    AnyOperationSequence CameraInitPos =
    {
      AnyOperation& ref1 = Main.RunAnalysis.LoadParameters;
      AnyOperation& ref2 = Main.Studies.MarkerTracking.Kinematics;
      AnyOperation& ref3 = Main.Studies.InverseDynamicStudy.InitialConditions;
    };
    LoadTimeCam.CameraLookAtPoint = 0.5*(Main.HumanModel.BodyModel.Left.Leg.Segments.Foot.Toe1.DistalPhalange1.r+Main.HumanModel.BodyModel.Right.Leg.Segments.Foot.Toe1.DistalPhalange1.r);
    LoadTimeCam.CameraFieldOfView = DesignVar(1.0);
    LoadTimeCam.CameraDirection  = {-0.0,0.0,1};
  #endif
};
