//define = (
//  [
//    {'BM_LEG_MUSCLES_BOTH': '_MUSCLES_SIMPLE_'},
//   #{'BM_LEG_MUSCLES_BOTH': '_MUSCLES_3E_HILL_'},
//  ],
//  [
//    {'BM_FOOT_MODEL': '_FOOT_MODEL_RIGID_GM_'},
//    {'BM_FOOT_MODEL': '_FOOT_MODEL_TOE_FLEX_GM_'},
//    {'BM_FOOT_MODEL': '_FOOT_MODEL_DETAILED_GM_'},
//  ],
//)

#include "../libdef.any"

#ifndef BM_FOOT_MODEL
  #define BM_FOOT_MODEL _FOOT_MODEL_DETAILED_GM_
#endif
#ifndef BM_LEG_MUSCLES_BOTH
  #define BM_LEG_MUSCLES_BOTH _MUSCLES_SIMPLE_
#endif

#include "../../Application/Examples/FreePostureGMFoot/FreePostureFullBodyStaticGMFoot.Main.any"


Main =
{
#ifndef CREATE_IMAGE
  AnyOperation& RunTest = Main.RunApplication;
  Study = { FixTestStudyConfig TestStudyConfig = {  }; };
#else
  #include "../Cameras.any"
  AnyOperation& CameraInitPos = Main.Study.InitialConditions;
  LoadTimeCam.CameraLookAtPoint = {0,0.85,0};
  LoadTimeCam.CameraFieldOfView = DesignVar(1.9);
  LoadTimeCam.CameraDirection  = {0,0,1};
#endif
};
