//define = (
//   [
//    {'BM_LEG_MODEL':'_LEG_MODEL_TLEM1_'},
//    {'BM_LEG_MODEL':'_LEG_MODEL_TLEM2_'},
//    {'BM_LEG_MODEL':'_LEG_MODEL_LEG_'},
//   ],
//   [
//    {'BM_CALIBRATION_TYPE':'1'},
//    {'BM_CALIBRATION_TYPE':'2'},
//    {'BM_CALIBRATION_TYPE':'3'},
//   ]
//)
//ignore_errors = ['Currently, no room for tendon']
//fatal_warnings = [
//    "Penetration of surface",
//]

#include "libdef.any"

#ifndef TEST_NAME
  #define BM_LEG_MODEL 2
  #define BM_CALIBRATION_TYPE 3
  #define TEST_NAME "test_calibration_lowerbody.any_1"
#endif


#define BM_SCALING _SCALING_NONE_
#define BM_LEG_TRUNK_INTERFACE _MORPH_TRUNK_TO_LEG_
#define BM_LEG_MUSCLES_RIGHT _MUSCLES_3E_HILL_

#define BM_LEG_LEFT OFF
#define BM_ARM_RIGHT OFF
#define BM_ARM_LEFT OFF


Main =
{

  #include "<ANYBODY_PATH_BODY>/HumanModel.any"

  AnyOperation& RunTest = RunAnalysis;
  AnyOperationSequence RunAnalysis = {
    #if (BM_CALIBRATION_TYPE == 3) & (BM_LEG_MODEL == _LEG_MODEL_TLEM2_)
    AnyOperation& StorePCSABeforeCal = .StrengthTest.SetPCSA;
    #endif

    AnyOperation& Calibration = Main.HumanModel.Calibration.CalibrationSequence;

    #if (BM_CALIBRATION_TYPE == 3) & (BM_LEG_MODEL == _LEG_MODEL_TLEM2_)
    AnyOperation& UpdatePCSAValues = .StrengthTest.UpdateValues;
    AnyOperation& SetTestTrigger = .StrengthTest.SetTestTrigger;
    AnyOperation& RunTest = .StrengthTest.UpdateValues;
    AnyOperation& HipFlexExtRoM = Main.HipFlexExtRoM.InverseDynamics;
    AnyOperation& HipAddAbdRoM = Main.HipAddAbdRoM.InverseDynamics;
    AnyOperation& HipRotRoM = Main.HipRotRoM.InverseDynamics;
    AnyOperation& KneeFlexExtRoM = Main.KneeFlexExtRoM.InverseDynamics;
    AnyOperation& AnkleFlexRoM = Main.AnkleFlexRoM.InverseDynamics;
    AnyOperation& AnkleEverInverRoM = Main.AnkleEverInverRoM.InverseDynamics;
    #endif
  };

  /// Template to create a study for the leg - user must provide a driver.
  #class_template RoMStudy(__CLASS__ = AnyBodyStudy) {
    Kinematics.SolverType = KinSolOverDeterminate;
    InitialConditions.SolverType = Kinematics.SolverType;
    nStep = 5;
    Gravity = {0, 0, 0};
    InverseDynamics.Criterion.UpperBoundOnOff = Off;
    AnyFolder &Model = Main.HumanModel.BodyModelWithDefaultDrivers;

    AnyFixedRefFrame ground = {
      AnyRefNode node = {
        ARel = Main.HumanModel.BodyModel.Trunk.Segments.PelvisSeg.Axes0;
        sRel = Main.HumanModel.BodyModel.Trunk.Segments.PelvisSeg.r0;
      };
    };

    AnyKinEq ThoraxFix = {
      AnyKinMeasure& PelvisThoraxExtension = Main.HumanModel.BodyModel.Interface.Trunk.PelvisThoraxExtension;
      AnyKinMeasure& PelvisThoraxLateralBending = Main.HumanModel.BodyModel.Interface.Trunk.PelvisThoraxLateralBending;
      AnyKinMeasure& PelvisThoraxRotation = Main.HumanModel.BodyModel.Interface.Trunk.PelvisThoraxRotation;
    };

    AnyKinEq PelvisFix = {
      AnyKinLinear Lin = {
        AnyRefFrame &ground = ..ground.node;
        AnyRefFrame &Pelvis = Main.HumanModel.BodyModel.Trunk.Segments.PelvisSeg;
      };
      AnyKinRotational Rot = {
        Type = RotAxesAngles;
        AnyRefFrame &ground = ..ground.node;
        AnyRefFrame &Pelvis = Main.HumanModel.BodyModel.Trunk.Segments.PelvisSeg;
      };
    };
  };


  #if (BM_CALIBRATION_TYPE == 3) & (BM_LEG_MODEL == _LEG_MODEL_TLEM2_)

  AnyFolder StrengthTest = {
    AnyOperationMacro UpdateValues = {
      MacroStr = {"classoperation Main " + strquote("Update Values")};
    };
    AnyOperationSetValue SetTestTrigger = {
      AnyInt dummy = 1;
      Source = {&dummy};
      Target = {&.TestTrigger};
    };

    AnyOperationSetValue SetPCSA = {
      Source = {&.PCSAValues};
      Target = {&.PCSAsBeforeCal};
    };
    AnyInt TestTrigger = DesignVar(0);
    AnyObjectPtrArray MuscleModels = ObjSearch(&Main.HumanModel.BodyModel.Right.Leg.MuscleModels, "*", "AnyMuscleModel");
    AnyObjectPtrArray PCSAs = ObjGetMember(MuscleModels, "PCSA");
    AnyFloat PCSAValues = Obj2Num(PCSAs);
    AnyFloat PCSAsBeforeCal = DesignVar(zeros(NumElemOf(PCSAValues)));
    AnyFloat PCSADiff = PCSAsBeforeCal - PCSAValues;
    AnyString paired = transpose({strval(PCSADiff), CompleteNameOf(PCSAs)});

    AnyInt test_PCSA_before_after_cal = expect(
        orfun(
          not(TestTrigger),
          ltfun(abs(PCSADiff), 0.1)
        ),
        "The PCSA of some muscles have significantly changed after calibration!",
      );

    AnyObjectPtrArray Muscles = ObjSearch(&Main.HumanModel.BodyModel.Right.Leg.Mus, "*.*", "AnyMuscle");
    AnyObjectPtrArray Strengths = ObjGetMember(Muscles, "Strength");
    AnyFloat StrengthValues = Obj2Num(Strengths);
    AnyFloat StrengthsAfterCal = StrengthValues;
  };

  RoMStudy HipFlexExtRoM() = {
    AnyKinEqInterPolDriver Hip = {
      AnyKinMeasure &measure = Main.HumanModel.BodyModel.Interface.Right.HipFlexion;
      Type = PiecewiseLinear;
      T = linspace(0,1,.nStep);
      Data = {
        linspace(
        Main.HumanModel.Calibration.RangeOfMotion.Right.Leg.Hip.MaxExtensionAngle,
        Main.HumanModel.Calibration.RangeOfMotion.Right.Leg.Hip.MaxFlexionAngle,
        .nStep
        ) * pi/180
      };
      Reaction.Type = {Off};
    };
  };
  RoMStudy HipAddAbdRoM() = {
    AnyKinEqInterPolDriver Hip = {
      AnyKinMeasure &measure = Main.HumanModel.BodyModel.Interface.Right.HipAbduction;
      Type = PiecewiseLinear;
      T = linspace(0,1,.nStep);
      Data = {
        linspace(
        Main.HumanModel.Calibration.RangeOfMotion.Right.Leg.Hip.MaxAdductionAngle,
        Main.HumanModel.Calibration.RangeOfMotion.Right.Leg.Hip.MaxAbductionAngle,
        .nStep
        ) * pi/180
      };
      Reaction.Type = {Off};
    };
  };
  RoMStudy HipRotRoM() = {
    AnyKinEqInterPolDriver Hip = {
      AnyKinMeasure &measure = Main.HumanModel.BodyModel.Interface.Right.HipExternalRotation;
      Type = PiecewiseLinear;
      T = linspace(0,1,.nStep);
      Data = {
        linspace(
        Main.HumanModel.Calibration.RangeOfMotion.Right.Leg.Hip.MaxExternalRotationAngle,
        Main.HumanModel.Calibration.RangeOfMotion.Right.Leg.Hip.MaxInternalRotationAngle,
        .nStep
        ) * pi/180
      };
      Reaction.Type = {Off};
    };
  };
  RoMStudy KneeFlexExtRoM() = {
    AnyKinEqInterPolDriver Knee = {
      AnyKinMeasure &measure = Main.HumanModel.BodyModel.Interface.Right.KneeFlexion;
      Type = PiecewiseLinear;
      T = linspace(0,1,.nStep);
      Data = {
        linspace(
        Main.HumanModel.Calibration.RangeOfMotion.Right.Leg.Knee.MaxExtensionAngle,
        Main.HumanModel.Calibration.RangeOfMotion.Right.Leg.Knee.MaxFlexionAngle,
        .nStep
        ) * pi/180
      };
      Reaction.Type = {Off};
    };
  };
  RoMStudy AnkleFlexRoM() = {
    AnyKinEqInterPolDriver Ankle = {
      AnyKinMeasure &measure = Main.HumanModel.BodyModel.Interface.Right.AnklePlantarFlexion;
      Type = PiecewiseLinear;
      T = linspace(0,1,.nStep);
      Data = {
        linspace(
        Main.HumanModel.Calibration.RangeOfMotion.Right.Leg.Ankle.MaxPlantarFlexionAngle,
        Main.HumanModel.Calibration.RangeOfMotion.Right.Leg.Ankle.MaxDorsiFlexionAngle,
        .nStep
        ) * pi/180
      };
      Reaction.Type = {Off};
    };
  };
  RoMStudy AnkleEverInverRoM() = {
    AnyKinEqInterPolDriver Ankle = {
      AnyKinMeasure &measure = Main.HumanModel.BodyModel.Interface.Right.SubTalarEversion;
      Type = PiecewiseLinear;
      T = linspace(0,1,.nStep);
      Data = {
        linspace(
        Main.HumanModel.Calibration.RangeOfMotion.Right.Leg.Ankle.MaxEversionAngle,
        Main.HumanModel.Calibration.RangeOfMotion.Right.Leg.Ankle.MaxInversionAngle,
        .nStep
        ) * pi/180
      };
      Reaction.Type = {Off};
    };
  };

  #endif
};
